// COMSOL Multiphysics 6.0.0.354 model "BeamSplitter.mph"
// Outline of the model tree

Parameters
  Rx_LN = -pi/2[rad]  // Rotation angle around the coordinate x-axis (second rotation) for LiNbO3 material
  Ry_LN = 0[rad]  // Rotation angle around the coordinate y-axis (third rotation) for LiNbO3 material
  Rz_LN = 0[rad]  // Rotation angle around the coordinate z-axis (first rotation) for LiNbO3 material
  Rx_Si = 0[rad]  // Rotation angle around the coordinate x-axis (second rotation) for Si material
  Ry_Si = 0[rad]  // Rotation angle around the coordinate y-axis (third rotation) for Si material
  Rz_Si = 0[rad]  // Rotation angle around the coordinate z-axis (first rotation) for Si material
  Rx_C = 0[rad]  // Rotation angle around the coordinate x-axis (second rotation) for Diamond material
  Ry_C = 0[rad]  // Rotation angle around the coordinate y-axis (third rotation) for Diamond material
  Rz_C = 0[rad]  // Rotation angle around the coordinate z-axis (first rotation) for Diamond material
  beam_waist = 2[um]
  beam_Ex0 = 0[V/m]
  beam_Ey0 = 0[V/m]
  beam_Ez0 = 1[V/m]
  side = 30*beam_waist
  beam_power_normalization = 3.5565E-9[W/m]

Couplings
  intop2: Integration "Optical Input Boundary" on boundaries 1 | opname = intop_opt_in
  intop1: Integration "Optical Transmission Boundary" on boundaries 5 | opname = intop_opt_trans
  intop4: Integration "Optical Reflection Boundary" on boundaries 4 | opname = intop_opt_refl

Probes
  var5: GlobalVariable "Source"
    probename = var1
    expr = intop_opt_in(ewfd.Poavx)
    unit = W/m
    descr = Optical Input Boundary
  var6: GlobalVariable "Transmission"
    probename = var2
    expr = intop_opt_trans(ewfd.Poavx)
    unit = W/m
    descr = Optical Transmission Boundary
  var7: GlobalVariable "Reflection"
    probename = var3
    expr = intop_opt_refl(ewfd.Poavy)
    unit = W/m
    descr = Optical Reflection Boundary

Geometry
  geom1 "Geometry 1" (2D, length unit m)
    sq1: Square | size = side
    ls1: LineSegment | vertex1 = sq1(1) points 1; vertex2 = sq1(1) points 3
    fin: Finalize "Form Union"

Materials
  mat1: Common "Air - Caique" on domains 1, 2
    def "Basic"
      electricconductivity = 0
      relpermeability = 1
      relpermittivity = 1
      density = 1.225[kg/m^3]
      P11 = 0
      DESCR_PREFIX:P11 = rotated p11 photoelastic tensor component
      P12 = 0
      DESCR_PREFIX:P12 = rotated p12 photoelastic tensor component
      P13 = 0
      DESCR_PREFIX:P13 = rotated p13 photoelastic tensor component
      P14 = 0
      DESCR_PREFIX:P14 = rotated p14 photoelastic tensor component
      P15 = 0
      DESCR_PREFIX:P15 = rotated p15 photoelastic tensor component
      P16 = 0
      DESCR_PREFIX:P16 = rotated p16 photoelastic tensor component
      P21 = 0
      DESCR_PREFIX:P21 = rotated p21 photoelastic tensor component
      P22 = 0
      DESCR_PREFIX:P22 = rotated p22 photoelastic tensor component
      P23 = 0
      DESCR_PREFIX:P23 = rotated p23 photoelastic tensor component
      P24 = 0
      DESCR_PREFIX:P24 = rotated p24 photoelastic tensor component
      P25 = 0
      DESCR_PREFIX:P25 = rotated p25 photoelastic tensor component
      P26 = 0
      DESCR_PREFIX:P26 = rotated p26 photoelastic tensor component
      P31 = 0
      DESCR_PREFIX:P31 = rotated p31 photoelastic tensor component
      P32 = 0
      DESCR_PREFIX:P32 = rotated p32 photoelastic tensor component
      P33 = 0
      DESCR_PREFIX:P33 = rotated p33 photoelastic tensor component
      P34 = 0
      DESCR_PREFIX:P34 = rotated p34 photoelastic tensor component
      P35 = 0
      DESCR_PREFIX:P35 = rotated p35 photoelastic tensor component
      P36 = 0
      DESCR_PREFIX:P36 = rotated p36 photoelastic tensor component
      P41 = 0
      DESCR_PREFIX:P41 = rotated p41 photoelastic tensor component
      P42 = 0
      DESCR_PREFIX:P42 = rotated p42 photoelastic tensor component
      P43 = 0
      DESCR_PREFIX:P43 = rotated p43 photoelastic tensor component
      P44 = 0
      DESCR_PREFIX:P44 = rotated p44 photoelastic tensor component
      P45 = 0
      DESCR_PREFIX:P45 = rotated p45 photoelastic tensor component
      P46 = 0
      DESCR_PREFIX:P46 = rotated p46 photoelastic tensor component
      P51 = 0
      DESCR_PREFIX:P51 = rotated p51 photoelastic tensor component
      P52 = 0
      DESCR_PREFIX:P52 = rotated p52 photoelastic tensor component
      P53 = 0
      DESCR_PREFIX:P53 = rotated p53 photoelastic tensor component
      P54 = 0
      DESCR_PREFIX:P54 = rotated p54 photoelastic tensor component
      P55 = 0
      DESCR_PREFIX:P55 = rotated p55 photoelastic tensor component
      P56 = 0
      DESCR_PREFIX:P56 = rotated p56 photoelastic tensor component
      P61 = 0
      DESCR_PREFIX:P61 = rotated p61 photoelastic tensor component
      P62 = 0
      DESCR_PREFIX:P62 = rotated p62 photoelastic tensor component
      P63 = 0
      DESCR_PREFIX:P63 = rotated p63 photoelastic tensor component
      P64 = 0
      DESCR_PREFIX:P64 = rotated p64 photoelastic tensor component
      P65 = 0
      DESCR_PREFIX:P65 = rotated p65 photoelastic tensor component
      P66 = 0
      DESCR_PREFIX:P66 = rotated p66 photoelastic tensor component
      E11 = 0[C/m^2]
      DESCR_PREFIX:E11 = rotated e11 piezoelectric stress-charge tensor component
      E12 = 0[C/m^2]
      DESCR_PREFIX:E12 = rotated e12 piezoelectric stress-charge tensor component
      E13 = 0[C/m^2]
      DESCR_PREFIX:E13 = rotated e13 piezoelectric stress-charge tensor component
      E14 = 0[C/m^2]
      DESCR_PREFIX:E14 = rotated e14 piezoelectric stress-charge tensor component
      E15 = 0[C/m^2]
      DESCR_PREFIX:E15 = rotated e15 piezoelectric stress-charge tensor component
      E16 = 0[C/m^2]
      DESCR_PREFIX:E16 = rotated e16 piezoelectric stress-charge tensor component
      E21 = 0[C/m^2]
      DESCR_PREFIX:E21 = rotated e21 piezoelectric stress-charge tensor component
      E22 = 0[C/m^2]
      DESCR_PREFIX:E22 = rotated e22 piezoelectric stress-charge tensor component
      E23 = 0[C/m^2]
      DESCR_PREFIX:E23 = rotated e23 piezoelectric stress-charge tensor component
      E24 = 0[C/m^2]
      DESCR_PREFIX:E24 = rotated e24 piezoelectric stress-charge tensor component
      E25 = 0[C/m^2]
      DESCR_PREFIX:E25 = rotated e25 piezoelectric stress-charge tensor component
      E26 = 0[C/m^2]
      DESCR_PREFIX:E26 = rotated e26 piezoelectric stress-charge tensor component
      E31 = 0[C/m^2]
      DESCR_PREFIX:E31 = rotated e31 piezoelectric stress-charge tensor component
      E32 = 0[C/m^2]
      DESCR_PREFIX:E32 = rotated e32 piezoelectric stress-charge tensor component
      E33 = 0[C/m^2]
      DESCR_PREFIX:E33 = rotated e33 piezoelectric stress-charge tensor component
      E34 = 0[C/m^2]
      DESCR_PREFIX:E34 = rotated e34 piezoelectric stress-charge tensor component
      E35 = 0[C/m^2]
      DESCR_PREFIX:E35 = rotated e35 piezoelectric stress-charge tensor component
      E36 = 0[C/m^2]
      DESCR_PREFIX:E36 = rotated e36 piezoelectric stress-charge tensor component
  mat2: Common "Silicon Dioxide Glass (SiO2, Fused Silica) - Caique" on domains 2
    // SiO2 data
    def "Basic"
      density = 2203[kg/m^3]
      relpermeability = 1
      relpermittivity = nref_sel(lambda0)^2
      electricconductivity = 0
      P11 = 0.121
      DESCR_PREFIX:P11 = (measured) rotated p11 photoelastic tensor component
      P12 = 0.271
      DESCR_PREFIX:P12 = (measured) rotated p12 photoelastic tensor component
      P13 = P12
      DESCR_PREFIX:P13 = rotated p13 photoelastic tensor component
      P14 = 0
      DESCR_PREFIX:P14 = rotated p14 photoelastic tensor component
      P15 = 0
      DESCR_PREFIX:P15 = rotated p15 photoelastic tensor component
      P16 = 0
      DESCR_PREFIX:P16 = rotated p16 photoelastic tensor component
      P21 = P12
      DESCR_PREFIX:P21 = rotated p21 photoelastic tensor component
      P22 = P11
      DESCR_PREFIX:P22 = rotated p22 photoelastic tensor component
      P23 = P12
      DESCR_PREFIX:P23 = rotated p23 photoelastic tensor component
      P24 = 0
      DESCR_PREFIX:P24 = rotated p24 photoelastic tensor component
      P25 = 0
      DESCR_PREFIX:P25 = rotated p25 photoelastic tensor component
      P26 = 0
      DESCR_PREFIX:P26 = rotated p26 photoelastic tensor component
      P31 = P12
      DESCR_PREFIX:P31 = rotated p31 photoelastic tensor component
      P32 = P12
      DESCR_PREFIX:P32 = rotated p32 photoelastic tensor component
      P33 = P11
      DESCR_PREFIX:P33 = rotated p33 photoelastic tensor component
      P34 = 0
      DESCR_PREFIX:P34 = rotated p34 photoelastic tensor component
      P35 = 0
      DESCR_PREFIX:P35 = rotated p35 photoelastic tensor component
      P36 = 0
      DESCR_PREFIX:P36 = rotated p36 photoelastic tensor component
      P41 = 0
      DESCR_PREFIX:P41 = rotated p41 photoelastic tensor component
      P42 = 0
      DESCR_PREFIX:P42 = rotated p42 photoelastic tensor component
      P43 = 0
      DESCR_PREFIX:P43 = rotated p43 photoelastic tensor component
      P44 = 0.5*(P11 - P12)
      DESCR_PREFIX:P44 = rotated p44 photoelastic tensor component
      P45 = 0
      DESCR_PREFIX:P45 = rotated p45 photoelastic tensor component
      P46 = 0
      DESCR_PREFIX:P46 = rotated p46 photoelastic tensor component
      P51 = 0
      DESCR_PREFIX:P51 = rotated p51 photoelastic tensor component
      P52 = 0
      DESCR_PREFIX:P52 = rotated p52 photoelastic tensor component
      P53 = 0
      DESCR_PREFIX:P53 = rotated p53 photoelastic tensor component
      P54 = 0
      DESCR_PREFIX:P54 = rotated p54 photoelastic tensor component
      P55 = 0.5*(P11 - P12)
      DESCR_PREFIX:P55 = rotated p55 photoelastic tensor component
      P56 = 0
      DESCR_PREFIX:P56 = rotated p56 photoelastic tensor component
      P61 = 0
      DESCR_PREFIX:P61 = rotated p61 photoelastic tensor component
      P62 = 0
      DESCR_PREFIX:P62 = rotated p62 photoelastic tensor component
      P63 = 0
      DESCR_PREFIX:P63 = rotated p63 photoelastic tensor component
      P64 = 0
      DESCR_PREFIX:P64 = rotated p64 photoelastic tensor component
      P65 = 0
      DESCR_PREFIX:P65 = rotated p65 photoelastic tensor component
      P66 = 0.5*(P11 - P12)
      DESCR_PREFIX:P66 = rotated p66 photoelastic tensor component
      E11 = 0[C/m^2]
      DESCR_PREFIX:E11 = rotated e11 piezoelectric stress-charge tensor component
      E12 = 0[C/m^2]
      DESCR_PREFIX:E12 = rotated e12 piezoelectric stress-charge tensor component
      E13 = 0[C/m^2]
      DESCR_PREFIX:E13 = rotated e13 piezoelectric stress-charge tensor component
      E14 = 0[C/m^2]
      DESCR_PREFIX:E14 = rotated e14 piezoelectric stress-charge tensor component
      E15 = 0[C/m^2]
      DESCR_PREFIX:E15 = rotated e15 piezoelectric stress-charge tensor component
      E16 = 0[C/m^2]
      DESCR_PREFIX:E16 = rotated e16 piezoelectric stress-charge tensor component
      E21 = 0[C/m^2]
      DESCR_PREFIX:E21 = rotated e21 piezoelectric stress-charge tensor component
      E22 = 0[C/m^2]
      DESCR_PREFIX:E22 = rotated e22 piezoelectric stress-charge tensor component
      E23 = 0[C/m^2]
      DESCR_PREFIX:E23 = rotated e23 piezoelectric stress-charge tensor component
      E24 = 0[C/m^2]
      DESCR_PREFIX:E24 = rotated e24 piezoelectric stress-charge tensor component
      E25 = 0[C/m^2]
      DESCR_PREFIX:E25 = rotated e25 piezoelectric stress-charge tensor component
      E26 = 0[C/m^2]
      DESCR_PREFIX:E26 = rotated e26 piezoelectric stress-charge tensor component
      E31 = 0[C/m^2]
      DESCR_PREFIX:E31 = rotated e31 piezoelectric stress-charge tensor component
      E32 = 0[C/m^2]
      DESCR_PREFIX:E32 = rotated e32 piezoelectric stress-charge tensor component
      E33 = 0[C/m^2]
      DESCR_PREFIX:E33 = rotated e33 piezoelectric stress-charge tensor component
      E34 = 0[C/m^2]
      DESCR_PREFIX:E34 = rotated e34 piezoelectric stress-charge tensor component
      E35 = 0[C/m^2]
      DESCR_PREFIX:E35 = rotated e35 piezoelectric stress-charge tensor component
      E36 = 0[C/m^2]
      DESCR_PREFIX:E36 = rotated e36 piezoelectric stress-charge tensor component
      an1: Analytic "Sellmeyer formula - refractive index"
        // Berge Tatian, "Fitting refractive-index data with the Sellmeier dispersion formula," Appl. Opt. 23, 4477-4485 (1984)
        funcname = nref_sel
        expr = (1 + ((lambda0^(2))*0.6961663e12)/((lambda0^(2))*1e12 - 0.00467914825849) + ((lambda0^(2))*0.4079426e12)/((lambda0^(2))*1e12 - 0.013512063074) + ((lambda0^(2))*0.8974794e12)/((lambda0^(2))*1e12 - 97.934002537921))^(1./2.)
        args = lambda0
        argunit = m
    Anisotropic
      D = {C11, C12, C13, C16, C14, C15, C12, C22, C23, C26, C24, C25, C13, C23, C33, C36, C34, C35, C16, C26, C36, C66, C64, C65, C14, C24, C34, C64, C44, C45, C15, C25, C35, C65, C45, C55}
      eta_D = {0, 0, 0, 0, 0, 0, 0, 0, 0, 0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}
      C11 = 78.5[GPa]
      DESCR_PREFIX:C11 = (measured) rotated c11 elastic stiffnesses component
      C12 = 16.1[GPa]
      DESCR_PREFIX:C12 = (measured) rotated c12 elastic stiffnesses component
      C13 = C12
      DESCR_PREFIX:C13 = rotated c13 elastic stiffnesses component
      C14 = 0[Pa]
      DESCR_PREFIX:C14 = rotated c14 elastic stiffnesses component
      C15 = 0[Pa]
      DESCR_PREFIX:C15 = rotated c15 elastic stiffnesses component
      C16 = 0[Pa]
      DESCR_PREFIX:C16 = rotated c16 elastic stiffnesses component
      C21 = C12
      DESCR_PREFIX:C21 = rotated c21 elastic stiffnesses component
      C22 = C11
      DESCR_PREFIX:C22 = rotated c22 elastic stiffnesses component
      C23 = C12
      DESCR_PREFIX:C23 = rotated c23 elastic stiffnesses component
      C24 = 0[Pa]
      DESCR_PREFIX:C24 = rotated c24 elastic stiffnesses component
      C25 = 0[Pa]
      DESCR_PREFIX:C25 = rotated c25 elastic stiffnesses component
      C26 = 0[Pa]
      DESCR_PREFIX:C26 = rotated c26 elastic stiffnesses component
      C31 = C12
      DESCR_PREFIX:C31 = rotated c31 elastic stiffnesses component
      C32 = C12
      DESCR_PREFIX:C32 = rotated c32 elastic stiffnesses component
      C33 = C11
      DESCR_PREFIX:C33 = rotated c33 elastic stiffnesses component
      C34 = 0[Pa]
      DESCR_PREFIX:C34 = rotated c34 elastic stiffnesses component
      C35 = 0[Pa]
      DESCR_PREFIX:C35 = rotated c35 elastic stiffnesses component
      C36 = 0[Pa]
      DESCR_PREFIX:C36 = rotated c36 elastic stiffnesses component
      C41 = 0[Pa]
      DESCR_PREFIX:C41 = rotated c41 elastic stiffnesses component
      C42 = 0[Pa]
      DESCR_PREFIX:C42 = rotated c42 elastic stiffnesses component
      C43 = 0[Pa]
      DESCR_PREFIX:C43 = rotated c43 elastic stiffnesses component
      C44 = 0.5*(C11-C12)
      DESCR_PREFIX:C44 = rotated c44 elastic stiffnesses component
      C45 = 0[Pa]
      DESCR_PREFIX:C45 = rotated c45 elastic stiffnesses component
      C46 = 0[Pa]
      DESCR_PREFIX:C46 = rotated c46 elastic stiffnesses component
      C51 = 0[Pa]
      DESCR_PREFIX:C51 = rotated c51 elastic stiffnesses component
      C52 = 0[Pa]
      DESCR_PREFIX:C52 = rotated c52 elastic stiffnesses component
      C53 = 0[Pa]
      DESCR_PREFIX:C53 = rotated c53 elastic stiffnesses component
      C54 = 0[Pa]
      DESCR_PREFIX:C54 = rotated c54 elastic stiffnesses component
      C55 = 0.5*(C11-C12)
      DESCR_PREFIX:C55 = rotated c55 elastic stiffnesses component
      C56 = 0[Pa]
      DESCR_PREFIX:C56 = rotated c56 elastic stiffnesses component
      C61 = 0[Pa]
      DESCR_PREFIX:C61 = rotated c61 elastic stiffnesses component
      C62 = 0[Pa]
      DESCR_PREFIX:C62 = rotated c62 elastic stiffnesses component
      C63 = 0[Pa]
      DESCR_PREFIX:C63 = rotated c63 elastic stiffnesses component
      C64 = 0[Pa]
      DESCR_PREFIX:C64 = rotated c64 elastic stiffnesses component
      C65 = 0[Pa]
      DESCR_PREFIX:C65 = rotated c65 elastic stiffnesses component
      C66 = 0.5*(C11-C12)
      DESCR_PREFIX:C66 = rotated c66 elastic stiffnesses component

Physics
  ewfd: ElectromagneticWavesFrequencyDomain on all domains
    dependent variable E = {Ex, Ey, Ez}
    wee1: WaveEquationElectric (default) | DisplacementFieldModel = RelativePermittivity
    pec1: PerfectElectricConductor (default)
    init1: init "Initial Values 1" (default)
    sctr1: Scattering "Scattering Boundary Condition 1" on boundaries 1
      IncidentField = GaussianBeam
      E0i = {0, 0, 1}
      kdir = {-ewfd.nx, -ewfd.ny, 0}
      Order = SecondOrder
      w0 = beam_waist
      p0 = side/2
      Eg0 = {beam_Ex0, beam_Ey0, beam_Ez0}
      inputQuantity = ElectricFieldAmplitude
      inputPower = beam_power_density
      Eg0NN = {beam_Ex, beam_Ey, beam_Ez}
    sctr2: Scattering "Scattering Boundary Condition 2" on boundaries 2, 4, 5

Mesh
  mesh1 "Mesh 1"
    ftri1: FreeTri "Free Triangular 1" on domains 1, 2
      size1: Size on domains 1, 2 | hmax = 300[nm]; hauto = 1; custom = on

Studies
  std4 "Study 1"
    wave: Wavelength "Wavelength Domain" | punit = nm; plist = 1550