// COMSOL Multiphysics 6.0.0.354 model "Bouncing_Ball.mph"
// Outline of the model tree

Parameters
  a_semiaxis = 0.1
  b_semiaxis = 0.08

Pairs
  p1: Contact "Contact Pair 1" | source: boundaries 3; destination: boundaries 5-8

Geometry
  geom1 "Geometry 1" (2D, length unit m)
    e1: Ellipse | semiaxes = {a_semiaxis, b_semiaxis}
    r1: Rectangle | pos = {0, -.18}; base = center; size = {.3, .1}
    fin: Finalize "Form Assembly" | action = assembly; createpairs = off

Materials
  mat1: Common "Aluminum" on domains 1
    def "Basic"
      relpermeability = 1
      heatcapacity = 900[J/(kg*K)]
      thermalconductivity = 238[W/(m*K)]
      electricconductivity = 3.774e7[S/m]
      relpermittivity = 1
      thermalexpansioncoefficient = 23e-6[1/K]
      density = 2700[kg/m^3]
    Enu "Young's modulus and Poisson's ratio"
      E = 70e9[Pa]
      nu = 0.33
    Murnaghan
      l = -2.5e11[Pa]
      m = -3.3e11[Pa]
      n = -3.5e11[Pa]
    Lame "Lamé parameters"
      lambLame = 5.1e10[Pa]
      muLame = 2.6e10[Pa]
  mat2: Common "Water (Caique)" on domains 2
    def "Basic"
      density = 1000[kg/m^3]
    Enu "Young's modulus and Poisson's ratio"
      E = 2[kPa]
      nu = 0.49

Physics
  solid: SolidMechanics on all domains
    dependent variable u = {u, v, w}
    lemm1: LinearElasticModel "Linear Elastic Material 1" (default)
    free1: Free (default)
    init1: init "Initial Values 1" (default)
    dcnt1: SolidContact "Contact" (default)
      pairDisconnect = 0
      ContactMethodCtrl = Penalty
      penaltyCtrlPenalty = userDefined
    fix1: Fixed "Fixed Constraint 1" on boundaries 2
    init2: init "Initial Values 2" on domains 2 | ut = {0, -0.05, 0}

Mesh
  mesh1 "Mesh 1" (physics-controlled)
    size: MeshSizeDefault | hauto = 2

Studies
  std1 "Study 1"
    time: Transient "Time Dependent" | tlist = range(0,0.001,2); usertol = on; rtol = 0.001

Solver configurations
  sol1 "Solution 1" (study std1)
    v1: Variables "Dependent Variables 1"
      comp1_u: Field "Displacement field (comp1.u)" | scalemethod = manual; scaleval = 1e-2*0.431393092202
    t1: Time "Time-Dependent Solver 1"
      tlist = range(0,0.001,2)
      rtol = 0.001
      timemethod = genalpha
      predictor = constant
      dDef: Direct
      fc1: FullyCoupled | linsolver = dDef; dtech = auto; minstep = 0.5; useminsteprecovery = on; maxiter = 4

Datasets
  dset1: Solution | solution = sol1

Plots
  pg1: PlotGroup2D "2D Plot Group 1" | data = dset1
    surf1: Surface | expr = solid.mises
      def1: Deform "Deformation 1" | expr = {comp1.u, comp1.v}

Exports
  anim1: Animation | giffilename = C:\Users\ccrca\Desktop\tilted_bouncing.gif; maxframes = 301