// COMSOL Multiphysics 6.0.0.354 model "GratingCouplers.mph"
// Outline of the model tree

Parameters
  Rx_LN = 0[rad]  // Rotation angle around the coordinate x-axis (second rotation) for LiNbO3 material
  Ry_LN = pi/2[rad]  // Rotation angle around the coordinate y-axis (third rotation) for LiNbO3 material
  Rz_LN = pi/2[rad]  // Rotation angle around the coordinate z-axis (first rotation) for LiNbO3 material
  Rx_Si = 0[rad]  // Rotation angle around the coordinate x-axis (second rotation) for Si material
  Ry_Si = 0[rad]  // Rotation angle around the coordinate y-axis (third rotation) for Si material
  Rz_Si = 0[rad]  // Rotation angle around the coordinate z-axis (first rotation) for Si material
  Rx_C = 0[rad]  // Rotation angle around the coordinate x-axis (second rotation) for Diamond material
  Ry_C = 0[rad]  // Rotation angle around the coordinate y-axis (third rotation) for Diamond material
  Rz_C = 0[rad]  // Rotation angle around the coordinate z-axis (first rotation) for Diamond material
  beam_waist = 2[um]
  beam_angle = -8[degree]
  beam_domain_radius = 5*beam_waist
  beam_domain_angle = 90[degree]
  beam_focal = 0*beam_domain_radius*sin((pi-beam_domain_angle)/2)
  beam_Ex0 = 0[V/m]
  beam_Ey0 = 0[V/m]
  beam_Ez0 = 1[V/m]
  tSilica = 4700[nm]
  tLN = 600[nm]
  wedgeAngle = 30[degree]
  wGC = 130[nm]
  NGC = 8
  x0GC = 0[nm]
  dGC = 15[nm]
  beam_power_normalization = 3.5565E-9[W/m]
  LambdaGC = 2*tLN*tan(wedgeAngle)+dGC

Couplings
  intop1: Integration "Optical Output Boundary" on boundaries 214 | opname = intop_opt_out

Probes
  var1: GlobalVariable "GC Efficiency" | expr = intop_opt_out(ewfd.Poavx)/beam_power_normalization; unit = 1

Geometry
  geom1 "Geometry 1" (2D, length unit m)
    pol4: Polygon "Domain"
      source = table
      table = 
        {-beam_domain_radius, -beam_domain_radius}
        {-beam_domain_radius, beam_domain_radius*sin((pi/180)*90+beam_domain_angle/2+beam_angle)}
        {beam_domain_radius*cos((pi/180)*90+beam_domain_angle/2+beam_angle), beam_domain_radius*sin((pi/180)*90+beam_domain_angle/2+beam_angle)}
        {beam_domain_radius*cos((pi/180)*90-beam_domain_angle/2+beam_angle), beam_domain_radius*sin((pi/180)*90-beam_domain_angle/2+beam_angle)}
        {2*beam_domain_radius, beam_domain_radius*sin((pi/180)*90-beam_domain_angle/2+beam_angle)}
        {2*beam_domain_radius, -beam_domain_radius}
    r3: Rectangle "Silica"
      pos = {0.5*beam_domain_radius, -tSilica/2}
      base = center
      size = {3*beam_domain_radius, tSilica}
    pol2: Polygon
      source = table
      table = 
        {wGC/2+tLN*tan(wedgeAngle), 0}
        {wGC/2, tLN}
        {-wGC/2, tLN}
        {-wGC/2-tLN*tan(wedgeAngle), 0}
        {-wGC/2-tLN*tan(wedgeAngle), -beam_domain_radius}
        {wGC/2+tLN*tan(wedgeAngle), -beam_domain_radius}
    arr1: Array | input = pol2; size = NGC; type = linear; linearsize = NGC; displ = {wGC+2*tLN*tan(wedgeAngle)+dGC, 0}
    arr2: Array
      input = arr1(1)
      size = NGC
      type = linear
      linearsize = NGC
      displ = {-(wGC+2*tLN*tan(wedgeAngle)+dGC), 0}
    pol6: Polygon
      source = table
      table = 
        {2*beam_domain_radius, -beam_domain_radius}
        {2*beam_domain_radius, tLN}
        {-wGC/2+NGC*(wGC+2*tLN*tan(wedgeAngle)+dGC)+x0GC, tLN}
        {-wGC/2-tLN*tan(wedgeAngle)+NGC*(wGC+2*tLN*tan(wedgeAngle)+dGC)+x0GC, 0}
        {-wGC/2-tLN*tan(wedgeAngle)+NGC*(wGC+2*tLN*tan(wedgeAngle)+dGC)+x0GC, -beam_domain_radius}
    fin: Finalize "Form Union"

Materials
  mat1: Common "Air - Caique" on domains 3
    def "Basic"
      electricconductivity = 0
      relpermeability = 1
      relpermittivity = 1
      density = 1.225[kg/m^3]
      P11 = 0
      DESCR_PREFIX:P11 = rotated p11 photoelastic tensor component
      P12 = 0
      DESCR_PREFIX:P12 = rotated p12 photoelastic tensor component
      P13 = 0
      DESCR_PREFIX:P13 = rotated p13 photoelastic tensor component
      P14 = 0
      DESCR_PREFIX:P14 = rotated p14 photoelastic tensor component
      P15 = 0
      DESCR_PREFIX:P15 = rotated p15 photoelastic tensor component
      P16 = 0
      DESCR_PREFIX:P16 = rotated p16 photoelastic tensor component
      P21 = 0
      DESCR_PREFIX:P21 = rotated p21 photoelastic tensor component
      P22 = 0
      DESCR_PREFIX:P22 = rotated p22 photoelastic tensor component
      P23 = 0
      DESCR_PREFIX:P23 = rotated p23 photoelastic tensor component
      P24 = 0
      DESCR_PREFIX:P24 = rotated p24 photoelastic tensor component
      P25 = 0
      DESCR_PREFIX:P25 = rotated p25 photoelastic tensor component
      P26 = 0
      DESCR_PREFIX:P26 = rotated p26 photoelastic tensor component
      P31 = 0
      DESCR_PREFIX:P31 = rotated p31 photoelastic tensor component
      P32 = 0
      DESCR_PREFIX:P32 = rotated p32 photoelastic tensor component
      P33 = 0
      DESCR_PREFIX:P33 = rotated p33 photoelastic tensor component
      P34 = 0
      DESCR_PREFIX:P34 = rotated p34 photoelastic tensor component
      P35 = 0
      DESCR_PREFIX:P35 = rotated p35 photoelastic tensor component
      P36 = 0
      DESCR_PREFIX:P36 = rotated p36 photoelastic tensor component
      P41 = 0
      DESCR_PREFIX:P41 = rotated p41 photoelastic tensor component
      P42 = 0
      DESCR_PREFIX:P42 = rotated p42 photoelastic tensor component
      P43 = 0
      DESCR_PREFIX:P43 = rotated p43 photoelastic tensor component
      P44 = 0
      DESCR_PREFIX:P44 = rotated p44 photoelastic tensor component
      P45 = 0
      DESCR_PREFIX:P45 = rotated p45 photoelastic tensor component
      P46 = 0
      DESCR_PREFIX:P46 = rotated p46 photoelastic tensor component
      P51 = 0
      DESCR_PREFIX:P51 = rotated p51 photoelastic tensor component
      P52 = 0
      DESCR_PREFIX:P52 = rotated p52 photoelastic tensor component
      P53 = 0
      DESCR_PREFIX:P53 = rotated p53 photoelastic tensor component
      P54 = 0
      DESCR_PREFIX:P54 = rotated p54 photoelastic tensor component
      P55 = 0
      DESCR_PREFIX:P55 = rotated p55 photoelastic tensor component
      P56 = 0
      DESCR_PREFIX:P56 = rotated p56 photoelastic tensor component
      P61 = 0
      DESCR_PREFIX:P61 = rotated p61 photoelastic tensor component
      P62 = 0
      DESCR_PREFIX:P62 = rotated p62 photoelastic tensor component
      P63 = 0
      DESCR_PREFIX:P63 = rotated p63 photoelastic tensor component
      P64 = 0
      DESCR_PREFIX:P64 = rotated p64 photoelastic tensor component
      P65 = 0
      DESCR_PREFIX:P65 = rotated p65 photoelastic tensor component
      P66 = 0
      DESCR_PREFIX:P66 = rotated p66 photoelastic tensor component
      E11 = 0[C/m^2]
      DESCR_PREFIX:E11 = rotated e11 piezoelectric stress-charge tensor component
      E12 = 0[C/m^2]
      DESCR_PREFIX:E12 = rotated e12 piezoelectric stress-charge tensor component
      E13 = 0[C/m^2]
      DESCR_PREFIX:E13 = rotated e13 piezoelectric stress-charge tensor component
      E14 = 0[C/m^2]
      DESCR_PREFIX:E14 = rotated e14 piezoelectric stress-charge tensor component
      E15 = 0[C/m^2]
      DESCR_PREFIX:E15 = rotated e15 piezoelectric stress-charge tensor component
      E16 = 0[C/m^2]
      DESCR_PREFIX:E16 = rotated e16 piezoelectric stress-charge tensor component
      E21 = 0[C/m^2]
      DESCR_PREFIX:E21 = rotated e21 piezoelectric stress-charge tensor component
      E22 = 0[C/m^2]
      DESCR_PREFIX:E22 = rotated e22 piezoelectric stress-charge tensor component
      E23 = 0[C/m^2]
      DESCR_PREFIX:E23 = rotated e23 piezoelectric stress-charge tensor component
      E24 = 0[C/m^2]
      DESCR_PREFIX:E24 = rotated e24 piezoelectric stress-charge tensor component
      E25 = 0[C/m^2]
      DESCR_PREFIX:E25 = rotated e25 piezoelectric stress-charge tensor component
      E26 = 0[C/m^2]
      DESCR_PREFIX:E26 = rotated e26 piezoelectric stress-charge tensor component
      E31 = 0[C/m^2]
      DESCR_PREFIX:E31 = rotated e31 piezoelectric stress-charge tensor component
      E32 = 0[C/m^2]
      DESCR_PREFIX:E32 = rotated e32 piezoelectric stress-charge tensor component
      E33 = 0[C/m^2]
      DESCR_PREFIX:E33 = rotated e33 piezoelectric stress-charge tensor component
      E34 = 0[C/m^2]
      DESCR_PREFIX:E34 = rotated e34 piezoelectric stress-charge tensor component
      E35 = 0[C/m^2]
      DESCR_PREFIX:E35 = rotated e35 piezoelectric stress-charge tensor component
      E36 = 0[C/m^2]
      DESCR_PREFIX:E36 = rotated e36 piezoelectric stress-charge tensor component
  mat2: Common "Silicon Dioxide Glass (SiO2, Fused Silica) - Caique" on domains 1, 2, 5, 8-10, 13-15, 18-20, 23-25, 28-30, 33-35, 38-40, 43-45, 48-50, 53, 55, 58, 60, 63, 65, 68, 70, 73, 75, 78, 80
    // SiO2 data
    def "Basic"
      density = 2203[kg/m^3]
      relpermeability = 1
      relpermittivity = nref_sel(lambda0)^2
      electricconductivity = 0
      P11 = 0.121
      DESCR_PREFIX:P11 = (measured) rotated p11 photoelastic tensor component
      P12 = 0.271
      DESCR_PREFIX:P12 = (measured) rotated p12 photoelastic tensor component
      P13 = P12
      DESCR_PREFIX:P13 = rotated p13 photoelastic tensor component
      P14 = 0
      DESCR_PREFIX:P14 = rotated p14 photoelastic tensor component
      P15 = 0
      DESCR_PREFIX:P15 = rotated p15 photoelastic tensor component
      P16 = 0
      DESCR_PREFIX:P16 = rotated p16 photoelastic tensor component
      P21 = P12
      DESCR_PREFIX:P21 = rotated p21 photoelastic tensor component
      P22 = P11
      DESCR_PREFIX:P22 = rotated p22 photoelastic tensor component
      P23 = P12
      DESCR_PREFIX:P23 = rotated p23 photoelastic tensor component
      P24 = 0
      DESCR_PREFIX:P24 = rotated p24 photoelastic tensor component
      P25 = 0
      DESCR_PREFIX:P25 = rotated p25 photoelastic tensor component
      P26 = 0
      DESCR_PREFIX:P26 = rotated p26 photoelastic tensor component
      P31 = P12
      DESCR_PREFIX:P31 = rotated p31 photoelastic tensor component
      P32 = P12
      DESCR_PREFIX:P32 = rotated p32 photoelastic tensor component
      P33 = P11
      DESCR_PREFIX:P33 = rotated p33 photoelastic tensor component
      P34 = 0
      DESCR_PREFIX:P34 = rotated p34 photoelastic tensor component
      P35 = 0
      DESCR_PREFIX:P35 = rotated p35 photoelastic tensor component
      P36 = 0
      DESCR_PREFIX:P36 = rotated p36 photoelastic tensor component
      P41 = 0
      DESCR_PREFIX:P41 = rotated p41 photoelastic tensor component
      P42 = 0
      DESCR_PREFIX:P42 = rotated p42 photoelastic tensor component
      P43 = 0
      DESCR_PREFIX:P43 = rotated p43 photoelastic tensor component
      P44 = 0.5*(P11 - P12)
      DESCR_PREFIX:P44 = rotated p44 photoelastic tensor component
      P45 = 0
      DESCR_PREFIX:P45 = rotated p45 photoelastic tensor component
      P46 = 0
      DESCR_PREFIX:P46 = rotated p46 photoelastic tensor component
      P51 = 0
      DESCR_PREFIX:P51 = rotated p51 photoelastic tensor component
      P52 = 0
      DESCR_PREFIX:P52 = rotated p52 photoelastic tensor component
      P53 = 0
      DESCR_PREFIX:P53 = rotated p53 photoelastic tensor component
      P54 = 0
      DESCR_PREFIX:P54 = rotated p54 photoelastic tensor component
      P55 = 0.5*(P11 - P12)
      DESCR_PREFIX:P55 = rotated p55 photoelastic tensor component
      P56 = 0
      DESCR_PREFIX:P56 = rotated p56 photoelastic tensor component
      P61 = 0
      DESCR_PREFIX:P61 = rotated p61 photoelastic tensor component
      P62 = 0
      DESCR_PREFIX:P62 = rotated p62 photoelastic tensor component
      P63 = 0
      DESCR_PREFIX:P63 = rotated p63 photoelastic tensor component
      P64 = 0
      DESCR_PREFIX:P64 = rotated p64 photoelastic tensor component
      P65 = 0
      DESCR_PREFIX:P65 = rotated p65 photoelastic tensor component
      P66 = 0.5*(P11 - P12)
      DESCR_PREFIX:P66 = rotated p66 photoelastic tensor component
      E11 = 0[C/m^2]
      DESCR_PREFIX:E11 = rotated e11 piezoelectric stress-charge tensor component
      E12 = 0[C/m^2]
      DESCR_PREFIX:E12 = rotated e12 piezoelectric stress-charge tensor component
      E13 = 0[C/m^2]
      DESCR_PREFIX:E13 = rotated e13 piezoelectric stress-charge tensor component
      E14 = 0[C/m^2]
      DESCR_PREFIX:E14 = rotated e14 piezoelectric stress-charge tensor component
      E15 = 0[C/m^2]
      DESCR_PREFIX:E15 = rotated e15 piezoelectric stress-charge tensor component
      E16 = 0[C/m^2]
      DESCR_PREFIX:E16 = rotated e16 piezoelectric stress-charge tensor component
      E21 = 0[C/m^2]
      DESCR_PREFIX:E21 = rotated e21 piezoelectric stress-charge tensor component
      E22 = 0[C/m^2]
      DESCR_PREFIX:E22 = rotated e22 piezoelectric stress-charge tensor component
      E23 = 0[C/m^2]
      DESCR_PREFIX:E23 = rotated e23 piezoelectric stress-charge tensor component
      E24 = 0[C/m^2]
      DESCR_PREFIX:E24 = rotated e24 piezoelectric stress-charge tensor component
      E25 = 0[C/m^2]
      DESCR_PREFIX:E25 = rotated e25 piezoelectric stress-charge tensor component
      E26 = 0[C/m^2]
      DESCR_PREFIX:E26 = rotated e26 piezoelectric stress-charge tensor component
      E31 = 0[C/m^2]
      DESCR_PREFIX:E31 = rotated e31 piezoelectric stress-charge tensor component
      E32 = 0[C/m^2]
      DESCR_PREFIX:E32 = rotated e32 piezoelectric stress-charge tensor component
      E33 = 0[C/m^2]
      DESCR_PREFIX:E33 = rotated e33 piezoelectric stress-charge tensor component
      E34 = 0[C/m^2]
      DESCR_PREFIX:E34 = rotated e34 piezoelectric stress-charge tensor component
      E35 = 0[C/m^2]
      DESCR_PREFIX:E35 = rotated e35 piezoelectric stress-charge tensor component
      E36 = 0[C/m^2]
      DESCR_PREFIX:E36 = rotated e36 piezoelectric stress-charge tensor component
      an1: Analytic "Sellmeyer formula - refractive index"
        // Berge Tatian, "Fitting refractive-index data with the Sellmeier dispersion formula," Appl. Opt. 23, 4477-4485 (1984)
        funcname = nref_sel
        expr = (1 + ((lambda0^(2))*0.6961663e12)/((lambda0^(2))*1e12 - 0.00467914825849) + ((lambda0^(2))*0.4079426e12)/((lambda0^(2))*1e12 - 0.013512063074) + ((lambda0^(2))*0.8974794e12)/((lambda0^(2))*1e12 - 97.934002537921))^(1./2.)
        args = lambda0
        argunit = m
    Anisotropic
      D = {C11, C12, C13, C16, C14, C15, C12, C22, C23, C26, C24, C25, C13, C23, C33, C36, C34, C35, C16, C26, C36, C66, C64, C65, C14, C24, C34, C64, C44, C45, C15, C25, C35, C65, C45, C55}
      eta_D = {0, 0, 0, 0, 0, 0, 0, 0, 0, 0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}
      C11 = 78.5[GPa]
      DESCR_PREFIX:C11 = (measured) rotated c11 elastic stiffnesses component
      C12 = 16.1[GPa]
      DESCR_PREFIX:C12 = (measured) rotated c12 elastic stiffnesses component
      C13 = C12
      DESCR_PREFIX:C13 = rotated c13 elastic stiffnesses component
      C14 = 0[Pa]
      DESCR_PREFIX:C14 = rotated c14 elastic stiffnesses component
      C15 = 0[Pa]
      DESCR_PREFIX:C15 = rotated c15 elastic stiffnesses component
      C16 = 0[Pa]
      DESCR_PREFIX:C16 = rotated c16 elastic stiffnesses component
      C21 = C12
      DESCR_PREFIX:C21 = rotated c21 elastic stiffnesses component
      C22 = C11
      DESCR_PREFIX:C22 = rotated c22 elastic stiffnesses component
      C23 = C12
      DESCR_PREFIX:C23 = rotated c23 elastic stiffnesses component
      C24 = 0[Pa]
      DESCR_PREFIX:C24 = rotated c24 elastic stiffnesses component
      C25 = 0[Pa]
      DESCR_PREFIX:C25 = rotated c25 elastic stiffnesses component
      C26 = 0[Pa]
      DESCR_PREFIX:C26 = rotated c26 elastic stiffnesses component
      C31 = C12
      DESCR_PREFIX:C31 = rotated c31 elastic stiffnesses component
      C32 = C12
      DESCR_PREFIX:C32 = rotated c32 elastic stiffnesses component
      C33 = C11
      DESCR_PREFIX:C33 = rotated c33 elastic stiffnesses component
      C34 = 0[Pa]
      DESCR_PREFIX:C34 = rotated c34 elastic stiffnesses component
      C35 = 0[Pa]
      DESCR_PREFIX:C35 = rotated c35 elastic stiffnesses component
      C36 = 0[Pa]
      DESCR_PREFIX:C36 = rotated c36 elastic stiffnesses component
      C41 = 0[Pa]
      DESCR_PREFIX:C41 = rotated c41 elastic stiffnesses component
      C42 = 0[Pa]
      DESCR_PREFIX:C42 = rotated c42 elastic stiffnesses component
      C43 = 0[Pa]
      DESCR_PREFIX:C43 = rotated c43 elastic stiffnesses component
      C44 = 0.5*(C11-C12)
      DESCR_PREFIX:C44 = rotated c44 elastic stiffnesses component
      C45 = 0[Pa]
      DESCR_PREFIX:C45 = rotated c45 elastic stiffnesses component
      C46 = 0[Pa]
      DESCR_PREFIX:C46 = rotated c46 elastic stiffnesses component
      C51 = 0[Pa]
      DESCR_PREFIX:C51 = rotated c51 elastic stiffnesses component
      C52 = 0[Pa]
      DESCR_PREFIX:C52 = rotated c52 elastic stiffnesses component
      C53 = 0[Pa]
      DESCR_PREFIX:C53 = rotated c53 elastic stiffnesses component
      C54 = 0[Pa]
      DESCR_PREFIX:C54 = rotated c54 elastic stiffnesses component
      C55 = 0.5*(C11-C12)
      DESCR_PREFIX:C55 = rotated c55 elastic stiffnesses component
      C56 = 0[Pa]
      DESCR_PREFIX:C56 = rotated c56 elastic stiffnesses component
      C61 = 0[Pa]
      DESCR_PREFIX:C61 = rotated c61 elastic stiffnesses component
      C62 = 0[Pa]
      DESCR_PREFIX:C62 = rotated c62 elastic stiffnesses component
      C63 = 0[Pa]
      DESCR_PREFIX:C63 = rotated c63 elastic stiffnesses component
      C64 = 0[Pa]
      DESCR_PREFIX:C64 = rotated c64 elastic stiffnesses component
      C65 = 0[Pa]
      DESCR_PREFIX:C65 = rotated c65 elastic stiffnesses component
      C66 = 0.5*(C11-C12)
      DESCR_PREFIX:C66 = rotated c66 elastic stiffnesses component
  mat3: Common "Lithium Niobate (LiNbO3, LN) - Caique" on domains 6, 11, 16, 21, 26, 31, 36, 41, 46, 51, 56, 61, 66, 71, 76, 81
    def "Basic"
      density = 4643[kg/m^3]
      electricconductivity = 0
      relpermeability = 1
      p11 = -0.026
      DESCR_PREFIX:p11 = (measured) p11, photoelastic tensor component
      p12 = 0.088
      DESCR_PREFIX:p12 = (measured) p12, photoelastic tensor component
      p13 = 0.134
      DESCR_PREFIX:p13 = (measured) p13, photoelastic tensor component
      p14 = -0.083
      DESCR_PREFIX:p14 = (measured) p14, photoelastic tensor component
      p15 = 0
      DESCR_PREFIX:p15 = p15, photoelastic tensor component
      p16 = 0
      DESCR_PREFIX:p16 = p16, photoelastic tensor component
      p21 = p12
      DESCR_PREFIX:p21 = p21, photoelastic tensor component
      p22 = p11
      DESCR_PREFIX:p22 = p22, photoelastic tensor component
      p23 = p13
      DESCR_PREFIX:p23 = p23, photoelastic tensor component
      p24 = -p14
      DESCR_PREFIX:p24 = p24, photoelastic tensor component
      p25 = 0
      DESCR_PREFIX:p25 = p25, photoelastic tensor component
      p26 = 0
      DESCR_PREFIX:p26 = p26, photoelastic tensor component
      p31 = 0.177
      DESCR_PREFIX:p31 = (measured) p31, photoelastic tensor component
      p32 = p31
      DESCR_PREFIX:p32 = p32, photoelastic tensor component
      p33 = 0.07
      DESCR_PREFIX:p33 = (measured) p33, photoelastic tensor component
      p34 = 0
      DESCR_PREFIX:p34 = p34, photoelastic tensor component
      p35 = 0
      DESCR_PREFIX:p35 = p35, photoelastic tensor component
      p36 = 0
      DESCR_PREFIX:p36 = p36, photoelastic tensor component
      p41 = -0.151
      DESCR_PREFIX:p41 = (measured) p41, photoelastic tensor component
      p42 = -p41
      DESCR_PREFIX:p42 = p42, photoelastic tensor component
      p43 = 0
      DESCR_PREFIX:p43 = p43, photoelastic tensor component
      p44 = 0.145
      DESCR_PREFIX:p44 = (measured) p44, photoelastic tensor component
      p45 = 0
      DESCR_PREFIX:p45 = p45, photoelastic tensor component
      p46 = 0
      DESCR_PREFIX:p46 = p46, photoelastic tensor component
      p51 = 0
      DESCR_PREFIX:p51 = p51, photoelastic tensor component
      p52 = 0
      DESCR_PREFIX:p52 = p52, photoelastic tensor component
      p53 = 0
      DESCR_PREFIX:p53 = p53, photoelastic tensor component
      p54 = 0
      DESCR_PREFIX:p54 = p54, photoelastic tensor component
      p55 = p44
      DESCR_PREFIX:p55 = p55, photoelastic tensor component
      p56 = p41
      DESCR_PREFIX:p56 = p56, photoelastic tensor component
      p61 = 0
      DESCR_PREFIX:p61 = p61, photoelastic tensor component
      p62 = 0
      DESCR_PREFIX:p62 = p62, photoelastic tensor component
      p63 = 0
      DESCR_PREFIX:p63 = p63, photoelastic tensor component
      p64 = 0
      DESCR_PREFIX:p64 = p64, photoelastic tensor component
      p65 = p14
      DESCR_PREFIX:p65 = p65, photoelastic tensor component
      p66 = 0.5*(p11 - p12)
      DESCR_PREFIX:p66 = p66, photoelastic tensor component
      relpermittivity = {epsr11, epsr21, epsr31, epsr12, epsr22, epsr32, epsr13, epsr23, epsr33}
      P11 = p11*cos(Ry_LN)^4 - 2*(p14 + p41)*cos(Rx_LN)*cos(Ry_LN)^3*sin(Ry_LN)*sin(3*Rz_LN) + 6*(p14 + p41)*cos(Rx_LN)*cos(Ry_LN)*sin(Rx_LN)^2*sin(Ry_LN)^3*sin(3*Rz_LN) + (cos(Ry_LN)^2*sin(Ry_LN)^2*(2*p11 + p13 + p31 + 4*p44 + (-2*p11 + p13 + p31 + 4*p44)*cos(2*Rx_LN) + 3*(p14 + p41)*sin(2*Rx_LN - 3*Rz_LN) + 3*p14*sin(2*Rx_LN + 3*Rz_LN) + 3*p41*sin(2*Rx_LN + 3*Rz_LN)))/2. + (sin(Ry_LN)^4*(3*p11 + p13 + p31 + 3*p33 + 4*p44 - 4*(p11 - p33)*cos(2*Rx_LN) + (p11 - p13 - p31 + p33 - 4*p44)*cos(4*Rx_LN) - 2*p14*sin(2*Rx_LN - 3*Rz_LN) - 2*p41*sin(2*Rx_LN - 3*Rz_LN) + p14*sin(4*Rx_LN - 3*Rz_LN) + p41*sin(4*Rx_LN - 3*Rz_LN) - 2*p14*sin(2*Rx_LN + 3*Rz_LN) - 2*p41*sin(2*Rx_LN + 3*Rz_LN) + p14*sin(4*Rx_LN + 3*Rz_LN) + p41*sin(4*Rx_LN + 3*Rz_LN)))/8.
      DESCR_PREFIX:P11 = rotated p11 photoelastic tensor component
      P12 = (cos(Rx_LN)^2*(2*p11 + 4*p12 - 8*p44 - 2*(p11 - 4*p44)*cos(2*Rx_LN) + (p11 - 4*p44)*cos(2*(Rx_LN - Ry_LN)) - 2*p11*cos(2*Ry_LN) + 4*p12*cos(2*Ry_LN) + 8*p44*cos(2*Ry_LN) + p11*cos(2*(Rx_LN + Ry_LN)) - 4*p44*cos(2*(Rx_LN + Ry_LN))))/8. + p31*cos(Rx_LN)^4*sin(Ry_LN)^2 + (sin(Rx_LN)^2*(2*p13*cos(Ry_LN)^2 + (p13 + p33 + (-p13 + p33)*cos(2*Rx_LN))*sin(Ry_LN)^2))/2. - 2*p41*cos(Rx_LN)^3*sin(Ry_LN)*(cos(Rz_LN)^3*sin(Rx_LN)*sin(Ry_LN) - 3*cos(Ry_LN)*cos(Rz_LN)^2*sin(Rz_LN) - 3*cos(Rz_LN)*sin(Rx_LN)*sin(Ry_LN)*sin(Rz_LN)^2 + cos(Ry_LN)*sin(Rz_LN)^3) - 2*p14*cos(Rx_LN)*sin(Rx_LN)*(cos(Ry_LN)^2*cos(3*Rz_LN) + sin(Rx_LN)*(-(cos(Rz_LN)*(-1 + 2*cos(2*Rz_LN))*sin(Rx_LN)*sin(Ry_LN)^2) + sin(2*Ry_LN)*sin(3*Rz_LN)))
      DESCR_PREFIX:P12 = rotated p12 photoelastic tensor component
      P13 = cos(Rx_LN)^2*cos(Ry_LN)^2*(p13*cos(Ry_LN)^2 + ((p13 + p33 + (-p13 + p33)*cos(2*Rx_LN))*sin(Ry_LN)^2)/2.) + 4*cos(Rx_LN)*cos(Ry_LN)*(p44*cos(Rx_LN)*sin(Ry_LN) + p14*cos(Rz_LN)*sin(Rx_LN)*sin(Ry_LN) - p14*cos(Ry_LN)*sin(Rz_LN))*(-(cos(Rz_LN)*sin(Ry_LN)) + cos(Ry_LN)*sin(Rx_LN)*sin(Rz_LN))*(cos(Ry_LN)*cos(Rz_LN) + sin(Rx_LN)*sin(Ry_LN)*sin(Rz_LN)) + 2*cos(Rx_LN)*cos(Ry_LN)*(cos(Ry_LN)*cos(Rz_LN)*sin(Rx_LN) + sin(Ry_LN)*sin(Rz_LN))*(p14*cos(Ry_LN)^2*cos(2*Rz_LN) + sin(Rx_LN)*(2*p44*cos(Rx_LN)*cos(Rz_LN) - p14*cos(2*Rz_LN)*sin(Rx_LN))*sin(Ry_LN)^2 - 2*cos(Ry_LN)*(p44*cos(Rx_LN) - 2*p14*cos(Rz_LN)*sin(Rx_LN))*sin(Ry_LN)*sin(Rz_LN)) + 2*(-(cos(Rz_LN)*sin(Ry_LN)) + cos(Ry_LN)*sin(Rx_LN)*sin(Rz_LN))*(cos(Ry_LN)*cos(Rz_LN)*sin(Rx_LN) + sin(Ry_LN)*sin(Rz_LN))*(cos(Ry_LN)*cos(Rz_LN) + sin(Rx_LN)*sin(Ry_LN)*sin(Rz_LN))*(2*p41*cos(Rx_LN)*sin(Ry_LN) + (p11 - p12)*(cos(Rz_LN)*sin(Rx_LN)*sin(Ry_LN) - cos(Ry_LN)*sin(Rz_LN))) + (cos(Rz_LN)*sin(Ry_LN) - cos(Ry_LN)*sin(Rx_LN)*sin(Rz_LN))^2*(p31*cos(Rx_LN)^2*sin(Ry_LN)^2 + 2*p41*cos(Rx_LN)*sin(Ry_LN)*(cos(Rz_LN)*sin(Rx_LN)*sin(Ry_LN) - cos(Ry_LN)*sin(Rz_LN)) + p12*(cos(Rz_LN)*sin(Rx_LN)*sin(Ry_LN) - cos(Ry_LN)*sin(Rz_LN))^2 + p11*(cos(Ry_LN)*cos(Rz_LN) + sin(Rx_LN)*sin(Ry_LN)*sin(Rz_LN))^2) + (cos(Ry_LN)*cos(Rz_LN)*sin(Rx_LN) + sin(Ry_LN)*sin(Rz_LN))^2*(p31*cos(Rx_LN)^2*sin(Ry_LN)^2 - 2*p41*cos(Rx_LN)*sin(Ry_LN)*(cos(Rz_LN)*sin(Rx_LN)*sin(Ry_LN) - cos(Ry_LN)*sin(Rz_LN)) + p11*(cos(Rz_LN)*sin(Rx_LN)*sin(Ry_LN) - cos(Ry_LN)*sin(Rz_LN))^2 + p12*(cos(Ry_LN)*cos(Rz_LN) + sin(Rx_LN)*sin(Ry_LN)*sin(Rz_LN))^2)
      DESCR_PREFIX:P13 = rotated p13 photoelastic tensor component
      P14 = -(cos(Rx_LN)*cos(Ry_LN)*sin(Rx_LN)*(p13*cos(Ry_LN)^2 + ((p13 + p33 + (-p13 + p33)*cos(2*Rx_LN))*sin(Ry_LN)^2)/2.)) + 2*(p44*cos(Rx_LN)*sin(Ry_LN) + p14*cos(Rz_LN)*sin(Rx_LN)*sin(Ry_LN) - p14*cos(Ry_LN)*sin(Rz_LN))*(cos(Rz_LN)*sin(Rx_LN)*sin(Ry_LN) + cos(2*Rx_LN)*cos(Ry_LN)*sin(Rz_LN))*(cos(Ry_LN)*cos(Rz_LN) + sin(Rx_LN)*sin(Ry_LN)*sin(Rz_LN)) + (p14*cos(Ry_LN)^2*cos(2*Rz_LN) + sin(Rx_LN)*(2*p44*cos(Rx_LN)*cos(Rz_LN) - p14*cos(2*Rz_LN)*sin(Rx_LN))*sin(Ry_LN)^2 - 2*cos(Ry_LN)*(p44*cos(Rx_LN) - 2*p14*cos(Rz_LN)*sin(Rx_LN))*sin(Ry_LN)*sin(Rz_LN))*(cos(Rx_LN)^2*cos(Ry_LN)*cos(Rz_LN) - sin(Rx_LN)*(cos(Ry_LN)*cos(Rz_LN)*sin(Rx_LN) + sin(Ry_LN)*sin(Rz_LN))) + cos(Rx_LN)*sin(Rz_LN)*(-(cos(Rz_LN)*sin(Ry_LN)) + cos(Ry_LN)*sin(Rx_LN)*sin(Rz_LN))*(p31*cos(Rx_LN)^2*sin(Ry_LN)^2 + 2*p41*cos(Rx_LN)*sin(Ry_LN)*(cos(Rz_LN)*sin(Rx_LN)*sin(Ry_LN) - cos(Ry_LN)*sin(Rz_LN)) + p12*(cos(Rz_LN)*sin(Rx_LN)*sin(Ry_LN) - cos(Ry_LN)*sin(Rz_LN))^2 + p11*(cos(Ry_LN)*cos(Rz_LN) + sin(Rx_LN)*sin(Ry_LN)*sin(Rz_LN))^2) + cos(Rx_LN)*cos(Rz_LN)*(cos(Ry_LN)*cos(Rz_LN)*sin(Rx_LN) + sin(Ry_LN)*sin(Rz_LN))*(p31*cos(Rx_LN)^2*sin(Ry_LN)^2 - 2*p41*cos(Rx_LN)*sin(Ry_LN)*(cos(Rz_LN)*sin(Rx_LN)*sin(Ry_LN) - cos(Ry_LN)*sin(Rz_LN)) + p11*(cos(Rz_LN)*sin(Rx_LN)*sin(Ry_LN) - cos(Ry_LN)*sin(Rz_LN))^2 + p12*(cos(Ry_LN)*cos(Rz_LN) + sin(Rx_LN)*sin(Ry_LN)*sin(Rz_LN))^2) + cos(Rx_LN)*(cos(Ry_LN)*cos(Rz_LN) + sin(Rx_LN)*sin(Ry_LN)*sin(Rz_LN))*(2*p41*cos(Rx_LN)*sin(Ry_LN) + (p11 - p12)*(cos(Rz_LN)*sin(Rx_LN)*sin(Ry_LN) - cos(Ry_LN)*sin(Rz_LN)))*(-(cos(Rz_LN)^2*sin(Ry_LN)) + sin(Ry_LN)*sin(Rz_LN)^2 + cos(Ry_LN)*sin(Rx_LN)*sin(2*Rz_LN))
      DESCR_PREFIX:P14 = rotated p14 photoelastic tensor component
      P15 = cos(Rx_LN)^2*cos(Ry_LN)*sin(Ry_LN)*(p13*cos(Ry_LN)^2 + ((p13 + p33 + (-p13 + p33)*cos(2*Rx_LN))*sin(Ry_LN)^2)/2.) + cos(Rx_LN)*(cos(Rz_LN)*sin(Rx_LN)*sin(2*Ry_LN) - cos(2*Ry_LN)*sin(Rz_LN))*(p14*cos(Ry_LN)^2*cos(2*Rz_LN) + sin(Rx_LN)*(2*p44*cos(Rx_LN)*cos(Rz_LN) - p14*cos(2*Rz_LN)*sin(Rx_LN))*sin(Ry_LN)^2 - 2*cos(Ry_LN)*(p44*cos(Rx_LN) - 2*p14*cos(Rz_LN)*sin(Rx_LN))*sin(Ry_LN)*sin(Rz_LN)) + 2*cos(Rx_LN)*(p44*cos(Rx_LN)*sin(Ry_LN) + p14*cos(Rz_LN)*sin(Rx_LN)*sin(Ry_LN) - p14*cos(Ry_LN)*sin(Rz_LN))*(cos(Ry_LN)*cos(Rz_LN) + sin(Rx_LN)*sin(Ry_LN)*sin(Rz_LN))*(cos(Ry_LN)^2*cos(Rz_LN) - cos(Rz_LN)*sin(Ry_LN)^2 + sin(Rx_LN)*sin(2*Ry_LN)*sin(Rz_LN)) + (-(cos(Rz_LN)*sin(Ry_LN)) + cos(Ry_LN)*sin(Rx_LN)*sin(Rz_LN))*(cos(Ry_LN)*cos(Rz_LN) + sin(Rx_LN)*sin(Ry_LN)*sin(Rz_LN))*(p31*cos(Rx_LN)^2*sin(Ry_LN)^2 + 2*p41*cos(Rx_LN)*sin(Ry_LN)*(cos(Rz_LN)*sin(Rx_LN)*sin(Ry_LN) - cos(Ry_LN)*sin(Rz_LN)) + p12*(cos(Rz_LN)*sin(Rx_LN)*sin(Ry_LN) - cos(Ry_LN)*sin(Rz_LN))^2 + p11*(cos(Ry_LN)*cos(Rz_LN) + sin(Rx_LN)*sin(Ry_LN)*sin(Rz_LN))^2) + (cos(Rz_LN)*sin(Rx_LN)*sin(Ry_LN) - cos(Ry_LN)*sin(Rz_LN))*(cos(Ry_LN)*cos(Rz_LN)*sin(Rx_LN) + sin(Ry_LN)*sin(Rz_LN))*(p31*cos(Rx_LN)^2*sin(Ry_LN)^2 - 2*p41*cos(Rx_LN)*sin(Ry_LN)*(cos(Rz_LN)*sin(Rx_LN)*sin(Ry_LN) - cos(Ry_LN)*sin(Rz_LN)) + p11*(cos(Rz_LN)*sin(Rx_LN)*sin(Ry_LN) - cos(Ry_LN)*sin(Rz_LN))^2 + p12*(cos(Ry_LN)*cos(Rz_LN) + sin(Rx_LN)*sin(Ry_LN)*sin(Rz_LN))^2) + (cos(Ry_LN)*cos(Rz_LN) + sin(Rx_LN)*sin(Ry_LN)*sin(Rz_LN))*(2*p41*cos(Rx_LN)*sin(Ry_LN) + (p11 - p12)*(cos(Rz_LN)*sin(Rx_LN)*sin(Ry_LN) - cos(Ry_LN)*sin(Rz_LN)))*(cos(Ry_LN)^2*cos(2*Rz_LN)*sin(Rx_LN) - cos(2*Rz_LN)*sin(Rx_LN)*sin(Ry_LN)^2 - ((-3 + cos(2*Rx_LN))*sin(2*Ry_LN)*sin(2*Rz_LN))/4.)
      DESCR_PREFIX:P15 = rotated p15 photoelastic tensor component
      P16 = -(cos(Rx_LN)*sin(Rx_LN)*sin(Ry_LN)*(p13*cos(Ry_LN)^2 + ((p13 + p33 + (-p13 + p33)*cos(2*Rx_LN))*sin(Ry_LN)^2)/2.)) + 2*(p44*cos(Rx_LN)*sin(Ry_LN) + p14*cos(Rz_LN)*sin(Rx_LN)*sin(Ry_LN) - p14*cos(Ry_LN)*sin(Rz_LN))*(-(cos(Ry_LN)*cos(Rz_LN)*sin(Rx_LN)) + cos(2*Rx_LN)*sin(Ry_LN)*sin(Rz_LN))*(cos(Ry_LN)*cos(Rz_LN) + sin(Rx_LN)*sin(Ry_LN)*sin(Rz_LN)) + (p14*cos(Ry_LN)^2*cos(2*Rz_LN) + sin(Rx_LN)*(2*p44*cos(Rx_LN)*cos(Rz_LN) - p14*cos(2*Rz_LN)*sin(Rx_LN))*sin(Ry_LN)^2 - 2*cos(Ry_LN)*(p44*cos(Rx_LN) - 2*p14*cos(Rz_LN)*sin(Rx_LN))*sin(Ry_LN)*sin(Rz_LN))*(cos(Rx_LN)^2*cos(Rz_LN)*sin(Ry_LN) + sin(Rx_LN)*(-(cos(Rz_LN)*sin(Rx_LN)*sin(Ry_LN)) + cos(Ry_LN)*sin(Rz_LN))) + cos(Rx_LN)*sin(Rz_LN)*(cos(Ry_LN)*cos(Rz_LN) + sin(Rx_LN)*sin(Ry_LN)*sin(Rz_LN))*(p31*cos(Rx_LN)^2*sin(Ry_LN)^2 + 2*p41*cos(Rx_LN)*sin(Ry_LN)*(cos(Rz_LN)*sin(Rx_LN)*sin(Ry_LN) - cos(Ry_LN)*sin(Rz_LN)) + p12*(cos(Rz_LN)*sin(Rx_LN)*sin(Ry_LN) - cos(Ry_LN)*sin(Rz_LN))^2 + p11*(cos(Ry_LN)*cos(Rz_LN) + sin(Rx_LN)*sin(Ry_LN)*sin(Rz_LN))^2) + cos(Rx_LN)*cos(Rz_LN)*(cos(Rz_LN)*sin(Rx_LN)*sin(Ry_LN) - cos(Ry_LN)*sin(Rz_LN))*(p31*cos(Rx_LN)^2*sin(Ry_LN)^2 - 2*p41*cos(Rx_LN)*sin(Ry_LN)*(cos(Rz_LN)*sin(Rx_LN)*sin(Ry_LN) - cos(Ry_LN)*sin(Rz_LN)) + p11*(cos(Rz_LN)*sin(Rx_LN)*sin(Ry_LN) - cos(Ry_LN)*sin(Rz_LN))^2 + p12*(cos(Ry_LN)*cos(Rz_LN) + sin(Rx_LN)*sin(Ry_LN)*sin(Rz_LN))^2) + cos(Rx_LN)*(cos(Ry_LN)*cos(Rz_LN) + sin(Rx_LN)*sin(Ry_LN)*sin(Rz_LN))*(2*p41*cos(Rx_LN)*sin(Ry_LN) + (p11 - p12)*(cos(Rz_LN)*sin(Rx_LN)*sin(Ry_LN) - cos(Ry_LN)*sin(Rz_LN)))*(cos(Ry_LN)*cos(2*Rz_LN) + sin(Rx_LN)*sin(Ry_LN)*sin(2*Rz_LN))
      DESCR_PREFIX:P16 = rotated p16 photoelastic tensor component
      P21 = p31*sin(Rx_LN)^4*sin(Ry_LN)^2 + (cos(Rx_LN)^2*(2*p12*cos(Ry_LN)^2 + (p11 + p13 + p33 - 4*p44 - (p11 - p13 + p33 - 4*p44)*cos(2*Rx_LN))*sin(Ry_LN)^2))/2. + cos(Ry_LN)^2*(p31*cos(Rz_LN)^2*sin(Rx_LN)^2 + p31*sin(Rx_LN)^2*sin(Rz_LN)^2 + p41*cos(Rz_LN)*sin(2*Rx_LN)*sin(Rz_LN)^2) - 2*p14*cos(Rx_LN)^3*sin(Ry_LN)*(cos(Rz_LN)^3*sin(Rx_LN)*sin(Ry_LN) - 3*cos(Ry_LN)*cos(Rz_LN)^2*sin(Rz_LN) - 3*cos(Rz_LN)*sin(Rx_LN)*sin(Ry_LN)*sin(Rz_LN)^2 + cos(Ry_LN)*sin(Rz_LN)^3) - (p41*cos(Rx_LN)*sin(Rx_LN)*(cos(Ry_LN)^2*(cos(Rz_LN) + 3*cos(3*Rz_LN)) + 4*sin(Rx_LN)*(-(cos(Rz_LN)^3*sin(Rx_LN)*sin(Ry_LN)^2) + 3*cos(Rz_LN)*sin(Rx_LN)*sin(Ry_LN)^2*sin(Rz_LN)^2 + sin(2*Ry_LN)*sin(3*Rz_LN))))/2.
      DESCR_PREFIX:P21 = rotated p21 photoelastic tensor component
      P22 = (3*p11 + p13 + p31 + 3*p33 + 4*p44 + 4*(p11 - p33)*cos(2*Rx_LN) + (p11 - p13 - p31 + p33 - 4*p44)*cos(4*Rx_LN) + 2*p14*sin(2*Rx_LN - 3*Rz_LN) + 2*p41*sin(2*Rx_LN - 3*Rz_LN) + p14*sin(4*Rx_LN - 3*Rz_LN) + p41*sin(4*Rx_LN - 3*Rz_LN) + 2*p14*sin(2*Rx_LN + 3*Rz_LN) + 2*p41*sin(2*Rx_LN + 3*Rz_LN) + p14*sin(4*Rx_LN + 3*Rz_LN) + p41*sin(4*Rx_LN + 3*Rz_LN))/8.
      DESCR_PREFIX:P22 = rotated p22 photoelastic tensor component
      P23 = p31*cos(Ry_LN)^2*sin(Rx_LN)^4 - (cos(Rx_LN)^2*((-p11 - p13 - p33 + 4*p44 + (p11 - p13 + p33 - 4*p44)*cos(2*Rx_LN))*cos(Ry_LN)^2 - 2*p12*sin(Ry_LN)^2))/2. - 2*p14*cos(Rx_LN)^3*cos(Ry_LN)*(cos(Ry_LN)*cos(3*Rz_LN)*sin(Rx_LN) + (1 + 2*cos(2*Rz_LN))*sin(Ry_LN)*sin(Rz_LN)) + sin(Ry_LN)^2*(p31*cos(Rz_LN)^2*sin(Rx_LN)^2 + p31*sin(Rx_LN)^2*sin(Rz_LN)^2 + p41*cos(Rz_LN)*sin(2*Rx_LN)*sin(Rz_LN)^2) + 2*p41*cos(Rx_LN)*sin(Rx_LN)*(cos(Ry_LN)^2*cos(3*Rz_LN)*sin(Rx_LN)^2 - ((cos(Rz_LN) + 3*cos(3*Rz_LN))*sin(Ry_LN)^2)/4. + sin(Rx_LN)*sin(2*Ry_LN)*sin(3*Rz_LN))
      DESCR_PREFIX:P23 = rotated p23 photoelastic tensor component
      P24 = cos(Rx_LN)*(-(p14*cos(Rx_LN)^3*cos(Ry_LN)*cos(3*Rz_LN)) + (p11 - p13 - 2*p44)*cos(Rx_LN)^2*cos(Ry_LN)*sin(Rx_LN) + (p31 - p33 + 2*p44)*cos(Ry_LN)*sin(Rx_LN)^3 + ((p14 + 2*p41)*sin(2*Rx_LN)*(cos(Ry_LN)*cos(3*Rz_LN)*sin(Rx_LN) + (1 + 2*cos(2*Rz_LN))*sin(Ry_LN)*sin(Rz_LN)))/2.)
      DESCR_PREFIX:P24 = rotated p24 photoelastic tensor component
      P25 = (cos(Rx_LN)^2*(p13 + p33 + (p13 - p33)*cos(2*Rx_LN))*sin(2*Ry_LN))/4. + cos(Rx_LN)^2*(p14*cos(Rx_LN)*cos(2*Rz_LN) + 2*p44*cos(Rz_LN)*sin(Rx_LN))*(-2*cos(Ry_LN)*cos(Rz_LN)*sin(Rx_LN)*sin(Ry_LN) + cos(Ry_LN)^2*sin(Rz_LN) - sin(Ry_LN)^2*sin(Rz_LN)) + 2*cos(Rx_LN)^2*(p14*cos(Rx_LN)*cos(Rz_LN) - p44*sin(Rx_LN))*sin(Rz_LN)*(cos(Ry_LN)^2*cos(Rz_LN) - cos(Rz_LN)*sin(Ry_LN)^2 + sin(Rx_LN)*sin(2*Ry_LN)*sin(Rz_LN)) + (-(cos(Rz_LN)*sin(Ry_LN)) + cos(Ry_LN)*sin(Rx_LN)*sin(Rz_LN))*(cos(Ry_LN)*cos(Rz_LN) + sin(Rx_LN)*sin(Ry_LN)*sin(Rz_LN))*(-2*p41*cos(Rx_LN)*cos(Rz_LN)*sin(Rx_LN) + p31*sin(Rx_LN)^2 + cos(Rx_LN)^2*(p12*cos(Rz_LN)^2 + p11*sin(Rz_LN)^2)) + (cos(Rz_LN)*sin(Rx_LN)*sin(Ry_LN) - cos(Ry_LN)*sin(Rz_LN))*(cos(Ry_LN)*cos(Rz_LN)*sin(Rx_LN) + sin(Ry_LN)*sin(Rz_LN))*(p31*sin(Rx_LN)^2 + p41*cos(Rz_LN)*sin(2*Rx_LN) + cos(Rx_LN)^2*(p11*cos(Rz_LN)^2 + p12*sin(Rz_LN)^2)) + cos(Rx_LN)*((p11 - p12)*cos(Rx_LN)*cos(Rz_LN) - 2*p41*sin(Rx_LN))*sin(Rz_LN)*(cos(Ry_LN)^2*cos(2*Rz_LN)*sin(Rx_LN) - cos(2*Rz_LN)*sin(Rx_LN)*sin(Ry_LN)^2 - ((-3 + cos(2*Rx_LN))*sin(2*Ry_LN)*sin(2*Rz_LN))/4.)
      DESCR_PREFIX:P25 = rotated p25 photoelastic tensor component
      P26 = cos(Rx_LN)*(-(p14*cos(Rx_LN)^3*cos(3*Rz_LN)*sin(Ry_LN)) + (p11 - p13 - 2*p44)*cos(Rx_LN)^2*sin(Rx_LN)*sin(Ry_LN) + (p31 - p33 + 2*p44)*sin(Rx_LN)^3*sin(Ry_LN) + p41*cos(Ry_LN)*sin(2*Rx_LN)*sin(Rz_LN)^3 + cos(Rx_LN)*sin(Rx_LN)*((p14 + 2*p41)*cos(Rz_LN)^3*sin(Rx_LN)*sin(Ry_LN) - 3*(p14 + 2*p41)*cos(Ry_LN)*cos(Rz_LN)^2*sin(Rz_LN) - 3*(p14 + 2*p41)*cos(Rz_LN)*sin(Rx_LN)*sin(Ry_LN)*sin(Rz_LN)^2 + p14*cos(Ry_LN)*sin(Rz_LN)^3))
      DESCR_PREFIX:P26 = rotated p26 photoelastic tensor component
      P31 = cos(Rx_LN)^2*(p33*cos(Rx_LN)^2*cos(Ry_LN)^2 - (p13*(-6 + 2*cos(2*Rx_LN) + cos(2*(Rx_LN - Ry_LN)) + 2*cos(2*Ry_LN) + cos(2*(Rx_LN + Ry_LN))))/8.)*sin(Ry_LN)^2 - 4*cos(Rx_LN)*sin(Ry_LN)*(cos(Rz_LN)*sin(Ry_LN) - cos(Ry_LN)*sin(Rx_LN)*sin(Rz_LN))*(p44*cos(Rx_LN)*cos(Ry_LN) + p14*cos(Ry_LN)*cos(Rz_LN)*sin(Rx_LN) + p14*sin(Ry_LN)*sin(Rz_LN))*(cos(Ry_LN)*cos(Rz_LN) + sin(Rx_LN)*sin(Ry_LN)*sin(Rz_LN)) + 2*(cos(Rz_LN)*sin(Rx_LN)*sin(Ry_LN) - cos(Ry_LN)*sin(Rz_LN))*(-(cos(Rz_LN)*sin(Ry_LN)) + cos(Ry_LN)*sin(Rx_LN)*sin(Rz_LN))*(cos(Ry_LN)*cos(Rz_LN) + sin(Rx_LN)*sin(Ry_LN)*sin(Rz_LN))*(2*p41*cos(Rx_LN)*cos(Ry_LN) + (p11 - p12)*(cos(Ry_LN)*cos(Rz_LN)*sin(Rx_LN) + sin(Ry_LN)*sin(Rz_LN))) + (cos(Rz_LN)*sin(Rx_LN)*sin(Ry_LN) - cos(Ry_LN)*sin(Rz_LN))^2*(p31*cos(Rx_LN)^2*cos(Ry_LN)^2 + p12*(cos(Rz_LN)*sin(Ry_LN) - cos(Ry_LN)*sin(Rx_LN)*sin(Rz_LN))^2 - 2*p41*cos(Rx_LN)*cos(Ry_LN)*(cos(Ry_LN)*cos(Rz_LN)*sin(Rx_LN) + sin(Ry_LN)*sin(Rz_LN)) + p11*(cos(Ry_LN)*cos(Rz_LN)*sin(Rx_LN) + sin(Ry_LN)*sin(Rz_LN))^2) + (cos(Ry_LN)*cos(Rz_LN) + sin(Rx_LN)*sin(Ry_LN)*sin(Rz_LN))^2*(p31*cos(Rx_LN)^2*cos(Ry_LN)^2 + p11*(cos(Rz_LN)*sin(Ry_LN) - cos(Ry_LN)*sin(Rx_LN)*sin(Rz_LN))^2 + 2*p41*cos(Rx_LN)*cos(Ry_LN)*(cos(Ry_LN)*cos(Rz_LN)*sin(Rx_LN) + sin(Ry_LN)*sin(Rz_LN)) + p12*(cos(Ry_LN)*cos(Rz_LN)*sin(Rx_LN) + sin(Ry_LN)*sin(Rz_LN))^2) + 2*cos(Rx_LN)*sin(Ry_LN)*(cos(Rz_LN)*sin(Rx_LN)*sin(Ry_LN) - cos(Ry_LN)*sin(Rz_LN))*(p14*(cos(Rz_LN)*sin(Ry_LN) - cos(Ry_LN)*sin(Rx_LN)*sin(Rz_LN))^2 + 2*p44*cos(Rx_LN)*cos(Ry_LN)*(cos(Ry_LN)*cos(Rz_LN)*sin(Rx_LN) + sin(Ry_LN)*sin(Rz_LN)) - p14*(cos(Ry_LN)*cos(Rz_LN)*sin(Rx_LN) + sin(Ry_LN)*sin(Rz_LN))^2)
      DESCR_PREFIX:P31 = rotated p31 photoelastic tensor component
      P32 = p31*cos(Rx_LN)^4*cos(Ry_LN)^2 - (p13*(-6 + 2*cos(2*Rx_LN) + cos(2*(Rx_LN - Ry_LN)) + 2*cos(2*Ry_LN) + cos(2*(Rx_LN + Ry_LN)))*sin(Rx_LN)^2)/8. + cos(Rx_LN)^2*((p11 + p33 - 4*p44)*cos(Ry_LN)^2*sin(Rx_LN)^2 + p12*sin(Ry_LN)^2) - 2*p41*cos(Rx_LN)^3*cos(Ry_LN)*(cos(Ry_LN)*cos(3*Rz_LN)*sin(Rx_LN) + (1 + 2*cos(2*Rz_LN))*sin(Ry_LN)*sin(Rz_LN)) + 2*p14*cos(Rx_LN)*sin(Rx_LN)*(cos(Ry_LN)^2*cos(3*Rz_LN)*sin(Rx_LN)^2 - cos(Rz_LN)*(-1 + 2*cos(2*Rz_LN))*sin(Ry_LN)^2 + sin(Rx_LN)*sin(2*Ry_LN)*sin(3*Rz_LN))
      DESCR_PREFIX:P32 = rotated p32 photoelastic tensor component
      P33 = p33*cos(Rx_LN)^4*cos(Ry_LN)^4 - ((p13 + p31 + 4*p44)*cos(Rx_LN)^2*cos(Ry_LN)^2*(-6 + 2*cos(2*Rx_LN) + cos(2*(Rx_LN - Ry_LN)) + 2*cos(2*Ry_LN) + cos(2*(Rx_LN + Ry_LN))))/8. + (p11*(-6 + 2*cos(2*Rx_LN) + cos(2*(Rx_LN - Ry_LN)) + 2*cos(2*Ry_LN) + cos(2*(Rx_LN + Ry_LN)))^2)/64. - 2*(p14 + p41)*cos(Rx_LN)*cos(Ry_LN)*(cos(Ry_LN)^3*cos(3*Rz_LN)*sin(Rx_LN)^3 - 3*cos(Ry_LN)*cos(3*Rz_LN)*sin(Rx_LN)*sin(Ry_LN)^2 - (1 + 2*cos(2*Rz_LN))*sin(Ry_LN)^3*sin(Rz_LN) + 3*cos(Ry_LN)^2*sin(Rx_LN)^2*sin(Ry_LN)*sin(3*Rz_LN))
      DESCR_PREFIX:P33 = rotated p33 photoelastic tensor component
      P34 = -(cos(Rx_LN)*cos(Ry_LN)*(p33*cos(Rx_LN)^2*cos(Ry_LN)^2 - (p13*(-6 + 2*cos(2*Rx_LN) + cos(2*(Rx_LN - Ry_LN)) + 2*cos(2*Ry_LN) + cos(2*(Rx_LN + Ry_LN))))/8.)*sin(Rx_LN)) - 2*(cos(Rz_LN)*sin(Rx_LN)*sin(Ry_LN) + cos(2*Rx_LN)*cos(Ry_LN)*sin(Rz_LN))*(cos(Rz_LN)*sin(Ry_LN) - cos(Ry_LN)*sin(Rx_LN)*sin(Rz_LN))*(p44*cos(Rx_LN)*cos(Ry_LN) + p14*cos(Ry_LN)*cos(Rz_LN)*sin(Rx_LN) + p14*sin(Ry_LN)*sin(Rz_LN)) + cos(Rx_LN)*cos(Rz_LN)*(cos(Ry_LN)*cos(Rz_LN)*sin(Rx_LN) + sin(Ry_LN)*sin(Rz_LN))*(p31*cos(Rx_LN)^2*cos(Ry_LN)^2 + p12*(cos(Rz_LN)*sin(Ry_LN) - cos(Ry_LN)*sin(Rx_LN)*sin(Rz_LN))^2 - 2*p41*cos(Rx_LN)*cos(Ry_LN)*(cos(Ry_LN)*cos(Rz_LN)*sin(Rx_LN) + sin(Ry_LN)*sin(Rz_LN)) + p11*(cos(Ry_LN)*cos(Rz_LN)*sin(Rx_LN) + sin(Ry_LN)*sin(Rz_LN))^2) + cos(Rx_LN)*sin(Rz_LN)*(-(cos(Rz_LN)*sin(Ry_LN)) + cos(Ry_LN)*sin(Rx_LN)*sin(Rz_LN))*(p31*cos(Rx_LN)^2*cos(Ry_LN)^2 + p11*(cos(Rz_LN)*sin(Ry_LN) - cos(Ry_LN)*sin(Rx_LN)*sin(Rz_LN))^2 + 2*p41*cos(Rx_LN)*cos(Ry_LN)*(cos(Ry_LN)*cos(Rz_LN)*sin(Rx_LN) + sin(Ry_LN)*sin(Rz_LN)) + p12*(cos(Ry_LN)*cos(Rz_LN)*sin(Rx_LN) + sin(Ry_LN)*sin(Rz_LN))^2) + (cos(Rx_LN)^2*cos(Ry_LN)*cos(Rz_LN) - sin(Rx_LN)*(cos(Ry_LN)*cos(Rz_LN)*sin(Rx_LN) + sin(Ry_LN)*sin(Rz_LN)))*(p14*(cos(Rz_LN)*sin(Ry_LN) - cos(Ry_LN)*sin(Rx_LN)*sin(Rz_LN))^2 + 2*p44*cos(Rx_LN)*cos(Ry_LN)*(cos(Ry_LN)*cos(Rz_LN)*sin(Rx_LN) + sin(Ry_LN)*sin(Rz_LN)) - p14*(cos(Ry_LN)*cos(Rz_LN)*sin(Rx_LN) + sin(Ry_LN)*sin(Rz_LN))^2) + cos(Rx_LN)*(-(cos(Rz_LN)*sin(Ry_LN)) + cos(Ry_LN)*sin(Rx_LN)*sin(Rz_LN))*(2*p41*cos(Rx_LN)*cos(Ry_LN) + (p11 - p12)*(cos(Ry_LN)*cos(Rz_LN)*sin(Rx_LN) + sin(Ry_LN)*sin(Rz_LN)))*(-(cos(Rz_LN)^2*sin(Ry_LN)) + sin(Ry_LN)*sin(Rz_LN)^2 + cos(Ry_LN)*sin(Rx_LN)*sin(2*Rz_LN))
      DESCR_PREFIX:P34 = rotated p34 photoelastic tensor component
      P35 = cos(Rx_LN)^2*cos(Ry_LN)*(p33*cos(Rx_LN)^2*cos(Ry_LN)^2 - (p13*(-6 + 2*cos(2*Rx_LN) + cos(2*(Rx_LN - Ry_LN)) + 2*cos(2*Ry_LN) + cos(2*(Rx_LN + Ry_LN))))/8.)*sin(Ry_LN) - 2*cos(Rx_LN)*(cos(Rz_LN)*sin(Ry_LN) - cos(Ry_LN)*sin(Rx_LN)*sin(Rz_LN))*(p44*cos(Rx_LN)*cos(Ry_LN) + p14*cos(Ry_LN)*cos(Rz_LN)*sin(Rx_LN) + p14*sin(Ry_LN)*sin(Rz_LN))*(cos(Ry_LN)^2*cos(Rz_LN) - cos(Rz_LN)*sin(Ry_LN)^2 + sin(Rx_LN)*sin(2*Ry_LN)*sin(Rz_LN)) + (cos(Rz_LN)*sin(Rx_LN)*sin(Ry_LN) - cos(Ry_LN)*sin(Rz_LN))*(cos(Ry_LN)*cos(Rz_LN)*sin(Rx_LN) + sin(Ry_LN)*sin(Rz_LN))*(p31*cos(Rx_LN)^2*cos(Ry_LN)^2 + p12*(cos(Rz_LN)*sin(Ry_LN) - cos(Ry_LN)*sin(Rx_LN)*sin(Rz_LN))^2 - 2*p41*cos(Rx_LN)*cos(Ry_LN)*(cos(Ry_LN)*cos(Rz_LN)*sin(Rx_LN) + sin(Ry_LN)*sin(Rz_LN)) + p11*(cos(Ry_LN)*cos(Rz_LN)*sin(Rx_LN) + sin(Ry_LN)*sin(Rz_LN))^2) + (-(cos(Rz_LN)*sin(Ry_LN)) + cos(Ry_LN)*sin(Rx_LN)*sin(Rz_LN))*(cos(Ry_LN)*cos(Rz_LN) + sin(Rx_LN)*sin(Ry_LN)*sin(Rz_LN))*(p31*cos(Rx_LN)^2*cos(Ry_LN)^2 + p11*(cos(Rz_LN)*sin(Ry_LN) - cos(Ry_LN)*sin(Rx_LN)*sin(Rz_LN))^2 + 2*p41*cos(Rx_LN)*cos(Ry_LN)*(cos(Ry_LN)*cos(Rz_LN)*sin(Rx_LN) + sin(Ry_LN)*sin(Rz_LN)) + p12*(cos(Ry_LN)*cos(Rz_LN)*sin(Rx_LN) + sin(Ry_LN)*sin(Rz_LN))^2) + cos(Rx_LN)*(cos(Rz_LN)*sin(Rx_LN)*sin(2*Ry_LN) - cos(2*Ry_LN)*sin(Rz_LN))*(p14*(cos(Rz_LN)*sin(Ry_LN) - cos(Ry_LN)*sin(Rx_LN)*sin(Rz_LN))^2 + 2*p44*cos(Rx_LN)*cos(Ry_LN)*(cos(Ry_LN)*cos(Rz_LN)*sin(Rx_LN) + sin(Ry_LN)*sin(Rz_LN)) - p14*(cos(Ry_LN)*cos(Rz_LN)*sin(Rx_LN) + sin(Ry_LN)*sin(Rz_LN))^2) + (-(cos(Rz_LN)*sin(Ry_LN)) + cos(Ry_LN)*sin(Rx_LN)*sin(Rz_LN))*(2*p41*cos(Rx_LN)*cos(Ry_LN) + (p11 - p12)*(cos(Ry_LN)*cos(Rz_LN)*sin(Rx_LN) + sin(Ry_LN)*sin(Rz_LN)))*(cos(Ry_LN)^2*cos(2*Rz_LN)*sin(Rx_LN) - cos(2*Rz_LN)*sin(Rx_LN)*sin(Ry_LN)^2 - ((-3 + cos(2*Rx_LN))*sin(2*Ry_LN)*sin(2*Rz_LN))/4.)
      DESCR_PREFIX:P35 = rotated p35 photoelastic tensor component
      P36 = -(cos(Rx_LN)*(p33*cos(Rx_LN)^2*cos(Ry_LN)^2 - (p13*(-6 + 2*cos(2*Rx_LN) + cos(2*(Rx_LN - Ry_LN)) + 2*cos(2*Ry_LN) + cos(2*(Rx_LN + Ry_LN))))/8.)*sin(Rx_LN)*sin(Ry_LN)) + 2*(cos(Rz_LN)*sin(Ry_LN) - cos(Ry_LN)*sin(Rx_LN)*sin(Rz_LN))*(p44*cos(Rx_LN)*cos(Ry_LN) + p14*cos(Ry_LN)*cos(Rz_LN)*sin(Rx_LN) + p14*sin(Ry_LN)*sin(Rz_LN))*(cos(Ry_LN)*cos(Rz_LN)*sin(Rx_LN) - cos(2*Rx_LN)*sin(Ry_LN)*sin(Rz_LN)) + cos(Rx_LN)*cos(Rz_LN)*(cos(Rz_LN)*sin(Rx_LN)*sin(Ry_LN) - cos(Ry_LN)*sin(Rz_LN))*(p31*cos(Rx_LN)^2*cos(Ry_LN)^2 + p12*(cos(Rz_LN)*sin(Ry_LN) - cos(Ry_LN)*sin(Rx_LN)*sin(Rz_LN))^2 - 2*p41*cos(Rx_LN)*cos(Ry_LN)*(cos(Ry_LN)*cos(Rz_LN)*sin(Rx_LN) + sin(Ry_LN)*sin(Rz_LN)) + p11*(cos(Ry_LN)*cos(Rz_LN)*sin(Rx_LN) + sin(Ry_LN)*sin(Rz_LN))^2) + cos(Rx_LN)*sin(Rz_LN)*(cos(Ry_LN)*cos(Rz_LN) + sin(Rx_LN)*sin(Ry_LN)*sin(Rz_LN))*(p31*cos(Rx_LN)^2*cos(Ry_LN)^2 + p11*(cos(Rz_LN)*sin(Ry_LN) - cos(Ry_LN)*sin(Rx_LN)*sin(Rz_LN))^2 + 2*p41*cos(Rx_LN)*cos(Ry_LN)*(cos(Ry_LN)*cos(Rz_LN)*sin(Rx_LN) + sin(Ry_LN)*sin(Rz_LN)) + p12*(cos(Ry_LN)*cos(Rz_LN)*sin(Rx_LN) + sin(Ry_LN)*sin(Rz_LN))^2) + (cos(Rx_LN)^2*cos(Rz_LN)*sin(Ry_LN) + sin(Rx_LN)*(-(cos(Rz_LN)*sin(Rx_LN)*sin(Ry_LN)) + cos(Ry_LN)*sin(Rz_LN)))*(p14*(cos(Rz_LN)*sin(Ry_LN) - cos(Ry_LN)*sin(Rx_LN)*sin(Rz_LN))^2 + 2*p44*cos(Rx_LN)*cos(Ry_LN)*(cos(Ry_LN)*cos(Rz_LN)*sin(Rx_LN) + sin(Ry_LN)*sin(Rz_LN)) - p14*(cos(Ry_LN)*cos(Rz_LN)*sin(Rx_LN) + sin(Ry_LN)*sin(Rz_LN))^2) + cos(Rx_LN)*(-(cos(Rz_LN)*sin(Ry_LN)) + cos(Ry_LN)*sin(Rx_LN)*sin(Rz_LN))*(2*p41*cos(Rx_LN)*cos(Ry_LN) + (p11 - p12)*(cos(Ry_LN)*cos(Rz_LN)*sin(Rx_LN) + sin(Ry_LN)*sin(Rz_LN)))*(cos(Ry_LN)*cos(2*Rz_LN) + sin(Rx_LN)*sin(Ry_LN)*sin(2*Rz_LN))
      DESCR_PREFIX:P36 = rotated p36 photoelastic tensor component
      P41 = (p13 - p33)*cos(Rx_LN)^3*cos(Ry_LN)*sin(Rx_LN)*sin(Ry_LN)^2 + 2*(cos(Rz_LN)*sin(Rx_LN)*sin(Ry_LN) - cos(Ry_LN)*sin(Rz_LN))*(cos(Ry_LN)*cos(Rz_LN) + sin(Rx_LN)*sin(Ry_LN)*sin(Rz_LN))*(p41*(cos(Rz_LN)*sin(Rx_LN)*sin(Ry_LN) + cos(2*Rx_LN)*cos(Ry_LN)*sin(Rz_LN)) - ((p11 - p12)*cos(Rx_LN)*(cos(Rz_LN)^2*sin(Ry_LN) - 2*cos(Ry_LN)*cos(Rz_LN)*sin(Rx_LN)*sin(Rz_LN) - sin(Ry_LN)*sin(Rz_LN)^2))/2.) + (cos(Ry_LN)*cos(Rz_LN) + sin(Rx_LN)*sin(Ry_LN)*sin(Rz_LN))^2*(p41*cos(Rx_LN)^2*cos(Ry_LN)*cos(Rz_LN) - p41*sin(Rx_LN)*(cos(Ry_LN)*cos(Rz_LN)*sin(Rx_LN) + sin(Ry_LN)*sin(Rz_LN)) + cos(Rx_LN)*((-p11 + p12)*cos(Rz_LN)*sin(Ry_LN)*sin(Rz_LN) + cos(Ry_LN)*sin(Rx_LN)*(-p31 + p12*cos(Rz_LN)^2 + p11*sin(Rz_LN)^2))) + (cos(Rz_LN)*sin(Rx_LN)*sin(Ry_LN) - cos(Ry_LN)*sin(Rz_LN))^2*(-(p41*cos(Rx_LN)^2*cos(Ry_LN)*cos(Rz_LN)) + p41*sin(Rx_LN)*(cos(Ry_LN)*cos(Rz_LN)*sin(Rx_LN) + sin(Ry_LN)*sin(Rz_LN)) + cos(Rx_LN)*((p11 - p12)*cos(Rz_LN)*sin(Ry_LN)*sin(Rz_LN) + cos(Ry_LN)*sin(Rx_LN)*(-p31 + p11*cos(Rz_LN)^2 + p12*sin(Rz_LN)^2))) + 2*cos(Rx_LN)*sin(Ry_LN)*(cos(Ry_LN)*cos(Rz_LN) + sin(Rx_LN)*sin(Ry_LN)*sin(Rz_LN))*(p44*cos(Rx_LN)^2*cos(Ry_LN)*sin(Rz_LN) + p44*sin(Rx_LN)*(cos(Rz_LN)*sin(Ry_LN) - cos(Ry_LN)*sin(Rx_LN)*sin(Rz_LN)) + p14*cos(Rx_LN)*(-(cos(Rz_LN)^2*sin(Ry_LN)) + sin(Ry_LN)*sin(Rz_LN)^2 + cos(Ry_LN)*sin(Rx_LN)*sin(2*Rz_LN))) + 2*cos(Rx_LN)*sin(Ry_LN)*(cos(Rz_LN)*sin(Rx_LN)*sin(Ry_LN) - cos(Ry_LN)*sin(Rz_LN))*(p44*cos(Rx_LN)^2*cos(Ry_LN)*cos(Rz_LN) - p44*sin(Rx_LN)*(cos(Ry_LN)*cos(Rz_LN)*sin(Rx_LN) + sin(Ry_LN)*sin(Rz_LN)) - p14*cos(Rx_LN)*(cos(Ry_LN)*cos(2*Rz_LN)*sin(Rx_LN) + sin(Ry_LN)*sin(2*Rz_LN)))
      DESCR_PREFIX:P41 = rotated p41 photoelastic tensor component
      P42 = cos(Rx_LN)*(-(p41*cos(Rx_LN)^3*cos(Ry_LN)*cos(3*Rz_LN)) + (p11 - p31 - 2*p44)*cos(Rx_LN)^2*cos(Ry_LN)*sin(Rx_LN) + (p13 - p33 + 2*p44)*cos(Ry_LN)*sin(Rx_LN)^3 + ((2*p14 + p41)*sin(2*Rx_LN)*(cos(Ry_LN)*cos(3*Rz_LN)*sin(Rx_LN) + (1 + 2*cos(2*Rz_LN))*sin(Ry_LN)*sin(Rz_LN)))/2.)
      DESCR_PREFIX:P42 = rotated p42 photoelastic tensor component
      P43 = (p13 - p33 + 2*p44)*cos(Rx_LN)^3*cos(Ry_LN)^3*sin(Rx_LN) - ((p11 - p31 - 2*p44)*cos(Ry_LN)*(-6 + 2*cos(2*Rx_LN) + cos(2*(Rx_LN - Ry_LN)) + 2*cos(2*Ry_LN) + cos(2*(Rx_LN + Ry_LN)))*sin(2*Rx_LN))/16. + (p41*(cos(Ry_LN)*cos(Rz_LN)*sin(Rx_LN) + sin(Ry_LN)*sin(Rz_LN))*(-4*(1 + 2*cos(2*Rz_LN))*sin(Rx_LN)*sin(Ry_LN)^2 + 2*cos(Ry_LN)^2*(2*cos(Rz_LN)^2*sin(Rx_LN)^3 + (-1 + 5*cos(2*Rx_LN))*sin(Rx_LN)*sin(Rz_LN)^2) + (3 - 5*cos(2*Rx_LN))*sin(2*Ry_LN)*sin(2*Rz_LN)))/4. - cos(Rx_LN)^2*cos(Ry_LN)*(cos(Ry_LN)^2*cos(Rz_LN)*(-2*p14 + (4*p14 + p41)*cos(2*Rz_LN))*sin(Rx_LN)^2 - (2*p14 + p41)*cos(Rz_LN)^3*sin(Ry_LN)^2 + (-p14 + p41 + (p14 + p41)*cos(2*Rz_LN))*sin(Rx_LN)*sin(2*Ry_LN)*sin(Rz_LN) + cos(Rz_LN)*((6*p14 + p41)*sin(Ry_LN)^2*sin(Rz_LN)^2 + 3*p14*sin(Rx_LN)*sin(2*Ry_LN)*sin(2*Rz_LN)))
      DESCR_PREFIX:P43 = rotated p43 photoelastic tensor component
      P44 = (-p13 + p33)*cos(Rx_LN)^2*cos(Ry_LN)^2*sin(Rx_LN)^2 + cos(Rx_LN)*sin(Rz_LN)*(-(cos(Rz_LN)*sin(Ry_LN)) + cos(Ry_LN)*sin(Rx_LN)*sin(Rz_LN))*(p41*cos(Rx_LN)^2*cos(Ry_LN)*cos(Rz_LN) - p41*sin(Rx_LN)*(cos(Ry_LN)*cos(Rz_LN)*sin(Rx_LN) + sin(Ry_LN)*sin(Rz_LN)) + cos(Rx_LN)*((-p11 + p12)*cos(Rz_LN)*sin(Ry_LN)*sin(Rz_LN) + cos(Ry_LN)*sin(Rx_LN)*(-p31 + p12*cos(Rz_LN)^2 + p11*sin(Rz_LN)^2))) + cos(Rx_LN)*cos(Rz_LN)*(cos(Ry_LN)*cos(Rz_LN)*sin(Rx_LN) + sin(Ry_LN)*sin(Rz_LN))*(-(p41*cos(Rx_LN)^2*cos(Ry_LN)*cos(Rz_LN)) + p41*sin(Rx_LN)*(cos(Ry_LN)*cos(Rz_LN)*sin(Rx_LN) + sin(Ry_LN)*sin(Rz_LN)) + cos(Rx_LN)*((p11 - p12)*cos(Rz_LN)*sin(Ry_LN)*sin(Rz_LN) + cos(Ry_LN)*sin(Rx_LN)*(-p31 + p11*cos(Rz_LN)^2 + p12*sin(Rz_LN)^2))) + (cos(Rx_LN)*(2*p41*cos(Rx_LN)^2*cos(Ry_LN)*sin(Rz_LN) + 2*p41*sin(Rx_LN)*(cos(Rz_LN)*sin(Ry_LN) - cos(Ry_LN)*sin(Rx_LN)*sin(Rz_LN)) - (p11 - p12)*cos(Rx_LN)*(cos(Rz_LN)^2*sin(Ry_LN) - 2*cos(Ry_LN)*cos(Rz_LN)*sin(Rx_LN)*sin(Rz_LN) - sin(Ry_LN)*sin(Rz_LN)^2))*(-(cos(Rz_LN)^2*sin(Ry_LN)) + sin(Ry_LN)*sin(Rz_LN)^2 + cos(Ry_LN)*sin(Rx_LN)*sin(2*Rz_LN)))/2. + (cos(Rz_LN)*sin(Rx_LN)*sin(Ry_LN) + cos(2*Rx_LN)*cos(Ry_LN)*sin(Rz_LN))*(p44*cos(Rx_LN)^2*cos(Ry_LN)*sin(Rz_LN) + p44*sin(Rx_LN)*(cos(Rz_LN)*sin(Ry_LN) - cos(Ry_LN)*sin(Rx_LN)*sin(Rz_LN)) + p14*cos(Rx_LN)*(-(cos(Rz_LN)^2*sin(Ry_LN)) + sin(Ry_LN)*sin(Rz_LN)^2 + cos(Ry_LN)*sin(Rx_LN)*sin(2*Rz_LN))) + (cos(Rx_LN)^2*cos(Ry_LN)*cos(Rz_LN) - sin(Rx_LN)*(cos(Ry_LN)*cos(Rz_LN)*sin(Rx_LN) + sin(Ry_LN)*sin(Rz_LN)))*(p44*cos(Rx_LN)^2*cos(Ry_LN)*cos(Rz_LN) - p44*sin(Rx_LN)*(cos(Ry_LN)*cos(Rz_LN)*sin(Rx_LN) + sin(Ry_LN)*sin(Rz_LN)) - p14*cos(Rx_LN)*(cos(Ry_LN)*cos(2*Rz_LN)*sin(Rx_LN) + sin(Ry_LN)*sin(2*Rz_LN)))
      DESCR_PREFIX:P44 = rotated p44 photoelastic tensor component
      P45 = (p13 - p33)*cos(Rx_LN)^3*cos(Ry_LN)^2*sin(Rx_LN)*sin(Ry_LN) + (-(cos(Rz_LN)*sin(Ry_LN)) + cos(Ry_LN)*sin(Rx_LN)*sin(Rz_LN))*(cos(Ry_LN)*cos(Rz_LN) + sin(Rx_LN)*sin(Ry_LN)*sin(Rz_LN))*(p41*cos(Rx_LN)^2*cos(Ry_LN)*cos(Rz_LN) - p41*sin(Rx_LN)*(cos(Ry_LN)*cos(Rz_LN)*sin(Rx_LN) + sin(Ry_LN)*sin(Rz_LN)) + cos(Rx_LN)*((-p11 + p12)*cos(Rz_LN)*sin(Ry_LN)*sin(Rz_LN) + cos(Ry_LN)*sin(Rx_LN)*(-p31 + p12*cos(Rz_LN)^2 + p11*sin(Rz_LN)^2))) + (cos(Rz_LN)*sin(Rx_LN)*sin(Ry_LN) - cos(Ry_LN)*sin(Rz_LN))*(cos(Ry_LN)*cos(Rz_LN)*sin(Rx_LN) + sin(Ry_LN)*sin(Rz_LN))*(-(p41*cos(Rx_LN)^2*cos(Ry_LN)*cos(Rz_LN)) + p41*sin(Rx_LN)*(cos(Ry_LN)*cos(Rz_LN)*sin(Rx_LN) + sin(Ry_LN)*sin(Rz_LN)) + cos(Rx_LN)*((p11 - p12)*cos(Rz_LN)*sin(Ry_LN)*sin(Rz_LN) + cos(Ry_LN)*sin(Rx_LN)*(-p31 + p11*cos(Rz_LN)^2 + p12*sin(Rz_LN)^2))) + ((-2*p41*cos(Rx_LN)^2*cos(Ry_LN)*sin(Rz_LN) + 2*p41*sin(Rx_LN)*(-(cos(Rz_LN)*sin(Ry_LN)) + cos(Ry_LN)*sin(Rx_LN)*sin(Rz_LN)) + (p11 - p12)*cos(Rx_LN)*(cos(Rz_LN)^2*sin(Ry_LN) - 2*cos(Ry_LN)*cos(Rz_LN)*sin(Rx_LN)*sin(Rz_LN) - sin(Ry_LN)*sin(Rz_LN)^2))*(-4*cos(Ry_LN)^2*cos(2*Rz_LN)*sin(Rx_LN) + 4*cos(2*Rz_LN)*sin(Rx_LN)*sin(Ry_LN)^2 + (-3 + cos(2*Rx_LN))*sin(2*Ry_LN)*sin(2*Rz_LN)))/8. + cos(Rx_LN)*(cos(Ry_LN)^2*cos(Rz_LN) - cos(Rz_LN)*sin(Ry_LN)^2 + sin(Rx_LN)*sin(2*Ry_LN)*sin(Rz_LN))*(p44*cos(Rx_LN)^2*cos(Ry_LN)*sin(Rz_LN) + p44*sin(Rx_LN)*(cos(Rz_LN)*sin(Ry_LN) - cos(Ry_LN)*sin(Rx_LN)*sin(Rz_LN)) + p14*cos(Rx_LN)*(-(cos(Rz_LN)^2*sin(Ry_LN)) + sin(Ry_LN)*sin(Rz_LN)^2 + cos(Ry_LN)*sin(Rx_LN)*sin(2*Rz_LN))) - cos(Rx_LN)*(-2*cos(Ry_LN)*cos(Rz_LN)*sin(Rx_LN)*sin(Ry_LN) + cos(Ry_LN)^2*sin(Rz_LN) - sin(Ry_LN)^2*sin(Rz_LN))*(p44*cos(Rx_LN)^2*cos(Ry_LN)*cos(Rz_LN) - p44*sin(Rx_LN)*(cos(Ry_LN)*cos(Rz_LN)*sin(Rx_LN) + sin(Ry_LN)*sin(Rz_LN)) - p14*cos(Rx_LN)*(cos(Ry_LN)*cos(2*Rz_LN)*sin(Rx_LN) + sin(Ry_LN)*sin(2*Rz_LN)))
      DESCR_PREFIX:P45 = rotated p45 photoelastic tensor component
      P46 = (-p13 + p33)*cos(Rx_LN)^2*cos(Ry_LN)*sin(Rx_LN)^2*sin(Ry_LN) + cos(Rx_LN)*sin(Rz_LN)*(cos(Ry_LN)*cos(Rz_LN) + sin(Rx_LN)*sin(Ry_LN)*sin(Rz_LN))*(p41*cos(Rx_LN)^2*cos(Ry_LN)*cos(Rz_LN) - p41*sin(Rx_LN)*(cos(Ry_LN)*cos(Rz_LN)*sin(Rx_LN) + sin(Ry_LN)*sin(Rz_LN)) + cos(Rx_LN)*((-p11 + p12)*cos(Rz_LN)*sin(Ry_LN)*sin(Rz_LN) + cos(Ry_LN)*sin(Rx_LN)*(-p31 + p12*cos(Rz_LN)^2 + p11*sin(Rz_LN)^2))) + cos(Rx_LN)*cos(Rz_LN)*(cos(Rz_LN)*sin(Rx_LN)*sin(Ry_LN) - cos(Ry_LN)*sin(Rz_LN))*(-(p41*cos(Rx_LN)^2*cos(Ry_LN)*cos(Rz_LN)) + p41*sin(Rx_LN)*(cos(Ry_LN)*cos(Rz_LN)*sin(Rx_LN) + sin(Ry_LN)*sin(Rz_LN)) + cos(Rx_LN)*((p11 - p12)*cos(Rz_LN)*sin(Ry_LN)*sin(Rz_LN) + cos(Ry_LN)*sin(Rx_LN)*(-p31 + p11*cos(Rz_LN)^2 + p12*sin(Rz_LN)^2))) + (cos(Rx_LN)*(2*p41*cos(Rx_LN)^2*cos(Ry_LN)*sin(Rz_LN) + 2*p41*sin(Rx_LN)*(cos(Rz_LN)*sin(Ry_LN) - cos(Ry_LN)*sin(Rx_LN)*sin(Rz_LN)) - (p11 - p12)*cos(Rx_LN)*(cos(Rz_LN)^2*sin(Ry_LN) - 2*cos(Ry_LN)*cos(Rz_LN)*sin(Rx_LN)*sin(Rz_LN) - sin(Ry_LN)*sin(Rz_LN)^2))*(cos(Ry_LN)*cos(2*Rz_LN) + sin(Rx_LN)*sin(Ry_LN)*sin(2*Rz_LN)))/2. - (cos(Ry_LN)*cos(Rz_LN)*sin(Rx_LN) - cos(2*Rx_LN)*sin(Ry_LN)*sin(Rz_LN))*(p44*cos(Rx_LN)^2*cos(Ry_LN)*sin(Rz_LN) + p44*sin(Rx_LN)*(cos(Rz_LN)*sin(Ry_LN) - cos(Ry_LN)*sin(Rx_LN)*sin(Rz_LN)) + p14*cos(Rx_LN)*(-(cos(Rz_LN)^2*sin(Ry_LN)) + sin(Ry_LN)*sin(Rz_LN)^2 + cos(Ry_LN)*sin(Rx_LN)*sin(2*Rz_LN))) + (cos(Rx_LN)^2*cos(Rz_LN)*sin(Ry_LN) + sin(Rx_LN)*(-(cos(Rz_LN)*sin(Rx_LN)*sin(Ry_LN)) + cos(Ry_LN)*sin(Rz_LN)))*(p44*cos(Rx_LN)^2*cos(Ry_LN)*cos(Rz_LN) - p44*sin(Rx_LN)*(cos(Ry_LN)*cos(Rz_LN)*sin(Rx_LN) + sin(Ry_LN)*sin(Rz_LN)) - p14*cos(Rx_LN)*(cos(Ry_LN)*cos(2*Rz_LN)*sin(Rx_LN) + sin(Ry_LN)*sin(2*Rz_LN)))
      DESCR_PREFIX:P46 = rotated p46 photoelastic tensor component
      P51 = (-p13 + p33)*cos(Rx_LN)^4*cos(Ry_LN)*sin(Ry_LN)^3 + (cos(Rz_LN)*sin(Rx_LN)*sin(Ry_LN) - cos(Ry_LN)*sin(Rz_LN))^2*(p31*cos(Rx_LN)^2*cos(Ry_LN)*sin(Ry_LN) + p11*(cos(Rz_LN)*sin(Rx_LN)*sin(Ry_LN) - cos(Ry_LN)*sin(Rz_LN))*(cos(Ry_LN)*cos(Rz_LN)*sin(Rx_LN) + sin(Ry_LN)*sin(Rz_LN)) + p12*(-(cos(Rz_LN)*sin(Ry_LN)) + cos(Ry_LN)*sin(Rx_LN)*sin(Rz_LN))*(cos(Ry_LN)*cos(Rz_LN) + sin(Rx_LN)*sin(Ry_LN)*sin(Rz_LN)) + p41*cos(Rx_LN)*(-2*cos(Ry_LN)*cos(Rz_LN)*sin(Rx_LN)*sin(Ry_LN) + cos(Ry_LN)^2*sin(Rz_LN) - sin(Ry_LN)^2*sin(Rz_LN))) + (cos(Ry_LN)*cos(Rz_LN) + sin(Rx_LN)*sin(Ry_LN)*sin(Rz_LN))^2*(p31*cos(Rx_LN)^2*cos(Ry_LN)*sin(Ry_LN) + (p11 - p12)*cos(Ry_LN)^2*cos(Rz_LN)*sin(Rx_LN)*sin(Rz_LN) + (-p11 + p12)*cos(Rz_LN)*sin(Rx_LN)*sin(Ry_LN)^2*sin(Rz_LN) + p41*cos(Rx_LN)*(cos(Rz_LN)*sin(Rx_LN)*sin(2*Ry_LN) - cos(2*Ry_LN)*sin(Rz_LN)) + cos(Ry_LN)*sin(Ry_LN)*(cos(Rz_LN)^2*(-p11 + p12*sin(Rx_LN)^2) + (-p12 + p11*sin(Rx_LN)^2)*sin(Rz_LN)^2)) + 2*(cos(Rz_LN)*sin(Rx_LN)*sin(Ry_LN) - cos(Ry_LN)*sin(Rz_LN))*(cos(Ry_LN)*cos(Rz_LN) + sin(Rx_LN)*sin(Ry_LN)*sin(Rz_LN))*(p41*cos(Rx_LN)*(cos(Ry_LN)^2*cos(Rz_LN) - cos(Rz_LN)*sin(Ry_LN)^2 + sin(Rx_LN)*sin(2*Ry_LN)*sin(Rz_LN)) + ((p11 - p12)*(4*cos(Ry_LN)^2*cos(2*Rz_LN)*sin(Rx_LN) - 4*cos(2*Rz_LN)*sin(Rx_LN)*sin(Ry_LN)^2 - (-3 + cos(2*Rx_LN))*sin(2*Ry_LN)*sin(2*Rz_LN)))/8.) + 2*cos(Rx_LN)*sin(Ry_LN)*(cos(Ry_LN)*cos(Rz_LN) + sin(Rx_LN)*sin(Ry_LN)*sin(Rz_LN))*(p44*cos(Rx_LN)*(cos(Ry_LN)^2*cos(Rz_LN) - cos(Rz_LN)*sin(Ry_LN)^2 + sin(Rx_LN)*sin(2*Ry_LN)*sin(Rz_LN)) + p14*(cos(Ry_LN)^2*cos(2*Rz_LN)*sin(Rx_LN) - cos(2*Rz_LN)*sin(Rx_LN)*sin(Ry_LN)^2 - ((-3 + cos(2*Rx_LN))*sin(2*Ry_LN)*sin(2*Rz_LN))/4.)) + 2*cos(Rx_LN)*sin(Ry_LN)*(cos(Rz_LN)*sin(Rx_LN)*sin(Ry_LN) - cos(Ry_LN)*sin(Rz_LN))*(cos(Ry_LN)^2*(-(p44*cos(Rx_LN)) + 2*p14*cos(Rz_LN)*sin(Rx_LN))*sin(Rz_LN) + (p44*cos(Rx_LN) - 2*p14*cos(Rz_LN)*sin(Rx_LN))*sin(Ry_LN)^2*sin(Rz_LN) + (sin(2*Ry_LN)*(p14*cos(2*(Rx_LN - Rz_LN)) - 6*p14*cos(2*Rz_LN) + p14*cos(2*(Rx_LN + Rz_LN)) + 2*p44*sin(2*Rx_LN - Rz_LN) + 2*p44*sin(2*Rx_LN + Rz_LN)))/8.)
      DESCR_PREFIX:P51 = rotated p51 photoelastic tensor component
      P52 = p31*cos(Rx_LN)^4*cos(Ry_LN)*sin(Ry_LN) - (cos(Rx_LN)^2*(-6*p11 + 16*p12 - 8*p33 + 32*p44 + (6*p11 + 8*(p33 - 4*p44))*cos(2*Rx_LN) + p11*cos(2*(Rx_LN - 2*Rz_LN)) - 2*p11*cos(4*Rz_LN) + p11*cos(2*(Rx_LN + 2*Rz_LN)))*sin(2*Ry_LN))/32. - ((-p11 + 4*p13 + p11*cos(4*Rz_LN))*sin(2*Rx_LN)^2*sin(2*Ry_LN))/32. + p14*cos(Rx_LN)*sin(Rx_LN)*(cos(Rz_LN)^3*(1 + sin(Rx_LN)^2)*sin(2*Ry_LN) - 6*cos(2*Ry_LN)*cos(Rz_LN)^2*sin(Rx_LN)*sin(Rz_LN) + (3*(-3 + cos(2*Rx_LN))*cos(Rz_LN)*sin(2*Ry_LN)*sin(Rz_LN)^2)/2. + 2*cos(2*Ry_LN)*sin(Rx_LN)*sin(Rz_LN)^3) + (p41*cos(Rx_LN)^3*(-cos(Rx_LN - 2*Ry_LN - 3*Rz_LN) + cos(Rx_LN + 2*Ry_LN - 3*Rz_LN) - cos(Rx_LN - 2*Ry_LN + 3*Rz_LN) + cos(Rx_LN + 2*Ry_LN + 3*Rz_LN) - 2*sin(2*Ry_LN - 3*Rz_LN) + 2*sin(2*Ry_LN + 3*Rz_LN)))/4.
      DESCR_PREFIX:P52 = rotated p52 photoelastic tensor component
      P53 = (-p13 + p33)*cos(Rx_LN)^4*cos(Ry_LN)^3*sin(Ry_LN) + (cos(Ry_LN)*cos(Rz_LN)*sin(Rx_LN) + sin(Ry_LN)*sin(Rz_LN))^2*(p31*cos(Rx_LN)^2*cos(Ry_LN)*sin(Ry_LN) + p11*(cos(Rz_LN)*sin(Rx_LN)*sin(Ry_LN) - cos(Ry_LN)*sin(Rz_LN))*(cos(Ry_LN)*cos(Rz_LN)*sin(Rx_LN) + sin(Ry_LN)*sin(Rz_LN)) + p12*(-(cos(Rz_LN)*sin(Ry_LN)) + cos(Ry_LN)*sin(Rx_LN)*sin(Rz_LN))*(cos(Ry_LN)*cos(Rz_LN) + sin(Rx_LN)*sin(Ry_LN)*sin(Rz_LN)) + p41*cos(Rx_LN)*(-2*cos(Ry_LN)*cos(Rz_LN)*sin(Rx_LN)*sin(Ry_LN) + cos(Ry_LN)^2*sin(Rz_LN) - sin(Ry_LN)^2*sin(Rz_LN))) + (cos(Rz_LN)*sin(Ry_LN) - cos(Ry_LN)*sin(Rx_LN)*sin(Rz_LN))^2*(p31*cos(Rx_LN)^2*cos(Ry_LN)*sin(Ry_LN) + (p11 - p12)*cos(Ry_LN)^2*cos(Rz_LN)*sin(Rx_LN)*sin(Rz_LN) + (-p11 + p12)*cos(Rz_LN)*sin(Rx_LN)*sin(Ry_LN)^2*sin(Rz_LN) + p41*cos(Rx_LN)*(cos(Rz_LN)*sin(Rx_LN)*sin(2*Ry_LN) - cos(2*Ry_LN)*sin(Rz_LN)) + cos(Ry_LN)*sin(Ry_LN)*(cos(Rz_LN)^2*(-p11 + p12*sin(Rx_LN)^2) + (-p12 + p11*sin(Rx_LN)^2)*sin(Rz_LN)^2)) + 2*(-(cos(Rz_LN)*sin(Ry_LN)) + cos(Ry_LN)*sin(Rx_LN)*sin(Rz_LN))*(cos(Ry_LN)*cos(Rz_LN)*sin(Rx_LN) + sin(Ry_LN)*sin(Rz_LN))*(p41*cos(Rx_LN)*(cos(Ry_LN)^2*cos(Rz_LN) - cos(Rz_LN)*sin(Ry_LN)^2 + sin(Rx_LN)*sin(2*Ry_LN)*sin(Rz_LN)) + ((p11 - p12)*(4*cos(Ry_LN)^2*cos(2*Rz_LN)*sin(Rx_LN) - 4*cos(2*Rz_LN)*sin(Rx_LN)*sin(Ry_LN)^2 - (-3 + cos(2*Rx_LN))*sin(2*Ry_LN)*sin(2*Rz_LN)))/8.) + 2*cos(Rx_LN)*cos(Ry_LN)*(-(cos(Rz_LN)*sin(Ry_LN)) + cos(Ry_LN)*sin(Rx_LN)*sin(Rz_LN))*(p44*cos(Rx_LN)*(cos(Ry_LN)^2*cos(Rz_LN) - cos(Rz_LN)*sin(Ry_LN)^2 + sin(Rx_LN)*sin(2*Ry_LN)*sin(Rz_LN)) + p14*(cos(Ry_LN)^2*cos(2*Rz_LN)*sin(Rx_LN) - cos(2*Rz_LN)*sin(Rx_LN)*sin(Ry_LN)^2 - ((-3 + cos(2*Rx_LN))*sin(2*Ry_LN)*sin(2*Rz_LN))/4.)) + 2*cos(Rx_LN)*cos(Ry_LN)*(cos(Ry_LN)*cos(Rz_LN)*sin(Rx_LN) + sin(Ry_LN)*sin(Rz_LN))*(cos(Ry_LN)^2*(-(p44*cos(Rx_LN)) + 2*p14*cos(Rz_LN)*sin(Rx_LN))*sin(Rz_LN) + (p44*cos(Rx_LN) - 2*p14*cos(Rz_LN)*sin(Rx_LN))*sin(Ry_LN)^2*sin(Rz_LN) + (sin(2*Ry_LN)*(p14*cos(2*(Rx_LN - Rz_LN)) - 6*p14*cos(2*Rz_LN) + p14*cos(2*(Rx_LN + Rz_LN)) + 2*p44*sin(2*Rx_LN - Rz_LN) + 2*p44*sin(2*Rx_LN + Rz_LN)))/8.)
      DESCR_PREFIX:P53 = rotated p53 photoelastic tensor component
      P54 = (p13 - p33)*cos(Rx_LN)^3*cos(Ry_LN)^2*sin(Rx_LN)*sin(Ry_LN) + cos(Rx_LN)*cos(Rz_LN)*(cos(Ry_LN)*cos(Rz_LN)*sin(Rx_LN) + sin(Ry_LN)*sin(Rz_LN))*(p31*cos(Rx_LN)^2*cos(Ry_LN)*sin(Ry_LN) + p11*(cos(Rz_LN)*sin(Rx_LN)*sin(Ry_LN) - cos(Ry_LN)*sin(Rz_LN))*(cos(Ry_LN)*cos(Rz_LN)*sin(Rx_LN) + sin(Ry_LN)*sin(Rz_LN)) + p12*(-(cos(Rz_LN)*sin(Ry_LN)) + cos(Ry_LN)*sin(Rx_LN)*sin(Rz_LN))*(cos(Ry_LN)*cos(Rz_LN) + sin(Rx_LN)*sin(Ry_LN)*sin(Rz_LN)) + p41*cos(Rx_LN)*(-2*cos(Ry_LN)*cos(Rz_LN)*sin(Rx_LN)*sin(Ry_LN) + cos(Ry_LN)^2*sin(Rz_LN) - sin(Ry_LN)^2*sin(Rz_LN))) + cos(Rx_LN)*sin(Rz_LN)*(-(cos(Rz_LN)*sin(Ry_LN)) + cos(Ry_LN)*sin(Rx_LN)*sin(Rz_LN))*(p31*cos(Rx_LN)^2*cos(Ry_LN)*sin(Ry_LN) + (p11 - p12)*cos(Ry_LN)^2*cos(Rz_LN)*sin(Rx_LN)*sin(Rz_LN) + (-p11 + p12)*cos(Rz_LN)*sin(Rx_LN)*sin(Ry_LN)^2*sin(Rz_LN) + p41*cos(Rx_LN)*(cos(Rz_LN)*sin(Rx_LN)*sin(2*Ry_LN) - cos(2*Ry_LN)*sin(Rz_LN)) + cos(Ry_LN)*sin(Ry_LN)*(cos(Rz_LN)^2*(-p11 + p12*sin(Rx_LN)^2) + (-p12 + p11*sin(Rx_LN)^2)*sin(Rz_LN)^2)) + cos(Rx_LN)*(-(cos(Rz_LN)^2*sin(Ry_LN)) + sin(Ry_LN)*sin(Rz_LN)^2 + cos(Ry_LN)*sin(Rx_LN)*sin(2*Rz_LN))*(p41*cos(Rx_LN)*(cos(Ry_LN)^2*cos(Rz_LN) - cos(Rz_LN)*sin(Ry_LN)^2 + sin(Rx_LN)*sin(2*Ry_LN)*sin(Rz_LN)) + ((p11 - p12)*(4*cos(Ry_LN)^2*cos(2*Rz_LN)*sin(Rx_LN) - 4*cos(2*Rz_LN)*sin(Rx_LN)*sin(Ry_LN)^2 - (-3 + cos(2*Rx_LN))*sin(2*Ry_LN)*sin(2*Rz_LN)))/8.) + (cos(Rz_LN)*sin(Rx_LN)*sin(Ry_LN) + cos(2*Rx_LN)*cos(Ry_LN)*sin(Rz_LN))*(p44*cos(Rx_LN)*(cos(Ry_LN)^2*cos(Rz_LN) - cos(Rz_LN)*sin(Ry_LN)^2 + sin(Rx_LN)*sin(2*Ry_LN)*sin(Rz_LN)) + p14*(cos(Ry_LN)^2*cos(2*Rz_LN)*sin(Rx_LN) - cos(2*Rz_LN)*sin(Rx_LN)*sin(Ry_LN)^2 - ((-3 + cos(2*Rx_LN))*sin(2*Ry_LN)*sin(2*Rz_LN))/4.)) + (cos(Rx_LN)^2*cos(Ry_LN)*cos(Rz_LN) - sin(Rx_LN)*(cos(Ry_LN)*cos(Rz_LN)*sin(Rx_LN) + sin(Ry_LN)*sin(Rz_LN)))*(cos(Ry_LN)^2*(-(p44*cos(Rx_LN)) + 2*p14*cos(Rz_LN)*sin(Rx_LN))*sin(Rz_LN) + (p44*cos(Rx_LN) - 2*p14*cos(Rz_LN)*sin(Rx_LN))*sin(Ry_LN)^2*sin(Rz_LN) + (sin(2*Ry_LN)*(p14*cos(2*(Rx_LN - Rz_LN)) - 6*p14*cos(2*Rz_LN) + p14*cos(2*(Rx_LN + Rz_LN)) + 2*p44*sin(2*Rx_LN - Rz_LN) + 2*p44*sin(2*Rx_LN + Rz_LN)))/8.)
      DESCR_PREFIX:P54 = rotated p54 photoelastic tensor component
      P55 = (-p13 + p33)*cos(Rx_LN)^4*cos(Ry_LN)^2*sin(Ry_LN)^2 + (cos(Rz_LN)*sin(Rx_LN)*sin(Ry_LN) - cos(Ry_LN)*sin(Rz_LN))*(cos(Ry_LN)*cos(Rz_LN)*sin(Rx_LN) + sin(Ry_LN)*sin(Rz_LN))*(p31*cos(Rx_LN)^2*cos(Ry_LN)*sin(Ry_LN) + p11*(cos(Rz_LN)*sin(Rx_LN)*sin(Ry_LN) - cos(Ry_LN)*sin(Rz_LN))*(cos(Ry_LN)*cos(Rz_LN)*sin(Rx_LN) + sin(Ry_LN)*sin(Rz_LN)) + p12*(-(cos(Rz_LN)*sin(Ry_LN)) + cos(Ry_LN)*sin(Rx_LN)*sin(Rz_LN))*(cos(Ry_LN)*cos(Rz_LN) + sin(Rx_LN)*sin(Ry_LN)*sin(Rz_LN)) + p41*cos(Rx_LN)*(-2*cos(Ry_LN)*cos(Rz_LN)*sin(Rx_LN)*sin(Ry_LN) + cos(Ry_LN)^2*sin(Rz_LN) - sin(Ry_LN)^2*sin(Rz_LN))) + (-(cos(Rz_LN)*sin(Ry_LN)) + cos(Ry_LN)*sin(Rx_LN)*sin(Rz_LN))*(cos(Ry_LN)*cos(Rz_LN) + sin(Rx_LN)*sin(Ry_LN)*sin(Rz_LN))*(p31*cos(Rx_LN)^2*cos(Ry_LN)*sin(Ry_LN) + (p11 - p12)*cos(Ry_LN)^2*cos(Rz_LN)*sin(Rx_LN)*sin(Rz_LN) + (-p11 + p12)*cos(Rz_LN)*sin(Rx_LN)*sin(Ry_LN)^2*sin(Rz_LN) + p41*cos(Rx_LN)*(cos(Rz_LN)*sin(Rx_LN)*sin(2*Ry_LN) - cos(2*Ry_LN)*sin(Rz_LN)) + cos(Ry_LN)*sin(Ry_LN)*(cos(Rz_LN)^2*(-p11 + p12*sin(Rx_LN)^2) + (-p12 + p11*sin(Rx_LN)^2)*sin(Rz_LN)^2)) + ((cos(Ry_LN)^2*cos(2*Rz_LN)*sin(Rx_LN) - cos(2*Rz_LN)*sin(Rx_LN)*sin(Ry_LN)^2 - ((-3 + cos(2*Rx_LN))*sin(2*Ry_LN)*sin(2*Rz_LN))/4.)*(2*p41*cos(Rx_LN)*cos(2*Ry_LN)*cos(Rz_LN) + (p11 - p12)*cos(Ry_LN)^2*cos(2*Rz_LN)*sin(Rx_LN) - p11*cos(Rz_LN)^2*sin(Rx_LN)*sin(Ry_LN)^2 + p12*cos(Rz_LN)^2*sin(Rx_LN)*sin(Ry_LN)^2 + p41*sin(2*Rx_LN)*sin(2*Ry_LN)*sin(Rz_LN) + p11*sin(Rx_LN)*sin(Ry_LN)^2*sin(Rz_LN)^2 - p12*sin(Rx_LN)*sin(Ry_LN)^2*sin(Rz_LN)^2 - ((p11 - p12)*(-3 + cos(2*Rx_LN))*sin(2*Ry_LN)*sin(2*Rz_LN))/4.))/2. + cos(Rx_LN)*(cos(Ry_LN)^2*cos(Rz_LN) - cos(Rz_LN)*sin(Ry_LN)^2 + sin(Rx_LN)*sin(2*Ry_LN)*sin(Rz_LN))*(p44*cos(Rx_LN)*(cos(Ry_LN)^2*cos(Rz_LN) - cos(Rz_LN)*sin(Ry_LN)^2 + sin(Rx_LN)*sin(2*Ry_LN)*sin(Rz_LN)) + p14*(cos(Ry_LN)^2*cos(2*Rz_LN)*sin(Rx_LN) - cos(2*Rz_LN)*sin(Rx_LN)*sin(Ry_LN)^2 - ((-3 + cos(2*Rx_LN))*sin(2*Ry_LN)*sin(2*Rz_LN))/4.)) + cos(Rx_LN)*(cos(Rz_LN)*sin(Rx_LN)*sin(2*Ry_LN) - cos(2*Ry_LN)*sin(Rz_LN))*(cos(Ry_LN)^2*(-(p44*cos(Rx_LN)) + 2*p14*cos(Rz_LN)*sin(Rx_LN))*sin(Rz_LN) + (p44*cos(Rx_LN) - 2*p14*cos(Rz_LN)*sin(Rx_LN))*sin(Ry_LN)^2*sin(Rz_LN) + (sin(2*Ry_LN)*(p14*cos(2*(Rx_LN - Rz_LN)) - 6*p14*cos(2*Rz_LN) + p14*cos(2*(Rx_LN + Rz_LN)) + 2*p44*sin(2*Rx_LN - Rz_LN) + 2*p44*sin(2*Rx_LN + Rz_LN)))/8.)
      DESCR_PREFIX:P55 = rotated p55 photoelastic tensor component
      P56 = (p13 - p33)*cos(Rx_LN)^3*cos(Ry_LN)*sin(Rx_LN)*sin(Ry_LN)^2 + cos(Rx_LN)*cos(Rz_LN)*(cos(Rz_LN)*sin(Rx_LN)*sin(Ry_LN) - cos(Ry_LN)*sin(Rz_LN))*(p31*cos(Rx_LN)^2*cos(Ry_LN)*sin(Ry_LN) + p11*(cos(Rz_LN)*sin(Rx_LN)*sin(Ry_LN) - cos(Ry_LN)*sin(Rz_LN))*(cos(Ry_LN)*cos(Rz_LN)*sin(Rx_LN) + sin(Ry_LN)*sin(Rz_LN)) + p12*(-(cos(Rz_LN)*sin(Ry_LN)) + cos(Ry_LN)*sin(Rx_LN)*sin(Rz_LN))*(cos(Ry_LN)*cos(Rz_LN) + sin(Rx_LN)*sin(Ry_LN)*sin(Rz_LN)) + p41*cos(Rx_LN)*(-2*cos(Ry_LN)*cos(Rz_LN)*sin(Rx_LN)*sin(Ry_LN) + cos(Ry_LN)^2*sin(Rz_LN) - sin(Ry_LN)^2*sin(Rz_LN))) + cos(Rx_LN)*sin(Rz_LN)*(cos(Ry_LN)*cos(Rz_LN) + sin(Rx_LN)*sin(Ry_LN)*sin(Rz_LN))*(p31*cos(Rx_LN)^2*cos(Ry_LN)*sin(Ry_LN) + (p11 - p12)*cos(Ry_LN)^2*cos(Rz_LN)*sin(Rx_LN)*sin(Rz_LN) + (-p11 + p12)*cos(Rz_LN)*sin(Rx_LN)*sin(Ry_LN)^2*sin(Rz_LN) + p41*cos(Rx_LN)*(cos(Rz_LN)*sin(Rx_LN)*sin(2*Ry_LN) - cos(2*Ry_LN)*sin(Rz_LN)) + cos(Ry_LN)*sin(Ry_LN)*(cos(Rz_LN)^2*(-p11 + p12*sin(Rx_LN)^2) + (-p12 + p11*sin(Rx_LN)^2)*sin(Rz_LN)^2)) + (cos(Rx_LN)*(cos(Ry_LN)*cos(2*Rz_LN) + sin(Rx_LN)*sin(Ry_LN)*sin(2*Rz_LN))*(2*p41*cos(Rx_LN)*cos(2*Ry_LN)*cos(Rz_LN) + (p11 - p12)*cos(Ry_LN)^2*cos(2*Rz_LN)*sin(Rx_LN) - p11*cos(Rz_LN)^2*sin(Rx_LN)*sin(Ry_LN)^2 + p12*cos(Rz_LN)^2*sin(Rx_LN)*sin(Ry_LN)^2 + p41*sin(2*Rx_LN)*sin(2*Ry_LN)*sin(Rz_LN) + p11*sin(Rx_LN)*sin(Ry_LN)^2*sin(Rz_LN)^2 - p12*sin(Rx_LN)*sin(Ry_LN)^2*sin(Rz_LN)^2 - ((p11 - p12)*(-3 + cos(2*Rx_LN))*sin(2*Ry_LN)*sin(2*Rz_LN))/4.))/2. + (-(cos(Ry_LN)*cos(Rz_LN)*sin(Rx_LN)) + cos(2*Rx_LN)*sin(Ry_LN)*sin(Rz_LN))*(p44*cos(Rx_LN)*(cos(Ry_LN)^2*cos(Rz_LN) - cos(Rz_LN)*sin(Ry_LN)^2 + sin(Rx_LN)*sin(2*Ry_LN)*sin(Rz_LN)) + p14*(cos(Ry_LN)^2*cos(2*Rz_LN)*sin(Rx_LN) - cos(2*Rz_LN)*sin(Rx_LN)*sin(Ry_LN)^2 - ((-3 + cos(2*Rx_LN))*sin(2*Ry_LN)*sin(2*Rz_LN))/4.)) + (cos(Rx_LN)^2*cos(Rz_LN)*sin(Ry_LN) + sin(Rx_LN)*(-(cos(Rz_LN)*sin(Rx_LN)*sin(Ry_LN)) + cos(Ry_LN)*sin(Rz_LN)))*(cos(Ry_LN)^2*(-(p44*cos(Rx_LN)) + 2*p14*cos(Rz_LN)*sin(Rx_LN))*sin(Rz_LN) + (p44*cos(Rx_LN) - 2*p14*cos(Rz_LN)*sin(Rx_LN))*sin(Ry_LN)^2*sin(Rz_LN) + (sin(2*Ry_LN)*(p14*cos(2*(Rx_LN - Rz_LN)) - 6*p14*cos(2*Rz_LN) + p14*cos(2*(Rx_LN + Rz_LN)) + 2*p44*sin(2*Rx_LN - Rz_LN) + 2*p44*sin(2*Rx_LN + Rz_LN)))/8.)
      DESCR_PREFIX:P56 = rotated p56 photoelastic tensor component
      P61 = (p13 - p33)*cos(Rx_LN)^3*sin(Rx_LN)*sin(Ry_LN)^3 + (cos(Ry_LN)*cos(Rz_LN) + sin(Rx_LN)*sin(Ry_LN)*sin(Rz_LN))^2*(p41*cos(Rx_LN)^2*cos(Rz_LN)*sin(Ry_LN) + p41*sin(Rx_LN)*(-(cos(Rz_LN)*sin(Rx_LN)*sin(Ry_LN)) + cos(Ry_LN)*sin(Rz_LN)) + cos(Rx_LN)*((p11 - p12)*cos(Ry_LN)*cos(Rz_LN)*sin(Rz_LN) + sin(Rx_LN)*sin(Ry_LN)*(-p31 + p12*cos(Rz_LN)^2 + p11*sin(Rz_LN)^2))) + (cos(Rz_LN)*sin(Rx_LN)*sin(Ry_LN) - cos(Ry_LN)*sin(Rz_LN))^2*(-(p41*cos(Rx_LN)^2*cos(Rz_LN)*sin(Ry_LN)) + p41*sin(Rx_LN)*(cos(Rz_LN)*sin(Rx_LN)*sin(Ry_LN) - cos(Ry_LN)*sin(Rz_LN)) + cos(Rx_LN)*((-p11 + p12)*cos(Ry_LN)*cos(Rz_LN)*sin(Rz_LN) + sin(Rx_LN)*sin(Ry_LN)*(-p31 + p11*cos(Rz_LN)^2 + p12*sin(Rz_LN)^2))) + 2*cos(Rx_LN)*sin(Ry_LN)*(cos(Rz_LN)*sin(Rx_LN)*sin(Ry_LN) - cos(Ry_LN)*sin(Rz_LN))*(p44*cos(Rx_LN)^2*cos(Rz_LN)*sin(Ry_LN) + p44*sin(Rx_LN)*(-(cos(Rz_LN)*sin(Rx_LN)*sin(Ry_LN)) + cos(Ry_LN)*sin(Rz_LN)) + p14*cos(Rx_LN)*(-(cos(Rz_LN)^2*sin(Rx_LN)*sin(Ry_LN)) + sin(Rx_LN)*sin(Ry_LN)*sin(Rz_LN)^2 + cos(Ry_LN)*sin(2*Rz_LN))) + 2*(cos(Rz_LN)*sin(Rx_LN)*sin(Ry_LN) - cos(Ry_LN)*sin(Rz_LN))*(cos(Ry_LN)*cos(Rz_LN) + sin(Rx_LN)*sin(Ry_LN)*sin(Rz_LN))*(-(p41*cos(Ry_LN)*cos(Rz_LN)*sin(Rx_LN)) + p41*cos(2*Rx_LN)*sin(Ry_LN)*sin(Rz_LN) + ((p11 - p12)*cos(Rx_LN)*(cos(Ry_LN)*cos(2*Rz_LN) + sin(Rx_LN)*sin(Ry_LN)*sin(2*Rz_LN)))/2.) + 2*cos(Rx_LN)*sin(Ry_LN)*(cos(Ry_LN)*cos(Rz_LN) + sin(Rx_LN)*sin(Ry_LN)*sin(Rz_LN))*(p44*cos(Rx_LN)^2*sin(Ry_LN)*sin(Rz_LN) - p44*sin(Rx_LN)*(cos(Ry_LN)*cos(Rz_LN) + sin(Rx_LN)*sin(Ry_LN)*sin(Rz_LN)) + p14*cos(Rx_LN)*(cos(Ry_LN)*cos(2*Rz_LN) + sin(Rx_LN)*sin(Ry_LN)*sin(2*Rz_LN)))
      DESCR_PREFIX:P61 = rotated p61 photoelastic tensor component
      P62 = cos(Rx_LN)*(-(p41*cos(Rx_LN)^3*cos(3*Rz_LN)*sin(Ry_LN)) + (p11 - p31 - 2*p44)*cos(Rx_LN)^2*sin(Rx_LN)*sin(Ry_LN) + (p13 - p33 + 2*p44)*sin(Rx_LN)^3*sin(Ry_LN) + p14*cos(Ry_LN)*sin(2*Rx_LN)*sin(Rz_LN)^3 + cos(Rx_LN)*sin(Rx_LN)*((2*p14 + p41)*cos(Rz_LN)^3*sin(Rx_LN)*sin(Ry_LN) - 3*(2*p14 + p41)*cos(Ry_LN)*cos(Rz_LN)^2*sin(Rz_LN) - 3*(2*p14 + p41)*cos(Rz_LN)*sin(Rx_LN)*sin(Ry_LN)*sin(Rz_LN)^2 + p41*cos(Ry_LN)*sin(Rz_LN)^3))
      DESCR_PREFIX:P62 = rotated p62 photoelastic tensor component
      P63 = (p13 - p33)*cos(Rx_LN)^3*cos(Ry_LN)^2*sin(Rx_LN)*sin(Ry_LN) + (cos(Rz_LN)*sin(Ry_LN) - cos(Ry_LN)*sin(Rx_LN)*sin(Rz_LN))^2*(p41*cos(Rx_LN)^2*cos(Rz_LN)*sin(Ry_LN) + p41*sin(Rx_LN)*(-(cos(Rz_LN)*sin(Rx_LN)*sin(Ry_LN)) + cos(Ry_LN)*sin(Rz_LN)) + cos(Rx_LN)*((p11 - p12)*cos(Ry_LN)*cos(Rz_LN)*sin(Rz_LN) + sin(Rx_LN)*sin(Ry_LN)*(-p31 + p12*cos(Rz_LN)^2 + p11*sin(Rz_LN)^2))) + (cos(Ry_LN)*cos(Rz_LN)*sin(Rx_LN) + sin(Ry_LN)*sin(Rz_LN))^2*(-(p41*cos(Rx_LN)^2*cos(Rz_LN)*sin(Ry_LN)) + p41*sin(Rx_LN)*(cos(Rz_LN)*sin(Rx_LN)*sin(Ry_LN) - cos(Ry_LN)*sin(Rz_LN)) + cos(Rx_LN)*((-p11 + p12)*cos(Ry_LN)*cos(Rz_LN)*sin(Rz_LN) + sin(Rx_LN)*sin(Ry_LN)*(-p31 + p11*cos(Rz_LN)^2 + p12*sin(Rz_LN)^2))) + 2*cos(Rx_LN)*cos(Ry_LN)*(cos(Ry_LN)*cos(Rz_LN)*sin(Rx_LN) + sin(Ry_LN)*sin(Rz_LN))*(p44*cos(Rx_LN)^2*cos(Rz_LN)*sin(Ry_LN) + p44*sin(Rx_LN)*(-(cos(Rz_LN)*sin(Rx_LN)*sin(Ry_LN)) + cos(Ry_LN)*sin(Rz_LN)) + p14*cos(Rx_LN)*(-(cos(Rz_LN)^2*sin(Rx_LN)*sin(Ry_LN)) + sin(Rx_LN)*sin(Ry_LN)*sin(Rz_LN)^2 + cos(Ry_LN)*sin(2*Rz_LN))) + 2*(-(cos(Rz_LN)*sin(Ry_LN)) + cos(Ry_LN)*sin(Rx_LN)*sin(Rz_LN))*(cos(Ry_LN)*cos(Rz_LN)*sin(Rx_LN) + sin(Ry_LN)*sin(Rz_LN))*(-(p41*cos(Ry_LN)*cos(Rz_LN)*sin(Rx_LN)) + p41*cos(2*Rx_LN)*sin(Ry_LN)*sin(Rz_LN) + ((p11 - p12)*cos(Rx_LN)*(cos(Ry_LN)*cos(2*Rz_LN) + sin(Rx_LN)*sin(Ry_LN)*sin(2*Rz_LN)))/2.) + 2*cos(Rx_LN)*cos(Ry_LN)*(-(cos(Rz_LN)*sin(Ry_LN)) + cos(Ry_LN)*sin(Rx_LN)*sin(Rz_LN))*(p44*cos(Rx_LN)^2*sin(Ry_LN)*sin(Rz_LN) - p44*sin(Rx_LN)*(cos(Ry_LN)*cos(Rz_LN) + sin(Rx_LN)*sin(Ry_LN)*sin(Rz_LN)) + p14*cos(Rx_LN)*(cos(Ry_LN)*cos(2*Rz_LN) + sin(Rx_LN)*sin(Ry_LN)*sin(2*Rz_LN)))
      DESCR_PREFIX:P63 = rotated p63 photoelastic tensor component
      P64 = (-p13 + p33)*cos(Rx_LN)^2*cos(Ry_LN)*sin(Rx_LN)^2*sin(Ry_LN) + cos(Rx_LN)*sin(Rz_LN)*(-(cos(Rz_LN)*sin(Ry_LN)) + cos(Ry_LN)*sin(Rx_LN)*sin(Rz_LN))*(p41*cos(Rx_LN)^2*cos(Rz_LN)*sin(Ry_LN) + p41*sin(Rx_LN)*(-(cos(Rz_LN)*sin(Rx_LN)*sin(Ry_LN)) + cos(Ry_LN)*sin(Rz_LN)) + cos(Rx_LN)*((p11 - p12)*cos(Ry_LN)*cos(Rz_LN)*sin(Rz_LN) + sin(Rx_LN)*sin(Ry_LN)*(-p31 + p12*cos(Rz_LN)^2 + p11*sin(Rz_LN)^2))) + cos(Rx_LN)*cos(Rz_LN)*(cos(Ry_LN)*cos(Rz_LN)*sin(Rx_LN) + sin(Ry_LN)*sin(Rz_LN))*(-(p41*cos(Rx_LN)^2*cos(Rz_LN)*sin(Ry_LN)) + p41*sin(Rx_LN)*(cos(Rz_LN)*sin(Rx_LN)*sin(Ry_LN) - cos(Ry_LN)*sin(Rz_LN)) + cos(Rx_LN)*((-p11 + p12)*cos(Ry_LN)*cos(Rz_LN)*sin(Rz_LN) + sin(Rx_LN)*sin(Ry_LN)*(-p31 + p11*cos(Rz_LN)^2 + p12*sin(Rz_LN)^2))) + (cos(Rx_LN)^2*cos(Ry_LN)*cos(Rz_LN) - sin(Rx_LN)*(cos(Ry_LN)*cos(Rz_LN)*sin(Rx_LN) + sin(Ry_LN)*sin(Rz_LN)))*(p44*cos(Rx_LN)^2*cos(Rz_LN)*sin(Ry_LN) + p44*sin(Rx_LN)*(-(cos(Rz_LN)*sin(Rx_LN)*sin(Ry_LN)) + cos(Ry_LN)*sin(Rz_LN)) + p14*cos(Rx_LN)*(-(cos(Rz_LN)^2*sin(Rx_LN)*sin(Ry_LN)) + sin(Rx_LN)*sin(Ry_LN)*sin(Rz_LN)^2 + cos(Ry_LN)*sin(2*Rz_LN))) + (cos(Rx_LN)*(-(cos(Rz_LN)^2*sin(Ry_LN)) + sin(Ry_LN)*sin(Rz_LN)^2 + cos(Ry_LN)*sin(Rx_LN)*sin(2*Rz_LN))*(2*p41*cos(Rx_LN)^2*sin(Ry_LN)*sin(Rz_LN) - 2*p41*sin(Rx_LN)*(cos(Ry_LN)*cos(Rz_LN) + sin(Rx_LN)*sin(Ry_LN)*sin(Rz_LN)) + (p11 - p12)*cos(Rx_LN)*(cos(Ry_LN)*cos(2*Rz_LN) + sin(Rx_LN)*sin(Ry_LN)*sin(2*Rz_LN))))/2. + (cos(Rz_LN)*sin(Rx_LN)*sin(Ry_LN) + cos(2*Rx_LN)*cos(Ry_LN)*sin(Rz_LN))*(p44*cos(Rx_LN)^2*sin(Ry_LN)*sin(Rz_LN) - p44*sin(Rx_LN)*(cos(Ry_LN)*cos(Rz_LN) + sin(Rx_LN)*sin(Ry_LN)*sin(Rz_LN)) + p14*cos(Rx_LN)*(cos(Ry_LN)*cos(2*Rz_LN) + sin(Rx_LN)*sin(Ry_LN)*sin(2*Rz_LN)))
      DESCR_PREFIX:P64 = rotated p64 photoelastic tensor component
      P65 = (p13 - p33)*cos(Rx_LN)^3*cos(Ry_LN)*sin(Rx_LN)*sin(Ry_LN)^2 + (-(cos(Rz_LN)*sin(Ry_LN)) + cos(Ry_LN)*sin(Rx_LN)*sin(Rz_LN))*(cos(Ry_LN)*cos(Rz_LN) + sin(Rx_LN)*sin(Ry_LN)*sin(Rz_LN))*(p41*cos(Rx_LN)^2*cos(Rz_LN)*sin(Ry_LN) + p41*sin(Rx_LN)*(-(cos(Rz_LN)*sin(Rx_LN)*sin(Ry_LN)) + cos(Ry_LN)*sin(Rz_LN)) + cos(Rx_LN)*((p11 - p12)*cos(Ry_LN)*cos(Rz_LN)*sin(Rz_LN) + sin(Rx_LN)*sin(Ry_LN)*(-p31 + p12*cos(Rz_LN)^2 + p11*sin(Rz_LN)^2))) + (cos(Rz_LN)*sin(Rx_LN)*sin(Ry_LN) - cos(Ry_LN)*sin(Rz_LN))*(cos(Ry_LN)*cos(Rz_LN)*sin(Rx_LN) + sin(Ry_LN)*sin(Rz_LN))*(-(p41*cos(Rx_LN)^2*cos(Rz_LN)*sin(Ry_LN)) + p41*sin(Rx_LN)*(cos(Rz_LN)*sin(Rx_LN)*sin(Ry_LN) - cos(Ry_LN)*sin(Rz_LN)) + cos(Rx_LN)*((-p11 + p12)*cos(Ry_LN)*cos(Rz_LN)*sin(Rz_LN) + sin(Rx_LN)*sin(Ry_LN)*(-p31 + p11*cos(Rz_LN)^2 + p12*sin(Rz_LN)^2))) - cos(Rx_LN)*(-2*cos(Ry_LN)*cos(Rz_LN)*sin(Rx_LN)*sin(Ry_LN) + cos(Ry_LN)^2*sin(Rz_LN) - sin(Ry_LN)^2*sin(Rz_LN))*(p44*cos(Rx_LN)^2*cos(Rz_LN)*sin(Ry_LN) + p44*sin(Rx_LN)*(-(cos(Rz_LN)*sin(Rx_LN)*sin(Ry_LN)) + cos(Ry_LN)*sin(Rz_LN)) + p14*cos(Rx_LN)*(-(cos(Rz_LN)^2*sin(Rx_LN)*sin(Ry_LN)) + sin(Rx_LN)*sin(Ry_LN)*sin(Rz_LN)^2 + cos(Ry_LN)*sin(2*Rz_LN))) + ((4*cos(Ry_LN)^2*cos(2*Rz_LN)*sin(Rx_LN) - 4*cos(2*Rz_LN)*sin(Rx_LN)*sin(Ry_LN)^2 - (-3 + cos(2*Rx_LN))*sin(2*Ry_LN)*sin(2*Rz_LN))*(2*p41*cos(Rx_LN)^2*sin(Ry_LN)*sin(Rz_LN) - 2*p41*sin(Rx_LN)*(cos(Ry_LN)*cos(Rz_LN) + sin(Rx_LN)*sin(Ry_LN)*sin(Rz_LN)) + (p11 - p12)*cos(Rx_LN)*(cos(Ry_LN)*cos(2*Rz_LN) + sin(Rx_LN)*sin(Ry_LN)*sin(2*Rz_LN))))/8. + cos(Rx_LN)*(cos(Ry_LN)^2*cos(Rz_LN) - cos(Rz_LN)*sin(Ry_LN)^2 + sin(Rx_LN)*sin(2*Ry_LN)*sin(Rz_LN))*(p44*cos(Rx_LN)^2*sin(Ry_LN)*sin(Rz_LN) - p44*sin(Rx_LN)*(cos(Ry_LN)*cos(Rz_LN) + sin(Rx_LN)*sin(Ry_LN)*sin(Rz_LN)) + p14*cos(Rx_LN)*(cos(Ry_LN)*cos(2*Rz_LN) + sin(Rx_LN)*sin(Ry_LN)*sin(2*Rz_LN)))
      DESCR_PREFIX:P65 = rotated p65 photoelastic tensor component
      P66 = (-p13 + p33)*cos(Rx_LN)^2*sin(Rx_LN)^2*sin(Ry_LN)^2 + cos(Rx_LN)*sin(Rz_LN)*(cos(Ry_LN)*cos(Rz_LN) + sin(Rx_LN)*sin(Ry_LN)*sin(Rz_LN))*(p41*cos(Rx_LN)^2*cos(Rz_LN)*sin(Ry_LN) + p41*sin(Rx_LN)*(-(cos(Rz_LN)*sin(Rx_LN)*sin(Ry_LN)) + cos(Ry_LN)*sin(Rz_LN)) + cos(Rx_LN)*((p11 - p12)*cos(Ry_LN)*cos(Rz_LN)*sin(Rz_LN) + sin(Rx_LN)*sin(Ry_LN)*(-p31 + p12*cos(Rz_LN)^2 + p11*sin(Rz_LN)^2))) + cos(Rx_LN)*cos(Rz_LN)*(cos(Rz_LN)*sin(Rx_LN)*sin(Ry_LN) - cos(Ry_LN)*sin(Rz_LN))*(-(p41*cos(Rx_LN)^2*cos(Rz_LN)*sin(Ry_LN)) + p41*sin(Rx_LN)*(cos(Rz_LN)*sin(Rx_LN)*sin(Ry_LN) - cos(Ry_LN)*sin(Rz_LN)) + cos(Rx_LN)*((-p11 + p12)*cos(Ry_LN)*cos(Rz_LN)*sin(Rz_LN) + sin(Rx_LN)*sin(Ry_LN)*(-p31 + p11*cos(Rz_LN)^2 + p12*sin(Rz_LN)^2))) + (cos(Rx_LN)^2*cos(Rz_LN)*sin(Ry_LN) + sin(Rx_LN)*(-(cos(Rz_LN)*sin(Rx_LN)*sin(Ry_LN)) + cos(Ry_LN)*sin(Rz_LN)))*(p44*cos(Rx_LN)^2*cos(Rz_LN)*sin(Ry_LN) + p44*sin(Rx_LN)*(-(cos(Rz_LN)*sin(Rx_LN)*sin(Ry_LN)) + cos(Ry_LN)*sin(Rz_LN)) + p14*cos(Rx_LN)*(-(cos(Rz_LN)^2*sin(Rx_LN)*sin(Ry_LN)) + sin(Rx_LN)*sin(Ry_LN)*sin(Rz_LN)^2 + cos(Ry_LN)*sin(2*Rz_LN))) + (cos(Rx_LN)*(cos(Ry_LN)*cos(2*Rz_LN) + sin(Rx_LN)*sin(Ry_LN)*sin(2*Rz_LN))*(2*p41*cos(Rx_LN)^2*sin(Ry_LN)*sin(Rz_LN) - 2*p41*sin(Rx_LN)*(cos(Ry_LN)*cos(Rz_LN) + sin(Rx_LN)*sin(Ry_LN)*sin(Rz_LN)) + (p11 - p12)*cos(Rx_LN)*(cos(Ry_LN)*cos(2*Rz_LN) + sin(Rx_LN)*sin(Ry_LN)*sin(2*Rz_LN))))/2. - (cos(Ry_LN)*cos(Rz_LN)*sin(Rx_LN) - cos(2*Rx_LN)*sin(Ry_LN)*sin(Rz_LN))*(p44*cos(Rx_LN)^2*sin(Ry_LN)*sin(Rz_LN) - p44*sin(Rx_LN)*(cos(Ry_LN)*cos(Rz_LN) + sin(Rx_LN)*sin(Ry_LN)*sin(Rz_LN)) + p14*cos(Rx_LN)*(cos(Ry_LN)*cos(2*Rz_LN) + sin(Rx_LN)*sin(Ry_LN)*sin(2*Rz_LN)))
      DESCR_PREFIX:P66 = rotated p66 photoelastic tensor component
      epsr11 = noref_sel(lambda0)^2*sin(Rx_LN)^2+cos(Rx_LN)^2*(noref_sel(lambda0)^2*cos(Ry_LN)^2+neref_sel(lambda0)^2*sin(Ry_LN)^2)
      DESCR_PREFIX:epsr11 = rotated unperturbed epsr11 linear relative permittivity component
      epsr12 = (noref_sel(lambda0)^2-neref_sel(lambda0)^2)*cos(Rx_LN)*sin(Rx_LN)*sin(Ry_LN)
      DESCR_PREFIX:epsr12 = rotated unperturbed epsr12 linear relative permittivity component
      epsr13 = (-noref_sel(lambda0)^2+neref_sel(lambda0)^2)*cos(Rx_LN)^2*cos(Ry_LN)*sin(Ry_LN)
      DESCR_PREFIX:epsr13 = rotated unperturbed epsr13 linear relative permittivity component
      epsr21 = (noref_sel(lambda0)^2-neref_sel(lambda0)^2)*cos(Rx_LN)*sin(Rx_LN)*sin(Ry_LN)
      DESCR_PREFIX:epsr21 = rotated unperturbed epsr21 linear relative permittivity component
      epsr22 = (noref_sel(lambda0)^2+neref_sel(lambda0)^2+(noref_sel(lambda0)^2-neref_sel(lambda0)^2)*cos(2*Rx_LN))/2.
      DESCR_PREFIX:epsr22 = rotated unperturbed epsr22 linear relative permittivity component
      epsr23 = (noref_sel(lambda0)^2-neref_sel(lambda0)^2)*cos(Rx_LN)*cos(Ry_LN)*sin(Rx_LN)
      DESCR_PREFIX:epsr23 = rotated unperturbed epsr23 linear relative permittivity component
      epsr31 = (-noref_sel(lambda0)^2+neref_sel(lambda0)^2)*cos(Rx_LN)^2*cos(Ry_LN)*sin(Ry_LN)
      DESCR_PREFIX:epsr31 = rotated unperturbed epsr31 linear relative permittivity component
      epsr32 = (noref_sel(lambda0)^2-neref_sel(lambda0)^2)*cos(Rx_LN)*cos(Ry_LN)*sin(Rx_LN)
      DESCR_PREFIX:epsr32 = rotated unperturbed epsr32 linear relative permittivity component
      epsr33 = noref_sel(lambda0)^2*sin(Rx_LN)^2+cos(Rx_LN)^2*(neref_sel(lambda0)^2*cos(Ry_LN)^2+noref_sel(lambda0)^2*sin(Ry_LN)^2)
      DESCR_PREFIX:epsr33 = rotated unperturbed epsr33 linear relative permittivity component
      e11 = 0[C/m^2]
      DESCR_PREFIX:e11 = e11, piezoelectric stress-charge tensor component
      e12 = 0[C/m^2]
      DESCR_PREFIX:e12 = e12, piezoelectric stress-charge tensor component
      e13 = 0[C/m^2]
      DESCR_PREFIX:e13 = e13, piezoelectric stress-charge tensor component
      e14 = 0[C/m^2]
      DESCR_PREFIX:e14 = e14, piezoelectric stress-charge tensor component
      e15 = 3.65[C/m^2]
      DESCR_PREFIX:e15 = e15, piezoelectric stress-charge tensor component
      e16 = -e22
      DESCR_PREFIX:e16 = e16, piezoelectric stress-charge tensor component
      e21 = -e22
      DESCR_PREFIX:e21 = e21, piezoelectric stress-charge tensor component
      e22 = 2.39[C/m^2]
      DESCR_PREFIX:e22 = e22, piezoelectric stress-charge tensor component
      e23 = 0[C/m^2]
      DESCR_PREFIX:e23 = e23, piezoelectric stress-charge tensor component
      e24 = e15
      DESCR_PREFIX:e24 = e24, piezoelectric stress-charge tensor component
      e25 = 0[C/m^2]
      DESCR_PREFIX:e25 = e25, piezoelectric stress-charge tensor component
      e26 = 0[C/m^2]
      DESCR_PREFIX:e26 = e26, piezoelectric stress-charge tensor component
      e31 = 0.31[C/m^2]
      DESCR_PREFIX:e31 = e31, piezoelectric stress-charge tensor component
      e32 = e31
      DESCR_PREFIX:e32 = e32, piezoelectric stress-charge tensor component
      e33 = 1.72[C/m^2]
      DESCR_PREFIX:e33 = e33, piezoelectric stress-charge tensor component
      e34 = 0[C/m^2]
      DESCR_PREFIX:e34 = e34, piezoelectric stress-charge tensor component
      e35 = 0[C/m^2]
      DESCR_PREFIX:e35 = e35, piezoelectric stress-charge tensor component
      e36 = 0[C/m^2]
      DESCR_PREFIX:e36 = e36, piezoelectric stress-charge tensor component
      E11 = ((2*e15 + e31)*cos(Rx_LN)*(6 - 2*cos(2*Rx_LN) + cos(2*(Rx_LN - Ry_LN)) + 2*cos(2*Ry_LN) + cos(2*(Rx_LN + Ry_LN)))*sin(Ry_LN))/8. + e33*cos(Rx_LN)^3*sin(Ry_LN)^3 + e22*(-3*cos(Ry_LN)^2*cos(3*Rz_LN)*sin(Rx_LN)*sin(Ry_LN) + cos(Rz_LN)*(-1 + 2*cos(2*Rz_LN))*sin(Rx_LN)^3*sin(Ry_LN)^3 + cos(Ry_LN)^3*sin(3*Rz_LN) - 3*cos(Ry_LN)*sin(Rx_LN)^2*sin(Ry_LN)^2*sin(3*Rz_LN))
      DESCR_PREFIX:E11 = rotated e11 piezoelectric stress-charge tensor component
      E12 = cos(Rx_LN)*(e31*cos(Rx_LN)^2*sin(Ry_LN) + (-2*e15 + e33)*sin(Rx_LN)^2*sin(Ry_LN) + e22*cos(Rx_LN)*(cos(Rz_LN)^3*sin(Rx_LN)*sin(Ry_LN) - 3*cos(Ry_LN)*cos(Rz_LN)^2*sin(Rz_LN) - 3*cos(Rz_LN)*sin(Rx_LN)*sin(Ry_LN)*sin(Rz_LN)^2 + cos(Ry_LN)*sin(Rz_LN)^3))
      DESCR_PREFIX:E12 = rotated e12 piezoelectric stress-charge tensor component
      E13 = e33*cos(Rx_LN)^3*cos(Ry_LN)^2*sin(Ry_LN) - (cos(Rx_LN)*(4*e15 - 6*e31 + 2*(2*e15 + e31)*cos(2*Rx_LN) + (2*e15 + e31)*cos(2*(Rx_LN - Ry_LN)) + 4*e15*cos(2*Ry_LN) + 2*e31*cos(2*Ry_LN) + 2*e15*cos(2*(Rx_LN + Ry_LN)) + e31*cos(2*(Rx_LN + Ry_LN)))*sin(Ry_LN))/8. - (e22*(cos(Ry_LN)^2*cos(3*Rz_LN)*(-11*sin(Rx_LN) + sin(3*Rx_LN))*sin(Ry_LN) + 4*cos(Rz_LN)*(-1 + 2*cos(2*Rz_LN))*sin(Rx_LN)*sin(Ry_LN)^3 + 4*cos(Ry_LN)^3*sin(Rx_LN)^2*sin(3*Rz_LN) + 4*(-2 + cos(2*Rx_LN))*cos(Ry_LN)*sin(Ry_LN)^2*sin(3*Rz_LN)))/4.
      DESCR_PREFIX:E13 = rotated e13 piezoelectric stress-charge tensor component
      E14 = (cos(Rx_LN)*(-((e22*cos(2*Rx_LN - 3*Rz_LN) - 6*e22*cos(3*Rz_LN) + e22*cos(2*Rx_LN + 3*Rz_LN) - 4*e15*sin(2*Rx_LN) - 2*e31*sin(2*Rx_LN) + 2*e33*sin(2*Rx_LN))*sin(2*Ry_LN)) + 8*e22*(1 + 2*cos(2*Rz_LN))*sin(Rx_LN)*sin(Ry_LN)^2*sin(Rz_LN) - 8*e22*cos(Ry_LN)^2*sin(Rx_LN)*sin(3*Rz_LN)))/8.
      DESCR_PREFIX:E14 = rotated e14 piezoelectric stress-charge tensor component
      E15 = (cos(Rx_LN)*cos(Ry_LN)*(4*e15 - 2*e31 - 2*(2*e15 + e31)*cos(2*Rx_LN) + (2*e15 + e31)*cos(2*(Rx_LN - Ry_LN)) + 4*e15*cos(2*Ry_LN) + 2*e31*cos(2*Ry_LN) + 2*e15*cos(2*(Rx_LN + Ry_LN)) + e31*cos(2*(Rx_LN + Ry_LN))))/8. - e22*cos(Ry_LN)^3*cos(3*Rz_LN)*sin(Rx_LN) + e33*cos(Rx_LN)^3*cos(Ry_LN)*sin(Ry_LN)^2 - (e22*cos(Ry_LN)*cos(3*Rz_LN)*(-11*sin(Rx_LN) + sin(3*Rx_LN))*sin(Ry_LN)^2)/4. + e22*(1 + 2*cos(2*Rz_LN))*sin(Rx_LN)^2*sin(Ry_LN)^3*sin(Rz_LN) + e22*(-2 + cos(2*Rx_LN))*cos(Ry_LN)^2*sin(Ry_LN)*sin(3*Rz_LN)
      DESCR_PREFIX:E15 = rotated e15 piezoelectric stress-charge tensor component
      E16 = -0.125*(e15*(6 - 2*cos(2*Rx_LN) + cos(2*(Rx_LN - Ry_LN)) + 2*cos(2*Ry_LN) + cos(2*(Rx_LN + Ry_LN)))*sin(Rx_LN)) + (e15 + e31 - e33)*cos(Rx_LN)^2*sin(Rx_LN)*sin(Ry_LN)^2 + e22*cos(Rx_LN)*(-(cos(Ry_LN)^2*cos(3*Rz_LN)) - 6*cos(Ry_LN)*cos(Rz_LN)^2*sin(Rx_LN)*sin(Ry_LN)*sin(Rz_LN) + sin(Rx_LN)*(cos(Rz_LN)^3*sin(Rx_LN)*sin(Ry_LN)^2 - 3*cos(Rz_LN)*sin(Rx_LN)*sin(Ry_LN)^2*sin(Rz_LN)^2 + sin(2*Ry_LN)*sin(Rz_LN)^3))
      DESCR_PREFIX:E16 = rotated e16 piezoelectric stress-charge tensor component
      E21 = -0.125*(e31*(6 - 2*cos(2*Rx_LN) + cos(2*(Rx_LN - Ry_LN)) + 2*cos(2*Ry_LN) + cos(2*(Rx_LN + Ry_LN)))*sin(Rx_LN)) + (2*e15 - e33)*cos(Rx_LN)^2*sin(Rx_LN)*sin(Ry_LN)^2 + e22*cos(Rx_LN)*(-(cos(Ry_LN)^2*cos(3*Rz_LN)) - 6*cos(Ry_LN)*cos(Rz_LN)^2*sin(Rx_LN)*sin(Ry_LN)*sin(Rz_LN) + sin(Rx_LN)*(cos(Rz_LN)^3*sin(Rx_LN)*sin(Ry_LN)^2 - 3*cos(Rz_LN)*sin(Rx_LN)*sin(Ry_LN)^2*sin(Rz_LN)^2 + sin(2*Ry_LN)*sin(Rz_LN)^3))
      DESCR_PREFIX:E21 = rotated e21 piezoelectric stress-charge tensor component
      E22 = (3*e22*cos(Rx_LN - 3*Rz_LN) + e22*cos(3*(Rx_LN - Rz_LN)) + e22*cos(3*(Rx_LN + Rz_LN)) + 3*e22*cos(Rx_LN + 3*Rz_LN) - 4*e15*sin(Rx_LN) - 2*e31*sin(Rx_LN) - 6*e33*sin(Rx_LN) - 4*e15*sin(3*Rx_LN) - 2*e31*sin(3*Rx_LN) + 2*e33*sin(3*Rx_LN))/8.
      DESCR_PREFIX:E22 = rotated e22 piezoelectric stress-charge tensor component
      E23 = (2*e15 - e33)*cos(Rx_LN)^2*cos(Ry_LN)^2*sin(Rx_LN) + (e31*(-6 + 2*cos(2*Rx_LN) + cos(2*(Rx_LN - Ry_LN)) + 2*cos(2*Ry_LN) + cos(2*(Rx_LN + Ry_LN)))*sin(Rx_LN))/8. + e22*cos(Rx_LN)*(cos(Ry_LN)^2*cos(3*Rz_LN)*sin(Rx_LN)^2 - cos(Rz_LN)*(-1 + 2*cos(2*Rz_LN))*sin(Ry_LN)^2 + sin(Rx_LN)*sin(2*Ry_LN)*sin(3*Rz_LN))
      DESCR_PREFIX:E23 = rotated e23 piezoelectric stress-charge tensor component
      E24 = cos(Rx_LN)*(e22*cos(Rx_LN)*(1 + 2*cos(2*Rz_LN))*sin(Ry_LN)*sin(Rz_LN) + (cos(Ry_LN)*(-2*e31 + 2*e33 + 2*(2*e15 + e31 - e33)*cos(2*Rx_LN) + e22*sin(2*Rx_LN - 3*Rz_LN) + e22*sin(2*Rx_LN + 3*Rz_LN)))/4.)
      DESCR_PREFIX:E24 = rotated e24 piezoelectric stress-charge tensor component
      E25 = (cos(Rx_LN)*(-((e22*cos(2*Rx_LN - 3*Rz_LN) - 6*e22*cos(3*Rz_LN) + e22*cos(2*Rx_LN + 3*Rz_LN) - 4*e15*sin(2*Rx_LN) - 2*e31*sin(2*Rx_LN) + 2*e33*sin(2*Rx_LN))*sin(2*Ry_LN)) + 8*e22*(1 + 2*cos(2*Rz_LN))*sin(Rx_LN)*sin(Ry_LN)^2*sin(Rz_LN) - 8*e22*cos(Ry_LN)^2*sin(Rx_LN)*sin(3*Rz_LN)))/8.
      DESCR_PREFIX:E25 = rotated e25 piezoelectric stress-charge tensor component
      E26 = cos(Rx_LN)*(-(e22*cos(Rx_LN)*cos(Ry_LN)*(1 + 2*cos(2*Rz_LN))*sin(Rz_LN)) + (sin(Ry_LN)*(-2*e31 + 2*e33 + 2*(2*e15 + e31 - e33)*cos(2*Rx_LN) + e22*sin(2*Rx_LN - 3*Rz_LN) + e22*sin(2*Rx_LN + 3*Rz_LN)))/4.)
      DESCR_PREFIX:E26 = rotated e26 piezoelectric stress-charge tensor component
      E31 = (cos(Rx_LN)*cos(Ry_LN)*(-4*e15 + 6*e31 - 2*(2*e15 + e31)*cos(2*Rx_LN) + (2*e15 + e31)*cos(2*(Rx_LN - Ry_LN)) + 4*e15*cos(2*Ry_LN) + 2*e31*cos(2*Ry_LN) + 2*e15*cos(2*(Rx_LN + Ry_LN)) + e31*cos(2*(Rx_LN + Ry_LN))))/8. + e33*cos(Rx_LN)^3*cos(Ry_LN)*sin(Ry_LN)^2 + e22*(-(cos(Ry_LN)^3*cos(3*Rz_LN)*sin(Rx_LN)) - (cos(Ry_LN)*cos(3*Rz_LN)*(-11*sin(Rx_LN) + sin(3*Rx_LN))*sin(Ry_LN)^2)/4. + (1 + 2*cos(2*Rz_LN))*sin(Rx_LN)^2*sin(Ry_LN)^3*sin(Rz_LN) + (-2 + cos(2*Rx_LN))*cos(Ry_LN)^2*sin(Ry_LN)*sin(3*Rz_LN))
      DESCR_PREFIX:E31 = rotated e31 piezoelectric stress-charge tensor component
      E32 = cos(Rx_LN)*(e31*cos(Rx_LN)^2*cos(Ry_LN) + (-2*e15 + e33)*cos(Ry_LN)*sin(Rx_LN)^2 + e22*cos(Rx_LN)*(cos(Ry_LN)*cos(3*Rz_LN)*sin(Rx_LN) + (1 + 2*cos(2*Rz_LN))*sin(Ry_LN)*sin(Rz_LN)))
      DESCR_PREFIX:E32 = rotated e32 piezoelectric stress-charge tensor component
      E33 = e33*cos(Rx_LN)^3*cos(Ry_LN)^3 - ((2*e15 + e31)*cos(Rx_LN)*cos(Ry_LN)*(-6 + 2*cos(2*Rx_LN) + cos(2*(Rx_LN - Ry_LN)) + 2*cos(2*Ry_LN) + cos(2*(Rx_LN + Ry_LN))))/8. + e22*(cos(Ry_LN)^3*cos(3*Rz_LN)*sin(Rx_LN)^3 - 3*cos(Ry_LN)*cos(3*Rz_LN)*sin(Rx_LN)*sin(Ry_LN)^2 - (1 + 2*cos(2*Rz_LN))*sin(Ry_LN)^3*sin(Rz_LN) + 3*cos(Ry_LN)^2*sin(Rx_LN)^2*sin(Ry_LN)*sin(3*Rz_LN))
      DESCR_PREFIX:E33 = rotated e33 piezoelectric stress-charge tensor component
      E34 = (e15 + e31 - e33)*cos(Rx_LN)^2*cos(Ry_LN)^2*sin(Rx_LN) + (e15*(-6 + 2*cos(2*Rx_LN) + cos(2*(Rx_LN - Ry_LN)) + 2*cos(2*Ry_LN) + cos(2*(Rx_LN + Ry_LN)))*sin(Rx_LN))/8. + e22*cos(Rx_LN)*(cos(Ry_LN)^2*cos(3*Rz_LN)*sin(Rx_LN)^2 - cos(Rz_LN)*(-1 + 2*cos(2*Rz_LN))*sin(Ry_LN)^2 + sin(Rx_LN)*sin(2*Ry_LN)*sin(3*Rz_LN))
      DESCR_PREFIX:E34 = rotated e34 piezoelectric stress-charge tensor component
      E35 = e33*cos(Rx_LN)^3*cos(Ry_LN)^2*sin(Ry_LN) - (cos(Rx_LN)*(-4*e15 + 2*e31 + 2*(2*e15 + e31)*cos(2*Rx_LN) + (2*e15 + e31)*cos(2*(Rx_LN - Ry_LN)) + 4*e15*cos(2*Ry_LN) + 2*e31*cos(2*Ry_LN) + 2*e15*cos(2*(Rx_LN + Ry_LN)) + e31*cos(2*(Rx_LN + Ry_LN)))*sin(Ry_LN))/8. - (e22*(cos(Ry_LN)^2*cos(3*Rz_LN)*(-11*sin(Rx_LN) + sin(3*Rx_LN))*sin(Ry_LN) + 4*cos(Rz_LN)*(-1 + 2*cos(2*Rz_LN))*sin(Rx_LN)*sin(Ry_LN)^3 + 4*cos(Ry_LN)^3*sin(Rx_LN)^2*sin(3*Rz_LN) + 4*(-2 + cos(2*Rx_LN))*cos(Ry_LN)*sin(Ry_LN)^2*sin(3*Rz_LN)))/4.
      DESCR_PREFIX:E35 = rotated e35 piezoelectric stress-charge tensor component
      E36 = (cos(Rx_LN)*(-((e22*cos(2*Rx_LN - 3*Rz_LN) - 6*e22*cos(3*Rz_LN) + e22*cos(2*Rx_LN + 3*Rz_LN) - 4*e15*sin(2*Rx_LN) - 2*e31*sin(2*Rx_LN) + 2*e33*sin(2*Rx_LN))*sin(2*Ry_LN)) + 8*e22*(1 + 2*cos(2*Rz_LN))*sin(Rx_LN)*sin(Ry_LN)^2*sin(Rz_LN) - 8*e22*cos(Ry_LN)^2*sin(Rx_LN)*sin(3*Rz_LN)))/8.
      DESCR_PREFIX:E36 = rotated e36 piezoelectric stress-charge tensor component
      an1: Analytic "Sellmeyer formula - ordinary refractive index"
        funcname = noref_sel
        expr = (1 + ((lambda0^(2))*2.6734e12)/((lambda0^(2))*1e12 - 0.01764) + ((lambda0^(2))*1.22901e12)/((lambda0^(2))*1e12 - 0.05914) + ((lambda0^(2))*12.614e12)/((lambda0^(2))*1e12 - 474.60))^(1./2.)
        args = lambda0
        argunit = m
      an2: Analytic "Sellmeyer formula - extraordinary refractive index"
        funcname = neref_sel
        expr = (1 + ((lambda0^(2))*2.9804e12)/((lambda0^(2))*1e12 - 0.02047) + ((lambda0^(2))*0.5981e12)/((lambda0^(2))*1e12 - 0.0666) + ((lambda0^(2))*8.9543e12)/((lambda0^(2))*1e12 - 416.08))^(1./2.)
        args = lambda0
        argunit = m
    Anisotropic
      D = {C11, C12, C13, C16, C14, C15, C12, C22, C23, C26, C24, C25, C13, C23, C33, C36, C34, C35, C16, C26, C36, C66, C64, C65, C14, C24, C34, C64, C44, C45, C15, C25, C35, C65, C45, C55}
      eta_D = {0, 0, 0, 0, 0, 0, 0, 0, 0, 0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}
      c11 = 1.9883e11[Pa]
      DESCR_PREFIX:c11 = (measured) c11, elastic stiffnesses component
      c12 = 0.5464e11[Pa]
      DESCR_PREFIX:c12 = (measured) c12, elastic stiffnesses component
      c13 = 0.6823e11[Pa]
      DESCR_PREFIX:c13 = (measured) c13, elastic stiffnesses component
      c14 = 0.0783e11[Pa]
      DESCR_PREFIX:c14 = (measured) c14, elastic stiffnesses component
      c15 = 0[Pa]
      DESCR_PREFIX:c15 = c15, elastic stiffnesses component
      c16 = 0[Pa]
      DESCR_PREFIX:c16 = c16, elastic stiffnesses component
      c21 = c12
      DESCR_PREFIX:c21 = c21, elastic stiffnesses component
      c22 = c11
      DESCR_PREFIX:c22 = c22, elastic stiffnesses component
      c23 = c13
      DESCR_PREFIX:c23 = c23, elastic stiffnesses component
      c24 = -c14
      DESCR_PREFIX:c24 = c24, elastic stiffnesses component
      c25 = 0[Pa]
      DESCR_PREFIX:c25 = c25, elastic stiffnesses component
      c26 = 0[Pa]
      DESCR_PREFIX:c26 = c26, elastic stiffnesses component
      c31 = c13
      DESCR_PREFIX:c31 = c31, elastic stiffnesses component
      c32 = c13
      DESCR_PREFIX:c32 = c32, elastic stiffnesses component
      c33 = 2.3571e11[Pa]
      DESCR_PREFIX:c33 = (measured) c33, elastic stiffnesses component
      c34 = 0[Pa]
      DESCR_PREFIX:c34 = c34, elastic stiffnesses component
      c35 = 0[Pa]
      DESCR_PREFIX:c35 = c35, elastic stiffnesses component
      c36 = 0[Pa]
      DESCR_PREFIX:c36 = c36, elastic stiffnesses component
      c41 = c14
      DESCR_PREFIX:c41 = c41, elastic stiffnesses component
      c42 = -c14
      DESCR_PREFIX:c42 = c42, elastic stiffnesses component
      c43 = 0[Pa]
      DESCR_PREFIX:c43 = c43, elastic stiffnesses component
      c44 = 0.5986e11[Pa]
      DESCR_PREFIX:c44 = (measured) c44, elastic stiffnesses component
      c45 = 0[Pa]
      DESCR_PREFIX:c45 = c45, elastic stiffnesses component
      c46 = 0[Pa]
      DESCR_PREFIX:c46 = c46, elastic stiffnesses component
      c51 = 0[Pa]
      DESCR_PREFIX:c51 = c51, elastic stiffnesses component
      c52 = 0[Pa]
      DESCR_PREFIX:c52 = c52, elastic stiffnesses component
      c53 = 0[Pa]
      DESCR_PREFIX:c53 = c53, elastic stiffnesses component
      c54 = 0[Pa]
      DESCR_PREFIX:c54 = c54, elastic stiffnesses component
      c55 = c44
      DESCR_PREFIX:c55 = c55, elastic stiffnesses component
      c56 = c14
      DESCR_PREFIX:c56 = c56, elastic stiffnesses component
      c61 = 0[Pa]
      DESCR_PREFIX:c61 = c61, elastic stiffnesses component
      c62 = 0[Pa]
      DESCR_PREFIX:c62 = c62, elastic stiffnesses component
      c63 = 0[Pa]
      DESCR_PREFIX:c63 = c63, elastic stiffnesses component
      c64 = 0[Pa]
      DESCR_PREFIX:c64 = c64, elastic stiffnesses component
      c65 = c14
      DESCR_PREFIX:c65 = c65, elastic stiffnesses component
      c66 = 0.5*(c11-c12)
      DESCR_PREFIX:c66 = c66, elastic stiffnesses component
      C11 = c11*cos(Ry_LN)^4 + c33*cos(Rx_LN)^4*sin(Ry_LN)^4 + 2*cos(Rx_LN)^2*(c13 + c44 + c44*cos(2*Rz_LN))*sin(Rx_LN)^2*sin(Ry_LN)^4 - 4*c14*cos(Rx_LN)*cos(3*Rz_LN)*sin(Rx_LN)^3*sin(Ry_LN)^4 + c11*cos(Rz_LN)^4*sin(Rx_LN)^4*sin(Ry_LN)^4 + 2*c11*cos(Rz_LN)^2*sin(Rx_LN)^4*sin(Ry_LN)^4*sin(Rz_LN)^2 + c44*sin(2*Rx_LN)^2*sin(Ry_LN)^4*sin(Rz_LN)^2 - (9*c14*cos(Rz_LN)*sin(2*Rx_LN)*sin(2*Ry_LN)^2*sin(Rz_LN)^2)/2. + c11*sin(Rx_LN)^4*sin(Ry_LN)^4*sin(Rz_LN)^4 + 2*cos(Ry_LN)^2*sin(Ry_LN)^2*((c13 + 2*c44)*cos(Rx_LN)^2 + c11*cos(Rz_LN)^4*sin(Rx_LN)^2 + 3*c14*cos(Rz_LN)^3*sin(2*Rx_LN) + c11*sin(Rx_LN)^2*sin(Rz_LN)^4) + (c11*sin(Rx_LN)^2*sin(2*Ry_LN)^2*sin(2*Rz_LN)^2)/4. - 4*c14*cos(Rx_LN)*cos(Ry_LN)^3*sin(Ry_LN)*sin(3*Rz_LN) + 12*c14*cos(Rx_LN)*cos(Ry_LN)*sin(Rx_LN)^2*sin(Ry_LN)^3*sin(3*Rz_LN)
      DESCR_PREFIX:C11 = rotated c11 elastic stiffnesses component
      C12 = (cos(Rx_LN)^2*(2*c11 + 4*c12 - 8*c44 - 2*(c11 - 4*c44)*cos(2*Rx_LN) + (c11 - 4*c44)*cos(2*(Rx_LN - Ry_LN)) - 2*c11*cos(2*Ry_LN) + 4*c12*cos(2*Ry_LN) + 8*c44*cos(2*Ry_LN) + c11*cos(2*(Rx_LN + Ry_LN)) - 4*c44*cos(2*(Rx_LN + Ry_LN))))/8. + c13*cos(Rx_LN)^4*sin(Ry_LN)^2 + (sin(Rx_LN)^2*(2*c13*cos(Ry_LN)^2 + (c13 + c33 + (-c13 + c33)*cos(2*Rx_LN))*sin(Ry_LN)^2))/2. - 2*c14*cos(Rx_LN)^3*sin(Ry_LN)*(cos(Rz_LN)^3*sin(Rx_LN)*sin(Ry_LN) - 3*cos(Ry_LN)*cos(Rz_LN)^2*sin(Rz_LN) - 3*cos(Rz_LN)*sin(Rx_LN)*sin(Ry_LN)*sin(Rz_LN)^2 + cos(Ry_LN)*sin(Rz_LN)^3) - 2*c14*cos(Rx_LN)*sin(Rx_LN)*(cos(Ry_LN)^2*cos(3*Rz_LN) + sin(Rx_LN)*(-(cos(Rz_LN)*(-1 + 2*cos(2*Rz_LN))*sin(Rx_LN)*sin(Ry_LN)^2) + sin(2*Ry_LN)*sin(3*Rz_LN)))
      DESCR_PREFIX:C12 = rotated c12 elastic stiffnesses component
      C13 = cos(Rx_LN)^2*cos(Ry_LN)^2*(c13*cos(Ry_LN)^2 + ((c13 + c33 + (-c13 + c33)*cos(2*Rx_LN))*sin(Ry_LN)^2)/2.) + 4*cos(Rx_LN)*cos(Ry_LN)*(c44*cos(Rx_LN)*sin(Ry_LN) + c14*cos(Rz_LN)*sin(Rx_LN)*sin(Ry_LN) - c14*cos(Ry_LN)*sin(Rz_LN))*(-(cos(Rz_LN)*sin(Ry_LN)) + cos(Ry_LN)*sin(Rx_LN)*sin(Rz_LN))*(cos(Ry_LN)*cos(Rz_LN) + sin(Rx_LN)*sin(Ry_LN)*sin(Rz_LN)) + 2*cos(Rx_LN)*cos(Ry_LN)*(cos(Ry_LN)*cos(Rz_LN)*sin(Rx_LN) + sin(Ry_LN)*sin(Rz_LN))*(c14*cos(Ry_LN)^2*cos(2*Rz_LN) + sin(Rx_LN)*(2*c44*cos(Rx_LN)*cos(Rz_LN) - c14*cos(2*Rz_LN)*sin(Rx_LN))*sin(Ry_LN)^2 - 2*cos(Ry_LN)*(c44*cos(Rx_LN) - 2*c14*cos(Rz_LN)*sin(Rx_LN))*sin(Ry_LN)*sin(Rz_LN)) + 2*(-(cos(Rz_LN)*sin(Ry_LN)) + cos(Ry_LN)*sin(Rx_LN)*sin(Rz_LN))*(cos(Ry_LN)*cos(Rz_LN)*sin(Rx_LN) + sin(Ry_LN)*sin(Rz_LN))*(cos(Ry_LN)*cos(Rz_LN) + sin(Rx_LN)*sin(Ry_LN)*sin(Rz_LN))*(2*c14*cos(Rx_LN)*sin(Ry_LN) + (c11 - c12)*(cos(Rz_LN)*sin(Rx_LN)*sin(Ry_LN) - cos(Ry_LN)*sin(Rz_LN))) + (cos(Rz_LN)*sin(Ry_LN) - cos(Ry_LN)*sin(Rx_LN)*sin(Rz_LN))^2*(c13*cos(Rx_LN)^2*sin(Ry_LN)^2 + 2*c14*cos(Rx_LN)*sin(Ry_LN)*(cos(Rz_LN)*sin(Rx_LN)*sin(Ry_LN) - cos(Ry_LN)*sin(Rz_LN)) + c12*(cos(Rz_LN)*sin(Rx_LN)*sin(Ry_LN) - cos(Ry_LN)*sin(Rz_LN))^2 + c11*(cos(Ry_LN)*cos(Rz_LN) + sin(Rx_LN)*sin(Ry_LN)*sin(Rz_LN))^2) + (cos(Ry_LN)*cos(Rz_LN)*sin(Rx_LN) + sin(Ry_LN)*sin(Rz_LN))^2*(c13*cos(Rx_LN)^2*sin(Ry_LN)^2 - 2*c14*cos(Rx_LN)*sin(Ry_LN)*(cos(Rz_LN)*sin(Rx_LN)*sin(Ry_LN) - cos(Ry_LN)*sin(Rz_LN)) + c11*(cos(Rz_LN)*sin(Rx_LN)*sin(Ry_LN) - cos(Ry_LN)*sin(Rz_LN))^2 + c12*(cos(Ry_LN)*cos(Rz_LN) + sin(Rx_LN)*sin(Ry_LN)*sin(Rz_LN))^2)
      DESCR_PREFIX:C13 = rotated c13 elastic stiffnesses component
      C14 = -(cos(Rx_LN)*cos(Ry_LN)*sin(Rx_LN)*(c13*cos(Ry_LN)^2 + ((c13 + c33 + (-c13 + c33)*cos(2*Rx_LN))*sin(Ry_LN)^2)/2.)) + 2*(c44*cos(Rx_LN)*sin(Ry_LN) + c14*cos(Rz_LN)*sin(Rx_LN)*sin(Ry_LN) - c14*cos(Ry_LN)*sin(Rz_LN))*(cos(Rz_LN)*sin(Rx_LN)*sin(Ry_LN) + cos(2*Rx_LN)*cos(Ry_LN)*sin(Rz_LN))*(cos(Ry_LN)*cos(Rz_LN) + sin(Rx_LN)*sin(Ry_LN)*sin(Rz_LN)) + (c14*cos(Ry_LN)^2*cos(2*Rz_LN) + sin(Rx_LN)*(2*c44*cos(Rx_LN)*cos(Rz_LN) - c14*cos(2*Rz_LN)*sin(Rx_LN))*sin(Ry_LN)^2 - 2*cos(Ry_LN)*(c44*cos(Rx_LN) - 2*c14*cos(Rz_LN)*sin(Rx_LN))*sin(Ry_LN)*sin(Rz_LN))*(cos(Rx_LN)^2*cos(Ry_LN)*cos(Rz_LN) - sin(Rx_LN)*(cos(Ry_LN)*cos(Rz_LN)*sin(Rx_LN) + sin(Ry_LN)*sin(Rz_LN))) + cos(Rx_LN)*sin(Rz_LN)*(-(cos(Rz_LN)*sin(Ry_LN)) + cos(Ry_LN)*sin(Rx_LN)*sin(Rz_LN))*(c13*cos(Rx_LN)^2*sin(Ry_LN)^2 + 2*c14*cos(Rx_LN)*sin(Ry_LN)*(cos(Rz_LN)*sin(Rx_LN)*sin(Ry_LN) - cos(Ry_LN)*sin(Rz_LN)) + c12*(cos(Rz_LN)*sin(Rx_LN)*sin(Ry_LN) - cos(Ry_LN)*sin(Rz_LN))^2 + c11*(cos(Ry_LN)*cos(Rz_LN) + sin(Rx_LN)*sin(Ry_LN)*sin(Rz_LN))^2) + cos(Rx_LN)*cos(Rz_LN)*(cos(Ry_LN)*cos(Rz_LN)*sin(Rx_LN) + sin(Ry_LN)*sin(Rz_LN))*(c13*cos(Rx_LN)^2*sin(Ry_LN)^2 - 2*c14*cos(Rx_LN)*sin(Ry_LN)*(cos(Rz_LN)*sin(Rx_LN)*sin(Ry_LN) - cos(Ry_LN)*sin(Rz_LN)) + c11*(cos(Rz_LN)*sin(Rx_LN)*sin(Ry_LN) - cos(Ry_LN)*sin(Rz_LN))^2 + c12*(cos(Ry_LN)*cos(Rz_LN) + sin(Rx_LN)*sin(Ry_LN)*sin(Rz_LN))^2) + cos(Rx_LN)*(cos(Ry_LN)*cos(Rz_LN) + sin(Rx_LN)*sin(Ry_LN)*sin(Rz_LN))*(2*c14*cos(Rx_LN)*sin(Ry_LN) + (c11 - c12)*(cos(Rz_LN)*sin(Rx_LN)*sin(Ry_LN) - cos(Ry_LN)*sin(Rz_LN)))*(-(cos(Rz_LN)^2*sin(Ry_LN)) + sin(Ry_LN)*sin(Rz_LN)^2 + cos(Ry_LN)*sin(Rx_LN)*sin(2*Rz_LN))
      DESCR_PREFIX:C14 = rotated c14 elastic stiffnesses component
      C15 = cos(Rx_LN)^2*cos(Ry_LN)*sin(Ry_LN)*(c13*cos(Ry_LN)^2 + ((c13 + c33 + (-c13 + c33)*cos(2*Rx_LN))*sin(Ry_LN)^2)/2.) + cos(Rx_LN)*(cos(Rz_LN)*sin(Rx_LN)*sin(2*Ry_LN) - cos(2*Ry_LN)*sin(Rz_LN))*(c14*cos(Ry_LN)^2*cos(2*Rz_LN) + sin(Rx_LN)*(2*c44*cos(Rx_LN)*cos(Rz_LN) - c14*cos(2*Rz_LN)*sin(Rx_LN))*sin(Ry_LN)^2 - 2*cos(Ry_LN)*(c44*cos(Rx_LN) - 2*c14*cos(Rz_LN)*sin(Rx_LN))*sin(Ry_LN)*sin(Rz_LN)) + 2*cos(Rx_LN)*(c44*cos(Rx_LN)*sin(Ry_LN) + c14*cos(Rz_LN)*sin(Rx_LN)*sin(Ry_LN) - c14*cos(Ry_LN)*sin(Rz_LN))*(cos(Ry_LN)*cos(Rz_LN) + sin(Rx_LN)*sin(Ry_LN)*sin(Rz_LN))*(cos(Ry_LN)^2*cos(Rz_LN) - cos(Rz_LN)*sin(Ry_LN)^2 + sin(Rx_LN)*sin(2*Ry_LN)*sin(Rz_LN)) + (-(cos(Rz_LN)*sin(Ry_LN)) + cos(Ry_LN)*sin(Rx_LN)*sin(Rz_LN))*(cos(Ry_LN)*cos(Rz_LN) + sin(Rx_LN)*sin(Ry_LN)*sin(Rz_LN))*(c13*cos(Rx_LN)^2*sin(Ry_LN)^2 + 2*c14*cos(Rx_LN)*sin(Ry_LN)*(cos(Rz_LN)*sin(Rx_LN)*sin(Ry_LN) - cos(Ry_LN)*sin(Rz_LN)) + c12*(cos(Rz_LN)*sin(Rx_LN)*sin(Ry_LN) - cos(Ry_LN)*sin(Rz_LN))^2 + c11*(cos(Ry_LN)*cos(Rz_LN) + sin(Rx_LN)*sin(Ry_LN)*sin(Rz_LN))^2) + (cos(Rz_LN)*sin(Rx_LN)*sin(Ry_LN) - cos(Ry_LN)*sin(Rz_LN))*(cos(Ry_LN)*cos(Rz_LN)*sin(Rx_LN) + sin(Ry_LN)*sin(Rz_LN))*(c13*cos(Rx_LN)^2*sin(Ry_LN)^2 - 2*c14*cos(Rx_LN)*sin(Ry_LN)*(cos(Rz_LN)*sin(Rx_LN)*sin(Ry_LN) - cos(Ry_LN)*sin(Rz_LN)) + c11*(cos(Rz_LN)*sin(Rx_LN)*sin(Ry_LN) - cos(Ry_LN)*sin(Rz_LN))^2 + c12*(cos(Ry_LN)*cos(Rz_LN) + sin(Rx_LN)*sin(Ry_LN)*sin(Rz_LN))^2) + (cos(Ry_LN)*cos(Rz_LN) + sin(Rx_LN)*sin(Ry_LN)*sin(Rz_LN))*(2*c14*cos(Rx_LN)*sin(Ry_LN) + (c11 - c12)*(cos(Rz_LN)*sin(Rx_LN)*sin(Ry_LN) - cos(Ry_LN)*sin(Rz_LN)))*(cos(Ry_LN)^2*cos(2*Rz_LN)*sin(Rx_LN) - cos(2*Rz_LN)*sin(Rx_LN)*sin(Ry_LN)^2 - ((-3 + cos(2*Rx_LN))*sin(2*Ry_LN)*sin(2*Rz_LN))/4.)
      DESCR_PREFIX:C15 = rotated c15 elastic stiffnesses component
      C16 = -(cos(Rx_LN)*sin(Rx_LN)*sin(Ry_LN)*(c13*cos(Ry_LN)^2 + ((c13 + c33 + (-c13 + c33)*cos(2*Rx_LN))*sin(Ry_LN)^2)/2.)) + 2*(c44*cos(Rx_LN)*sin(Ry_LN) + c14*cos(Rz_LN)*sin(Rx_LN)*sin(Ry_LN) - c14*cos(Ry_LN)*sin(Rz_LN))*(-(cos(Ry_LN)*cos(Rz_LN)*sin(Rx_LN)) + cos(2*Rx_LN)*sin(Ry_LN)*sin(Rz_LN))*(cos(Ry_LN)*cos(Rz_LN) + sin(Rx_LN)*sin(Ry_LN)*sin(Rz_LN)) + (c14*cos(Ry_LN)^2*cos(2*Rz_LN) + sin(Rx_LN)*(2*c44*cos(Rx_LN)*cos(Rz_LN) - c14*cos(2*Rz_LN)*sin(Rx_LN))*sin(Ry_LN)^2 - 2*cos(Ry_LN)*(c44*cos(Rx_LN) - 2*c14*cos(Rz_LN)*sin(Rx_LN))*sin(Ry_LN)*sin(Rz_LN))*(cos(Rx_LN)^2*cos(Rz_LN)*sin(Ry_LN) + sin(Rx_LN)*(-(cos(Rz_LN)*sin(Rx_LN)*sin(Ry_LN)) + cos(Ry_LN)*sin(Rz_LN))) + cos(Rx_LN)*sin(Rz_LN)*(cos(Ry_LN)*cos(Rz_LN) + sin(Rx_LN)*sin(Ry_LN)*sin(Rz_LN))*(c13*cos(Rx_LN)^2*sin(Ry_LN)^2 + 2*c14*cos(Rx_LN)*sin(Ry_LN)*(cos(Rz_LN)*sin(Rx_LN)*sin(Ry_LN) - cos(Ry_LN)*sin(Rz_LN)) + c12*(cos(Rz_LN)*sin(Rx_LN)*sin(Ry_LN) - cos(Ry_LN)*sin(Rz_LN))^2 + c11*(cos(Ry_LN)*cos(Rz_LN) + sin(Rx_LN)*sin(Ry_LN)*sin(Rz_LN))^2) + cos(Rx_LN)*cos(Rz_LN)*(cos(Rz_LN)*sin(Rx_LN)*sin(Ry_LN) - cos(Ry_LN)*sin(Rz_LN))*(c13*cos(Rx_LN)^2*sin(Ry_LN)^2 - 2*c14*cos(Rx_LN)*sin(Ry_LN)*(cos(Rz_LN)*sin(Rx_LN)*sin(Ry_LN) - cos(Ry_LN)*sin(Rz_LN)) + c11*(cos(Rz_LN)*sin(Rx_LN)*sin(Ry_LN) - cos(Ry_LN)*sin(Rz_LN))^2 + c12*(cos(Ry_LN)*cos(Rz_LN) + sin(Rx_LN)*sin(Ry_LN)*sin(Rz_LN))^2) + cos(Rx_LN)*(cos(Ry_LN)*cos(Rz_LN) + sin(Rx_LN)*sin(Ry_LN)*sin(Rz_LN))*(2*c14*cos(Rx_LN)*sin(Ry_LN) + (c11 - c12)*(cos(Rz_LN)*sin(Rx_LN)*sin(Ry_LN) - cos(Ry_LN)*sin(Rz_LN)))*(cos(Ry_LN)*cos(2*Rz_LN) + sin(Rx_LN)*sin(Ry_LN)*sin(2*Rz_LN))
      DESCR_PREFIX:C16 = rotated c16 elastic stiffnesses component
      C21 = c13*sin(Rx_LN)^4*sin(Ry_LN)^2 + (cos(Rx_LN)^2*(2*c12*cos(Ry_LN)^2 + (c11 + c13 + c33 - 4*c44 - (c11 - c13 + c33 - 4*c44)*cos(2*Rx_LN))*sin(Ry_LN)^2))/2. + cos(Ry_LN)^2*(c13*cos(Rz_LN)^2*sin(Rx_LN)^2 + c13*sin(Rx_LN)^2*sin(Rz_LN)^2 + c14*cos(Rz_LN)*sin(2*Rx_LN)*sin(Rz_LN)^2) - 2*c14*cos(Rx_LN)^3*sin(Ry_LN)*(cos(Rz_LN)^3*sin(Rx_LN)*sin(Ry_LN) - 3*cos(Ry_LN)*cos(Rz_LN)^2*sin(Rz_LN) - 3*cos(Rz_LN)*sin(Rx_LN)*sin(Ry_LN)*sin(Rz_LN)^2 + cos(Ry_LN)*sin(Rz_LN)^3) - (c14*cos(Rx_LN)*sin(Rx_LN)*(cos(Ry_LN)^2*(cos(Rz_LN) + 3*cos(3*Rz_LN)) + 4*sin(Rx_LN)*(-(cos(Rz_LN)^3*sin(Rx_LN)*sin(Ry_LN)^2) + 3*cos(Rz_LN)*sin(Rx_LN)*sin(Ry_LN)^2*sin(Rz_LN)^2 + sin(2*Ry_LN)*sin(3*Rz_LN))))/2.
      DESCR_PREFIX:C21 = rotated c21 elastic stiffnesses component
      C22 = (3*c11 + 2*c13 + 3*c33 + 4*c44 + 4*(c11 - c33)*cos(2*Rx_LN) + (c11 - 2*c13 + c33 - 4*c44)*cos(4*Rx_LN) + 4*c14*sin(2*Rx_LN - 3*Rz_LN) + 2*c14*sin(4*Rx_LN - 3*Rz_LN) + 4*c14*sin(2*Rx_LN + 3*Rz_LN) + 2*c14*sin(4*Rx_LN + 3*Rz_LN))/8.
      DESCR_PREFIX:C22 = rotated c22 elastic stiffnesses component
      C23 = c13*cos(Ry_LN)^2*sin(Rx_LN)^4 - (cos(Rx_LN)^2*((-c11 - c13 - c33 + 4*c44 + (c11 - c13 + c33 - 4*c44)*cos(2*Rx_LN))*cos(Ry_LN)^2 - 2*c12*sin(Ry_LN)^2))/2. - 2*c14*cos(Rx_LN)^3*cos(Ry_LN)*(cos(Ry_LN)*cos(3*Rz_LN)*sin(Rx_LN) + (1 + 2*cos(2*Rz_LN))*sin(Ry_LN)*sin(Rz_LN)) + sin(Ry_LN)^2*(c13*cos(Rz_LN)^2*sin(Rx_LN)^2 + c13*sin(Rx_LN)^2*sin(Rz_LN)^2 + c14*cos(Rz_LN)*sin(2*Rx_LN)*sin(Rz_LN)^2) + 2*c14*cos(Rx_LN)*sin(Rx_LN)*(cos(Ry_LN)^2*cos(3*Rz_LN)*sin(Rx_LN)^2 - ((cos(Rz_LN) + 3*cos(3*Rz_LN))*sin(Ry_LN)^2)/4. + sin(Rx_LN)*sin(2*Ry_LN)*sin(3*Rz_LN))
      DESCR_PREFIX:C23 = rotated c23 elastic stiffnesses component
      C24 = (cos(Rx_LN)*(-8*c14*cos(Rx_LN)^3*cos(Ry_LN)*cos(3*Rz_LN) + 6*(c11 - 2*c13 + c33 - 4*c44)*cos(Rx_LN)^2*cos(Ry_LN)*sin(Rx_LN) + (c11 + 6*c13 - 7*c33 + 12*c44 + (c11 - 2*c13 + c33 - 4*c44)*cos(2*Rx_LN))*cos(Ry_LN)*sin(Rx_LN) - 12*c14*sin(2*Rx_LN)*sin(Ry_LN)*sin(Rz_LN)^3 + 24*c14*cos(Rx_LN)*cos(Rz_LN)*sin(Rx_LN)*(cos(Ry_LN)*(-1 + 2*cos(2*Rz_LN))*sin(Rx_LN) + 3*cos(Rz_LN)*sin(Ry_LN)*sin(Rz_LN))))/8.
      DESCR_PREFIX:C24 = rotated c24 elastic stiffnesses component
      C25 = (cos(Rx_LN)^2*(c13 + c33 + (c13 - c33)*cos(2*Rx_LN))*sin(2*Ry_LN))/4. + cos(Rx_LN)^2*(c14*cos(Rx_LN)*cos(2*Rz_LN) + 2*c44*cos(Rz_LN)*sin(Rx_LN))*(-2*cos(Ry_LN)*cos(Rz_LN)*sin(Rx_LN)*sin(Ry_LN) + cos(Ry_LN)^2*sin(Rz_LN) - sin(Ry_LN)^2*sin(Rz_LN)) + 2*cos(Rx_LN)^2*(c14*cos(Rx_LN)*cos(Rz_LN) - c44*sin(Rx_LN))*sin(Rz_LN)*(cos(Ry_LN)^2*cos(Rz_LN) - cos(Rz_LN)*sin(Ry_LN)^2 + sin(Rx_LN)*sin(2*Ry_LN)*sin(Rz_LN)) + (-(cos(Rz_LN)*sin(Ry_LN)) + cos(Ry_LN)*sin(Rx_LN)*sin(Rz_LN))*(cos(Ry_LN)*cos(Rz_LN) + sin(Rx_LN)*sin(Ry_LN)*sin(Rz_LN))*(-2*c14*cos(Rx_LN)*cos(Rz_LN)*sin(Rx_LN) + c13*sin(Rx_LN)^2 + cos(Rx_LN)^2*(c12*cos(Rz_LN)^2 + c11*sin(Rz_LN)^2)) + (cos(Rz_LN)*sin(Rx_LN)*sin(Ry_LN) - cos(Ry_LN)*sin(Rz_LN))*(cos(Ry_LN)*cos(Rz_LN)*sin(Rx_LN) + sin(Ry_LN)*sin(Rz_LN))*(c13*sin(Rx_LN)^2 + c14*cos(Rz_LN)*sin(2*Rx_LN) + cos(Rx_LN)^2*(c11*cos(Rz_LN)^2 + c12*sin(Rz_LN)^2)) + cos(Rx_LN)*((c11 - c12)*cos(Rx_LN)*cos(Rz_LN) - 2*c14*sin(Rx_LN))*sin(Rz_LN)*(cos(Ry_LN)^2*cos(2*Rz_LN)*sin(Rx_LN) - cos(2*Rz_LN)*sin(Rx_LN)*sin(Ry_LN)^2 - ((-3 + cos(2*Rx_LN))*sin(2*Ry_LN)*sin(2*Rz_LN))/4.)
      DESCR_PREFIX:C25 = rotated c25 elastic stiffnesses component
      C26 = (cos(Rx_LN)*(-4*c14*cos(Rx_LN)^3*cos(3*Rz_LN)*sin(Ry_LN) + 3*(c11 - 2*c13 + c33 - 4*c44)*cos(Rx_LN)^2*sin(Rx_LN)*sin(Ry_LN) - (c11 - 2*c13 + c33 - 4*c44)*sin(Rx_LN)^3*sin(Ry_LN) + 6*c14*cos(Ry_LN)*sin(2*Rx_LN)*sin(Rz_LN)^3 + 12*c14*cos(Rx_LN)*cos(Rz_LN)^2*sin(Rx_LN)*(cos(Rz_LN)*sin(Rx_LN)*sin(Ry_LN) - 3*cos(Ry_LN)*sin(Rz_LN)) + sin(Rx_LN)*sin(Ry_LN)*(c11 + 2*c13 - 3*c33 + 4*c44 - 9*c14*sin(2*Rx_LN)*sin(Rz_LN)*sin(2*Rz_LN))))/4.
      DESCR_PREFIX:C26 = rotated c26 elastic stiffnesses component
      C31 = cos(Rx_LN)^2*(c33*cos(Rx_LN)^2*cos(Ry_LN)^2 - (c13*(-6 + 2*cos(2*Rx_LN) + cos(2*(Rx_LN - Ry_LN)) + 2*cos(2*Ry_LN) + cos(2*(Rx_LN + Ry_LN))))/8.)*sin(Ry_LN)^2 - 4*cos(Rx_LN)*sin(Ry_LN)*(cos(Rz_LN)*sin(Ry_LN) - cos(Ry_LN)*sin(Rx_LN)*sin(Rz_LN))*(c44*cos(Rx_LN)*cos(Ry_LN) + c14*cos(Ry_LN)*cos(Rz_LN)*sin(Rx_LN) + c14*sin(Ry_LN)*sin(Rz_LN))*(cos(Ry_LN)*cos(Rz_LN) + sin(Rx_LN)*sin(Ry_LN)*sin(Rz_LN)) + 2*(cos(Rz_LN)*sin(Rx_LN)*sin(Ry_LN) - cos(Ry_LN)*sin(Rz_LN))*(-(cos(Rz_LN)*sin(Ry_LN)) + cos(Ry_LN)*sin(Rx_LN)*sin(Rz_LN))*(cos(Ry_LN)*cos(Rz_LN) + sin(Rx_LN)*sin(Ry_LN)*sin(Rz_LN))*(2*c14*cos(Rx_LN)*cos(Ry_LN) + (c11 - c12)*(cos(Ry_LN)*cos(Rz_LN)*sin(Rx_LN) + sin(Ry_LN)*sin(Rz_LN))) + (cos(Rz_LN)*sin(Rx_LN)*sin(Ry_LN) - cos(Ry_LN)*sin(Rz_LN))^2*(c13*cos(Rx_LN)^2*cos(Ry_LN)^2 + c12*(cos(Rz_LN)*sin(Ry_LN) - cos(Ry_LN)*sin(Rx_LN)*sin(Rz_LN))^2 - 2*c14*cos(Rx_LN)*cos(Ry_LN)*(cos(Ry_LN)*cos(Rz_LN)*sin(Rx_LN) + sin(Ry_LN)*sin(Rz_LN)) + c11*(cos(Ry_LN)*cos(Rz_LN)*sin(Rx_LN) + sin(Ry_LN)*sin(Rz_LN))^2) + (cos(Ry_LN)*cos(Rz_LN) + sin(Rx_LN)*sin(Ry_LN)*sin(Rz_LN))^2*(c13*cos(Rx_LN)^2*cos(Ry_LN)^2 + c11*(cos(Rz_LN)*sin(Ry_LN) - cos(Ry_LN)*sin(Rx_LN)*sin(Rz_LN))^2 + 2*c14*cos(Rx_LN)*cos(Ry_LN)*(cos(Ry_LN)*cos(Rz_LN)*sin(Rx_LN) + sin(Ry_LN)*sin(Rz_LN)) + c12*(cos(Ry_LN)*cos(Rz_LN)*sin(Rx_LN) + sin(Ry_LN)*sin(Rz_LN))^2) + 2*cos(Rx_LN)*sin(Ry_LN)*(cos(Rz_LN)*sin(Rx_LN)*sin(Ry_LN) - cos(Ry_LN)*sin(Rz_LN))*(c14*(cos(Rz_LN)*sin(Ry_LN) - cos(Ry_LN)*sin(Rx_LN)*sin(Rz_LN))^2 + 2*c44*cos(Rx_LN)*cos(Ry_LN)*(cos(Ry_LN)*cos(Rz_LN)*sin(Rx_LN) + sin(Ry_LN)*sin(Rz_LN)) - c14*(cos(Ry_LN)*cos(Rz_LN)*sin(Rx_LN) + sin(Ry_LN)*sin(Rz_LN))^2)
      DESCR_PREFIX:C31 = rotated c31 elastic stiffnesses component

      C32 = c13*cos(Rx_LN)^4*cos(Ry_LN)^2 - (c13*(-6 + 2*cos(2*Rx_LN) + cos(2*(Rx_LN - Ry_LN)) + 2*cos(2*Ry_LN) + cos(2*(Rx_LN + Ry_LN)))*sin(Rx_LN)^2)/8. + cos(Rx_LN)^2*((c11 + c33 - 4*c44)*cos(Ry_LN)^2*sin(Rx_LN)^2 + c12*sin(Ry_LN)^2) - 2*c14*cos(Rx_LN)^3*cos(Ry_LN)*(cos(Ry_LN)*cos(3*Rz_LN)*sin(Rx_LN) + (1 + 2*cos(2*Rz_LN))*sin(Ry_LN)*sin(Rz_LN)) + 2*c14*cos(Rx_LN)*sin(Rx_LN)*(cos(Ry_LN)^2*cos(3*Rz_LN)*sin(Rx_LN)^2 - cos(Rz_LN)*(-1 + 2*cos(2*Rz_LN))*sin(Ry_LN)^2 + sin(Rx_LN)*sin(2*Ry_LN)*sin(3*Rz_LN))
      DESCR_PREFIX:C32 = rotated c32 elastic stiffnesses component
      C33 = c33*cos(Rx_LN)^4*cos(Ry_LN)^4 - ((c13 + 2*c44)*cos(Rx_LN)^2*cos(Ry_LN)^2*(-6 + 2*cos(2*Rx_LN) + cos(2*(Rx_LN - Ry_LN)) + 2*cos(2*Ry_LN) + cos(2*(Rx_LN + Ry_LN))))/4. + c11*cos(Ry_LN)^4*sin(Rx_LN)^4 + c11*cos(Rz_LN)^4*sin(Ry_LN)^4 + 2*c11*cos(Rz_LN)^2*sin(Ry_LN)^4*sin(Rz_LN)^2 - (9*c14*cos(Rz_LN)*sin(2*Rx_LN)*sin(2*Ry_LN)^2*sin(Rz_LN)^2)/2. + c11*sin(Ry_LN)^4*sin(Rz_LN)^4 + 2*cos(Ry_LN)^2*sin(Ry_LN)^2*(c11*cos(Rz_LN)^4*sin(Rx_LN)^2 + 3*c14*cos(Rz_LN)^3*sin(2*Rx_LN) + c11*sin(Rx_LN)^2*sin(Rz_LN)^4) + (c11*sin(Rx_LN)^2*sin(2*Ry_LN)^2*sin(2*Rz_LN)^2)/4. - 4*c14*cos(Rx_LN)*cos(Ry_LN)*(cos(Ry_LN)^3*cos(3*Rz_LN)*sin(Rx_LN)^3 - (1 + 2*cos(2*Rz_LN))*sin(Ry_LN)^3*sin(Rz_LN) + 3*cos(Ry_LN)^2*sin(Rx_LN)^2*sin(Ry_LN)*sin(3*Rz_LN))
      DESCR_PREFIX:C33 = rotated c33 elastic stiffnesses component
      C34 = -(cos(Rx_LN)*cos(Ry_LN)*(c33*cos(Rx_LN)^2*cos(Ry_LN)^2 - (c13*(-6 + 2*cos(2*Rx_LN) + cos(2*(Rx_LN - Ry_LN)) + 2*cos(2*Ry_LN) + cos(2*(Rx_LN + Ry_LN))))/8.)*sin(Rx_LN)) - 2*(cos(Rz_LN)*sin(Rx_LN)*sin(Ry_LN) + cos(2*Rx_LN)*cos(Ry_LN)*sin(Rz_LN))*(cos(Rz_LN)*sin(Ry_LN) - cos(Ry_LN)*sin(Rx_LN)*sin(Rz_LN))*(c44*cos(Rx_LN)*cos(Ry_LN) + c14*cos(Ry_LN)*cos(Rz_LN)*sin(Rx_LN) + c14*sin(Ry_LN)*sin(Rz_LN)) + cos(Rx_LN)*cos(Rz_LN)*(cos(Ry_LN)*cos(Rz_LN)*sin(Rx_LN) + sin(Ry_LN)*sin(Rz_LN))*(c13*cos(Rx_LN)^2*cos(Ry_LN)^2 + c12*(cos(Rz_LN)*sin(Ry_LN) - cos(Ry_LN)*sin(Rx_LN)*sin(Rz_LN))^2 - 2*c14*cos(Rx_LN)*cos(Ry_LN)*(cos(Ry_LN)*cos(Rz_LN)*sin(Rx_LN) + sin(Ry_LN)*sin(Rz_LN)) + c11*(cos(Ry_LN)*cos(Rz_LN)*sin(Rx_LN) + sin(Ry_LN)*sin(Rz_LN))^2) + cos(Rx_LN)*sin(Rz_LN)*(-(cos(Rz_LN)*sin(Ry_LN)) + cos(Ry_LN)*sin(Rx_LN)*sin(Rz_LN))*(c13*cos(Rx_LN)^2*cos(Ry_LN)^2 + c11*(cos(Rz_LN)*sin(Ry_LN) - cos(Ry_LN)*sin(Rx_LN)*sin(Rz_LN))^2 + 2*c14*cos(Rx_LN)*cos(Ry_LN)*(cos(Ry_LN)*cos(Rz_LN)*sin(Rx_LN) + sin(Ry_LN)*sin(Rz_LN)) + c12*(cos(Ry_LN)*cos(Rz_LN)*sin(Rx_LN) + sin(Ry_LN)*sin(Rz_LN))^2) + (cos(Rx_LN)^2*cos(Ry_LN)*cos(Rz_LN) - sin(Rx_LN)*(cos(Ry_LN)*cos(Rz_LN)*sin(Rx_LN) + sin(Ry_LN)*sin(Rz_LN)))*(c14*(cos(Rz_LN)*sin(Ry_LN) - cos(Ry_LN)*sin(Rx_LN)*sin(Rz_LN))^2 + 2*c44*cos(Rx_LN)*cos(Ry_LN)*(cos(Ry_LN)*cos(Rz_LN)*sin(Rx_LN) + sin(Ry_LN)*sin(Rz_LN)) - c14*(cos(Ry_LN)*cos(Rz_LN)*sin(Rx_LN) + sin(Ry_LN)*sin(Rz_LN))^2) + cos(Rx_LN)*(-(cos(Rz_LN)*sin(Ry_LN)) + cos(Ry_LN)*sin(Rx_LN)*sin(Rz_LN))*(2*c14*cos(Rx_LN)*cos(Ry_LN) + (c11 - c12)*(cos(Ry_LN)*cos(Rz_LN)*sin(Rx_LN) + sin(Ry_LN)*sin(Rz_LN)))*(-(cos(Rz_LN)^2*sin(Ry_LN)) + sin(Ry_LN)*sin(Rz_LN)^2 + cos(Ry_LN)*sin(Rx_LN)*sin(2*Rz_LN))
      DESCR_PREFIX:C34 = rotated c34 elastic stiffnesses component
      C35 = cos(Rx_LN)^2*cos(Ry_LN)*(c33*cos(Rx_LN)^2*cos(Ry_LN)^2 - (c13*(-6 + 2*cos(2*Rx_LN) + cos(2*(Rx_LN - Ry_LN)) + 2*cos(2*Ry_LN) + cos(2*(Rx_LN + Ry_LN))))/8.)*sin(Ry_LN) - 2*cos(Rx_LN)*(cos(Rz_LN)*sin(Ry_LN) - cos(Ry_LN)*sin(Rx_LN)*sin(Rz_LN))*(c44*cos(Rx_LN)*cos(Ry_LN) + c14*cos(Ry_LN)*cos(Rz_LN)*sin(Rx_LN) + c14*sin(Ry_LN)*sin(Rz_LN))*(cos(Ry_LN)^2*cos(Rz_LN) - cos(Rz_LN)*sin(Ry_LN)^2 + sin(Rx_LN)*sin(2*Ry_LN)*sin(Rz_LN)) + (cos(Rz_LN)*sin(Rx_LN)*sin(Ry_LN) - cos(Ry_LN)*sin(Rz_LN))*(cos(Ry_LN)*cos(Rz_LN)*sin(Rx_LN) + sin(Ry_LN)*sin(Rz_LN))*(c13*cos(Rx_LN)^2*cos(Ry_LN)^2 + c12*(cos(Rz_LN)*sin(Ry_LN) - cos(Ry_LN)*sin(Rx_LN)*sin(Rz_LN))^2 - 2*c14*cos(Rx_LN)*cos(Ry_LN)*(cos(Ry_LN)*cos(Rz_LN)*sin(Rx_LN) + sin(Ry_LN)*sin(Rz_LN)) + c11*(cos(Ry_LN)*cos(Rz_LN)*sin(Rx_LN) + sin(Ry_LN)*sin(Rz_LN))^2) + (-(cos(Rz_LN)*sin(Ry_LN)) + cos(Ry_LN)*sin(Rx_LN)*sin(Rz_LN))*(cos(Ry_LN)*cos(Rz_LN) + sin(Rx_LN)*sin(Ry_LN)*sin(Rz_LN))*(c13*cos(Rx_LN)^2*cos(Ry_LN)^2 + c11*(cos(Rz_LN)*sin(Ry_LN) - cos(Ry_LN)*sin(Rx_LN)*sin(Rz_LN))^2 + 2*c14*cos(Rx_LN)*cos(Ry_LN)*(cos(Ry_LN)*cos(Rz_LN)*sin(Rx_LN) + sin(Ry_LN)*sin(Rz_LN)) + c12*(cos(Ry_LN)*cos(Rz_LN)*sin(Rx_LN) + sin(Ry_LN)*sin(Rz_LN))^2) + cos(Rx_LN)*(cos(Rz_LN)*sin(Rx_LN)*sin(2*Ry_LN) - cos(2*Ry_LN)*sin(Rz_LN))*(c14*(cos(Rz_LN)*sin(Ry_LN) - cos(Ry_LN)*sin(Rx_LN)*sin(Rz_LN))^2 + 2*c44*cos(Rx_LN)*cos(Ry_LN)*(cos(Ry_LN)*cos(Rz_LN)*sin(Rx_LN) + sin(Ry_LN)*sin(Rz_LN)) - c14*(cos(Ry_LN)*cos(Rz_LN)*sin(Rx_LN) + sin(Ry_LN)*sin(Rz_LN))^2) + (-(cos(Rz_LN)*sin(Ry_LN)) + cos(Ry_LN)*sin(Rx_LN)*sin(Rz_LN))*(2*c14*cos(Rx_LN)*cos(Ry_LN) + (c11 - c12)*(cos(Ry_LN)*cos(Rz_LN)*sin(Rx_LN) + sin(Ry_LN)*sin(Rz_LN)))*(cos(Ry_LN)^2*cos(2*Rz_LN)*sin(Rx_LN) - cos(2*Rz_LN)*sin(Rx_LN)*sin(Ry_LN)^2 - ((-3 + cos(2*Rx_LN))*sin(2*Ry_LN)*sin(2*Rz_LN))/4.)
      DESCR_PREFIX:C35 = rotated c35 elastic stiffnesses component
      C36 = -(cos(Rx_LN)*(c33*cos(Rx_LN)^2*cos(Ry_LN)^2 - (c13*(-6 + 2*cos(2*Rx_LN) + cos(2*(Rx_LN - Ry_LN)) + 2*cos(2*Ry_LN) + cos(2*(Rx_LN + Ry_LN))))/8.)*sin(Rx_LN)*sin(Ry_LN)) + 2*(cos(Rz_LN)*sin(Ry_LN) - cos(Ry_LN)*sin(Rx_LN)*sin(Rz_LN))*(c44*cos(Rx_LN)*cos(Ry_LN) + c14*cos(Ry_LN)*cos(Rz_LN)*sin(Rx_LN) + c14*sin(Ry_LN)*sin(Rz_LN))*(cos(Ry_LN)*cos(Rz_LN)*sin(Rx_LN) - cos(2*Rx_LN)*sin(Ry_LN)*sin(Rz_LN)) + cos(Rx_LN)*cos(Rz_LN)*(cos(Rz_LN)*sin(Rx_LN)*sin(Ry_LN) - cos(Ry_LN)*sin(Rz_LN))*(c13*cos(Rx_LN)^2*cos(Ry_LN)^2 + c12*(cos(Rz_LN)*sin(Ry_LN) - cos(Ry_LN)*sin(Rx_LN)*sin(Rz_LN))^2 - 2*c14*cos(Rx_LN)*cos(Ry_LN)*(cos(Ry_LN)*cos(Rz_LN)*sin(Rx_LN) + sin(Ry_LN)*sin(Rz_LN)) + c11*(cos(Ry_LN)*cos(Rz_LN)*sin(Rx_LN) + sin(Ry_LN)*sin(Rz_LN))^2) + cos(Rx_LN)*sin(Rz_LN)*(cos(Ry_LN)*cos(Rz_LN) + sin(Rx_LN)*sin(Ry_LN)*sin(Rz_LN))*(c13*cos(Rx_LN)^2*cos(Ry_LN)^2 + c11*(cos(Rz_LN)*sin(Ry_LN) - cos(Ry_LN)*sin(Rx_LN)*sin(Rz_LN))^2 + 2*c14*cos(Rx_LN)*cos(Ry_LN)*(cos(Ry_LN)*cos(Rz_LN)*sin(Rx_LN) + sin(Ry_LN)*sin(Rz_LN)) + c12*(cos(Ry_LN)*cos(Rz_LN)*sin(Rx_LN) + sin(Ry_LN)*sin(Rz_LN))^2) + (cos(Rx_LN)^2*cos(Rz_LN)*sin(Ry_LN) + sin(Rx_LN)*(-(cos(Rz_LN)*sin(Rx_LN)*sin(Ry_LN)) + cos(Ry_LN)*sin(Rz_LN)))*(c14*(cos(Rz_LN)*sin(Ry_LN) - cos(Ry_LN)*sin(Rx_LN)*sin(Rz_LN))^2 + 2*c44*cos(Rx_LN)*cos(Ry_LN)*(cos(Ry_LN)*cos(Rz_LN)*sin(Rx_LN) + sin(Ry_LN)*sin(Rz_LN)) - c14*(cos(Ry_LN)*cos(Rz_LN)*sin(Rx_LN) + sin(Ry_LN)*sin(Rz_LN))^2) + cos(Rx_LN)*(-(cos(Rz_LN)*sin(Ry_LN)) + cos(Ry_LN)*sin(Rx_LN)*sin(Rz_LN))*(2*c14*cos(Rx_LN)*cos(Ry_LN) + (c11 - c12)*(cos(Ry_LN)*cos(Rz_LN)*sin(Rx_LN) + sin(Ry_LN)*sin(Rz_LN)))*(cos(Ry_LN)*cos(2*Rz_LN) + sin(Rx_LN)*sin(Ry_LN)*sin(2*Rz_LN))
      DESCR_PREFIX:C36 = rotated c36 elastic stiffnesses component
      C41 = (c13 - c33)*cos(Rx_LN)^3*cos(Ry_LN)*sin(Rx_LN)*sin(Ry_LN)^2 + 2*(cos(Rz_LN)*sin(Rx_LN)*sin(Ry_LN) - cos(Ry_LN)*sin(Rz_LN))*(cos(Ry_LN)*cos(Rz_LN) + sin(Rx_LN)*sin(Ry_LN)*sin(Rz_LN))*(c14*(cos(Rz_LN)*sin(Rx_LN)*sin(Ry_LN) + cos(2*Rx_LN)*cos(Ry_LN)*sin(Rz_LN)) - ((c11 - c12)*cos(Rx_LN)*(cos(Rz_LN)^2*sin(Ry_LN) - 2*cos(Ry_LN)*cos(Rz_LN)*sin(Rx_LN)*sin(Rz_LN) - sin(Ry_LN)*sin(Rz_LN)^2))/2.) + (cos(Ry_LN)*cos(Rz_LN) + sin(Rx_LN)*sin(Ry_LN)*sin(Rz_LN))^2*(c14*cos(Rx_LN)^2*cos(Ry_LN)*cos(Rz_LN) - c14*sin(Rx_LN)*(cos(Ry_LN)*cos(Rz_LN)*sin(Rx_LN) + sin(Ry_LN)*sin(Rz_LN)) + cos(Rx_LN)*((-c11 + c12)*cos(Rz_LN)*sin(Ry_LN)*sin(Rz_LN) + cos(Ry_LN)*sin(Rx_LN)*(-c13 + c12*cos(Rz_LN)^2 + c11*sin(Rz_LN)^2))) + (cos(Rz_LN)*sin(Rx_LN)*sin(Ry_LN) - cos(Ry_LN)*sin(Rz_LN))^2*(-(c14*cos(Rx_LN)^2*cos(Ry_LN)*cos(Rz_LN)) + c14*sin(Rx_LN)*(cos(Ry_LN)*cos(Rz_LN)*sin(Rx_LN) + sin(Ry_LN)*sin(Rz_LN)) + cos(Rx_LN)*((c11 - c12)*cos(Rz_LN)*sin(Ry_LN)*sin(Rz_LN) + cos(Ry_LN)*sin(Rx_LN)*(-c13 + c11*cos(Rz_LN)^2 + c12*sin(Rz_LN)^2))) + 2*cos(Rx_LN)*sin(Ry_LN)*(cos(Ry_LN)*cos(Rz_LN) + sin(Rx_LN)*sin(Ry_LN)*sin(Rz_LN))*(c44*cos(Rx_LN)^2*cos(Ry_LN)*sin(Rz_LN) + c44*sin(Rx_LN)*(cos(Rz_LN)*sin(Ry_LN) - cos(Ry_LN)*sin(Rx_LN)*sin(Rz_LN)) + c14*cos(Rx_LN)*(-(cos(Rz_LN)^2*sin(Ry_LN)) + sin(Ry_LN)*sin(Rz_LN)^2 + cos(Ry_LN)*sin(Rx_LN)*sin(2*Rz_LN))) + 2*cos(Rx_LN)*sin(Ry_LN)*(cos(Rz_LN)*sin(Rx_LN)*sin(Ry_LN) - cos(Ry_LN)*sin(Rz_LN))*(c44*cos(Rx_LN)^2*cos(Ry_LN)*cos(Rz_LN) - c44*sin(Rx_LN)*(cos(Ry_LN)*cos(Rz_LN)*sin(Rx_LN) + sin(Ry_LN)*sin(Rz_LN)) - c14*cos(Rx_LN)*(cos(Ry_LN)*cos(2*Rz_LN)*sin(Rx_LN) + sin(Ry_LN)*sin(2*Rz_LN)))
      DESCR_PREFIX:C41 = rotated c41 elastic stiffnesses component
      C42 = (cos(Rx_LN)*(-8*c14*cos(Rx_LN)^3*cos(Ry_LN)*cos(3*Rz_LN) + 6*(c11 - 2*c13 + c33 - 4*c44)*cos(Rx_LN)^2*cos(Ry_LN)*sin(Rx_LN) + (c11 + 6*c13 - 7*c33 + 12*c44 + (c11 - 2*c13 + c33 - 4*c44)*cos(2*Rx_LN))*cos(Ry_LN)*sin(Rx_LN) - 12*c14*sin(2*Rx_LN)*sin(Ry_LN)*sin(Rz_LN)^3 + 24*c14*cos(Rx_LN)*cos(Rz_LN)*sin(Rx_LN)*(cos(Ry_LN)*(-1 + 2*cos(2*Rz_LN))*sin(Rx_LN) + 3*cos(Rz_LN)*sin(Ry_LN)*sin(Rz_LN))))/8.
      DESCR_PREFIX:C42 = rotated c42 elastic stiffnesses component
      C43 = (c13 - c33 + 2*c44)*cos(Rx_LN)^3*cos(Ry_LN)^3*sin(Rx_LN) - ((c11 - c13 - 2*c44)*cos(Ry_LN)*(-6 + 2*cos(2*Rx_LN) + cos(2*(Rx_LN - Ry_LN)) + 2*cos(2*Ry_LN) + cos(2*(Rx_LN + Ry_LN)))*sin(2*Rx_LN))/16. + (c14*(cos(Ry_LN)*cos(Rz_LN)*sin(Rx_LN) + sin(Ry_LN)*sin(Rz_LN))*(-4*(1 + 2*cos(2*Rz_LN))*sin(Rx_LN)*sin(Ry_LN)^2 + 2*cos(Ry_LN)^2*(2*cos(Rz_LN)^2*sin(Rx_LN)^3 + (-1 + 5*cos(2*Rx_LN))*sin(Rx_LN)*sin(Rz_LN)^2) + (3 - 5*cos(2*Rx_LN))*sin(2*Ry_LN)*sin(2*Rz_LN)))/4. - (c14*cos(Rx_LN)^2*cos(Ry_LN)*(cos(Ry_LN)^2*(cos(Rz_LN) + 5*cos(3*Rz_LN))*sin(Rx_LN)^2 - 6*cos(Rz_LN)^3*sin(Ry_LN)^2 - 8*cos(Ry_LN)*sin(Rx_LN)*sin(Ry_LN)*sin(Rz_LN)^3 + 8*cos(Rz_LN)*sin(Rx_LN)*sin(2*Ry_LN)*sin(2*Rz_LN) + 7*sin(Ry_LN)^2*sin(Rz_LN)*sin(2*Rz_LN)))/2.
      DESCR_PREFIX:C43 = rotated c43 elastic stiffnesses component
      C44 = c44*cos(Rx_LN)^4*cos(Ry_LN)^2 - (cos(Rx_LN)^2*(-4*c11 + 2*c12 + 4*c13 - 2*c33 + 4*c44 + 2*(c11 - 2*c13 + c33 - 2*c44)*cos(2*Rx_LN) + (c11 - 2*c13 + c33 - 2*c44)*cos(2*(Rx_LN - Ry_LN)) - 2*c12*cos(2*Ry_LN) + 4*c13*cos(2*Ry_LN) - 2*c33*cos(2*Ry_LN) + 4*c44*cos(2*Ry_LN) + c11*cos(2*(Rx_LN + Ry_LN)) - 2*c13*cos(2*(Rx_LN + Ry_LN)) + c33*cos(2*(Rx_LN + Ry_LN)) - 2*c44*cos(2*(Rx_LN + Ry_LN))))/8. - (c44*(-6 + 2*cos(2*Rx_LN) + cos(2*(Rx_LN - Ry_LN)) + 2*cos(2*Ry_LN) + cos(2*(Rx_LN + Ry_LN)))*sin(Rx_LN)^2)/8. + c14*cos(Rx_LN)^3*(-2*cos(Ry_LN)^2*cos(3*Rz_LN)*sin(Rx_LN) - 6*cos(Ry_LN)*cos(Rz_LN)^2*sin(Ry_LN)*sin(Rz_LN) + sin(2*Ry_LN)*sin(Rz_LN)^3) + 2*c14*cos(Rx_LN)*sin(Rx_LN)*(cos(Ry_LN)^2*cos(3*Rz_LN)*sin(Rx_LN)^2 - cos(Rz_LN)*(-1 + 2*cos(2*Rz_LN))*sin(Ry_LN)^2 + sin(Rx_LN)*sin(2*Ry_LN)*sin(3*Rz_LN))
      DESCR_PREFIX:C44 = rotated c44 elastic stiffnesses component
      C45 = (c13 - c33)*cos(Rx_LN)^3*cos(Ry_LN)^2*sin(Rx_LN)*sin(Ry_LN) + (-(cos(Rz_LN)*sin(Ry_LN)) + cos(Ry_LN)*sin(Rx_LN)*sin(Rz_LN))*(cos(Ry_LN)*cos(Rz_LN) + sin(Rx_LN)*sin(Ry_LN)*sin(Rz_LN))*(c14*cos(Rx_LN)^2*cos(Ry_LN)*cos(Rz_LN) - c14*sin(Rx_LN)*(cos(Ry_LN)*cos(Rz_LN)*sin(Rx_LN) + sin(Ry_LN)*sin(Rz_LN)) + cos(Rx_LN)*((-c11 + c12)*cos(Rz_LN)*sin(Ry_LN)*sin(Rz_LN) + cos(Ry_LN)*sin(Rx_LN)*(-c13 + c12*cos(Rz_LN)^2 + c11*sin(Rz_LN)^2))) + (cos(Rz_LN)*sin(Rx_LN)*sin(Ry_LN) - cos(Ry_LN)*sin(Rz_LN))*(cos(Ry_LN)*cos(Rz_LN)*sin(Rx_LN) + sin(Ry_LN)*sin(Rz_LN))*(-(c14*cos(Rx_LN)^2*cos(Ry_LN)*cos(Rz_LN)) + c14*sin(Rx_LN)*(cos(Ry_LN)*cos(Rz_LN)*sin(Rx_LN) + sin(Ry_LN)*sin(Rz_LN)) + cos(Rx_LN)*((c11 - c12)*cos(Rz_LN)*sin(Ry_LN)*sin(Rz_LN) + cos(Ry_LN)*sin(Rx_LN)*(-c13 + c11*cos(Rz_LN)^2 + c12*sin(Rz_LN)^2))) + ((-2*c14*cos(Rx_LN)^2*cos(Ry_LN)*sin(Rz_LN) + 2*c14*sin(Rx_LN)*(-(cos(Rz_LN)*sin(Ry_LN)) + cos(Ry_LN)*sin(Rx_LN)*sin(Rz_LN)) + (c11 - c12)*cos(Rx_LN)*(cos(Rz_LN)^2*sin(Ry_LN) - 2*cos(Ry_LN)*cos(Rz_LN)*sin(Rx_LN)*sin(Rz_LN) - sin(Ry_LN)*sin(Rz_LN)^2))*(-4*cos(Ry_LN)^2*cos(2*Rz_LN)*sin(Rx_LN) + 4*cos(2*Rz_LN)*sin(Rx_LN)*sin(Ry_LN)^2 + (-3 + cos(2*Rx_LN))*sin(2*Ry_LN)*sin(2*Rz_LN)))/8. + cos(Rx_LN)*(cos(Ry_LN)^2*cos(Rz_LN) - cos(Rz_LN)*sin(Ry_LN)^2 + sin(Rx_LN)*sin(2*Ry_LN)*sin(Rz_LN))*(c44*cos(Rx_LN)^2*cos(Ry_LN)*sin(Rz_LN) + c44*sin(Rx_LN)*(cos(Rz_LN)*sin(Ry_LN) - cos(Ry_LN)*sin(Rx_LN)*sin(Rz_LN)) + c14*cos(Rx_LN)*(-(cos(Rz_LN)^2*sin(Ry_LN)) + sin(Ry_LN)*sin(Rz_LN)^2 + cos(Ry_LN)*sin(Rx_LN)*sin(2*Rz_LN))) - cos(Rx_LN)*(-2*cos(Ry_LN)*cos(Rz_LN)*sin(Rx_LN)*sin(Ry_LN) + cos(Ry_LN)^2*sin(Rz_LN) - sin(Ry_LN)^2*sin(Rz_LN))*(c44*cos(Rx_LN)^2*cos(Ry_LN)*cos(Rz_LN) - c44*sin(Rx_LN)*(cos(Ry_LN)*cos(Rz_LN)*sin(Rx_LN) + sin(Ry_LN)*sin(Rz_LN)) - c14*cos(Rx_LN)*(cos(Ry_LN)*cos(2*Rz_LN)*sin(Rx_LN) + sin(Ry_LN)*sin(2*Rz_LN)))
      DESCR_PREFIX:C45 = rotated c45 elastic stiffnesses component
      C46 = (cos(Rx_LN)*(6*c14*cos(Rx_LN - 2*Ry_LN - 3*Rz_LN) - 2*c14*cos(3*Rx_LN - 2*Ry_LN - 3*Rz_LN) - 6*c14*cos(Rx_LN + 2*Ry_LN - 3*Rz_LN) + 2*c14*cos(3*Rx_LN + 2*Ry_LN - 3*Rz_LN) + 6*c14*cos(Rx_LN - 2*Ry_LN + 3*Rz_LN) - 2*c14*cos(3*Rx_LN - 2*Ry_LN + 3*Rz_LN) - 6*c14*cos(Rx_LN + 2*Ry_LN + 3*Rz_LN) + 2*c14*cos(3*Rx_LN + 2*Ry_LN + 3*Rz_LN) + c11*sin(Rx_LN - 2*Ry_LN) - 2*c12*sin(Rx_LN - 2*Ry_LN) + 2*c13*sin(Rx_LN - 2*Ry_LN) - c33*sin(Rx_LN - 2*Ry_LN) + c11*sin(3*Rx_LN - 2*Ry_LN) - 2*c13*sin(3*Rx_LN - 2*Ry_LN) + c33*sin(3*Rx_LN - 2*Ry_LN) - 4*c44*sin(3*Rx_LN - 2*Ry_LN) - c11*sin(Rx_LN + 2*Ry_LN) + 2*c12*sin(Rx_LN + 2*Ry_LN) - 2*c13*sin(Rx_LN + 2*Ry_LN) + c33*sin(Rx_LN + 2*Ry_LN) - c11*sin(3*Rx_LN + 2*Ry_LN) + 2*c13*sin(3*Rx_LN + 2*Ry_LN) - c33*sin(3*Rx_LN + 2*Ry_LN) + 4*c44*sin(3*Rx_LN + 2*Ry_LN) - 6*c14*sin(2*Rx_LN - 2*Ry_LN - 3*Rz_LN) + 4*c14*sin(2*Ry_LN - 3*Rz_LN) - 6*c14*sin(2*Rx_LN + 2*Ry_LN - 3*Rz_LN) + 6*c14*sin(2*Rx_LN - 2*Ry_LN + 3*Rz_LN) - 4*c14*sin(2*Ry_LN + 3*Rz_LN) + 6*c14*sin(2*Rx_LN + 2*Ry_LN + 3*Rz_LN)))/16.
      DESCR_PREFIX:C46 = rotated c46 elastic stiffnesses component
      C51 = c33*cos(Rx_LN)^4*cos(Ry_LN)*sin(Ry_LN)^3 + ((c13 + 2*c44)*cos(Rx_LN)^2*(2 - 2*cos(2*Rx_LN) + cos(2*(Rx_LN - Ry_LN)) + 2*cos(2*Ry_LN) + cos(2*(Rx_LN + Ry_LN)))*sin(2*Ry_LN))/8. - (cos(Rx_LN)*sin(2*Ry_LN)*(10*c11*cos(Rx_LN) - 4*c11*cos(3*Rx_LN)*sin(Ry_LN)^2 + 6*cos(2*Ry_LN)*(c11*cos(Rx_LN) + 48*c14*cos(Rz_LN)*sin(Rx_LN)*sin(Rz_LN)^2)))/32. + c14*cos(Rx_LN)*(6*cos(Ry_LN)^3*cos(Rz_LN)^3*sin(Rx_LN)*sin(Ry_LN) + (cos(Ry_LN)*(2*cos(2*Rx_LN - 3*Rz_LN) - 9*cos(Rz_LN) - 7*cos(3*Rz_LN) + 2*cos(2*Rx_LN + 3*Rz_LN))*sin(Rx_LN)*sin(Ry_LN)^3)/2. - 3*(1 + 2*cos(2*Rz_LN))*sin(Rx_LN)^2*sin(Ry_LN)^4*sin(Rz_LN) - cos(Ry_LN)^4*sin(3*Rz_LN) - (3*(-5 + 3*cos(2*Rx_LN))*cos(Ry_LN)^2*sin(Ry_LN)^2*sin(3*Rz_LN))/2.)
      DESCR_PREFIX:C51 = rotated c51 elastic stiffnesses component
      C52 = (cos(Rx_LN)*(6*c14*cos(Rx_LN - 2*Ry_LN - 3*Rz_LN) - 2*c14*cos(3*Rx_LN - 2*Ry_LN - 3*Rz_LN) - 6*c14*cos(Rx_LN + 2*Ry_LN - 3*Rz_LN) + 2*c14*cos(3*Rx_LN + 2*Ry_LN - 3*Rz_LN) + 6*c14*cos(Rx_LN - 2*Ry_LN + 3*Rz_LN) - 2*c14*cos(3*Rx_LN - 2*Ry_LN + 3*Rz_LN) - 6*c14*cos(Rx_LN + 2*Ry_LN + 3*Rz_LN) + 2*c14*cos(3*Rx_LN + 2*Ry_LN + 3*Rz_LN) - c11*sin(Rx_LN - 2*Ry_LN) + 4*c12*sin(Rx_LN - 2*Ry_LN) - 2*c13*sin(Rx_LN - 2*Ry_LN) - c33*sin(Rx_LN - 2*Ry_LN) + 4*c44*sin(Rx_LN - 2*Ry_LN) + c11*sin(3*Rx_LN - 2*Ry_LN) - 2*c13*sin(3*Rx_LN - 2*Ry_LN) + c33*sin(3*Rx_LN - 2*Ry_LN) - 4*c44*sin(3*Rx_LN - 2*Ry_LN) + c11*sin(Rx_LN + 2*Ry_LN) - 4*c12*sin(Rx_LN + 2*Ry_LN) + 2*c13*sin(Rx_LN + 2*Ry_LN) + c33*sin(Rx_LN + 2*Ry_LN) - 4*c44*sin(Rx_LN + 2*Ry_LN) - c11*sin(3*Rx_LN + 2*Ry_LN) + 2*c13*sin(3*Rx_LN + 2*Ry_LN) - c33*sin(3*Rx_LN + 2*Ry_LN) + 4*c44*sin(3*Rx_LN + 2*Ry_LN) - 6*c14*sin(2*Rx_LN - 2*Ry_LN - 3*Rz_LN) + 4*c14*sin(2*Ry_LN - 3*Rz_LN) - 6*c14*sin(2*Rx_LN + 2*Ry_LN - 3*Rz_LN) + 6*c14*sin(2*Rx_LN - 2*Ry_LN + 3*Rz_LN) - 4*c14*sin(2*Ry_LN + 3*Rz_LN) + 6*c14*sin(2*Rx_LN + 2*Ry_LN + 3*Rz_LN)))/16.
      DESCR_PREFIX:C52 = rotated c52 elastic stiffnesses component
      C53 = (cos(Rx_LN)*(32*c33*cos(Rx_LN)^3*cos(Ry_LN)^3*sin(Ry_LN) - 4*(c13 + 2*c44)*cos(Rx_LN)*(-2 + 2*cos(2*Rx_LN) + cos(2*(Rx_LN - Ry_LN)) + 2*cos(2*Ry_LN) + cos(2*(Rx_LN + Ry_LN)))*sin(2*Ry_LN) + sin(2*Ry_LN)*(-10*c11*cos(Rx_LN) + 4*c11*cos(3*Rx_LN)*cos(Ry_LN)^2 + 6*cos(2*Ry_LN)*(c11*cos(Rx_LN) + 48*c14*cos(Rz_LN)*sin(Rx_LN)*sin(Rz_LN)^2)) + 32*c14*(6*cos(Ry_LN)*cos(Rz_LN)^3*sin(Rx_LN)*sin(Ry_LN)^3 + (1 + 2*cos(2*Rz_LN))*sin(Ry_LN)^4*sin(Rz_LN) - 2*cos(Ry_LN)^3*cos(Rz_LN)*sin(Rx_LN)*sin(Ry_LN)*(cos(Rz_LN)^2*(3 + 2*sin(Rx_LN)^2) - 6*sin(Rx_LN)^2*sin(Rz_LN)^2) + 3*cos(Ry_LN)^4*sin(Rx_LN)^2*sin(3*Rz_LN) + (3*(-5 + 3*cos(2*Rx_LN))*cos(Ry_LN)^2*sin(Ry_LN)^2*sin(3*Rz_LN))/2.)))/32.
      DESCR_PREFIX:C53 = rotated c53 elastic stiffnesses component
      C54 = (c13 - c33)*cos(Rx_LN)^3*cos(Ry_LN)^2*sin(Rx_LN)*sin(Ry_LN) + cos(Rx_LN)*cos(Rz_LN)*(cos(Ry_LN)*cos(Rz_LN)*sin(Rx_LN) + sin(Ry_LN)*sin(Rz_LN))*(c13*cos(Rx_LN)^2*cos(Ry_LN)*sin(Ry_LN) + c11*(cos(Rz_LN)*sin(Rx_LN)*sin(Ry_LN) - cos(Ry_LN)*sin(Rz_LN))*(cos(Ry_LN)*cos(Rz_LN)*sin(Rx_LN) + sin(Ry_LN)*sin(Rz_LN)) + c12*(-(cos(Rz_LN)*sin(Ry_LN)) + cos(Ry_LN)*sin(Rx_LN)*sin(Rz_LN))*(cos(Ry_LN)*cos(Rz_LN) + sin(Rx_LN)*sin(Ry_LN)*sin(Rz_LN)) + c14*cos(Rx_LN)*(-2*cos(Ry_LN)*cos(Rz_LN)*sin(Rx_LN)*sin(Ry_LN) + cos(Ry_LN)^2*sin(Rz_LN) - sin(Ry_LN)^2*sin(Rz_LN))) + cos(Rx_LN)*sin(Rz_LN)*(-(cos(Rz_LN)*sin(Ry_LN)) + cos(Ry_LN)*sin(Rx_LN)*sin(Rz_LN))*(c13*cos(Rx_LN)^2*cos(Ry_LN)*sin(Ry_LN) + (c11 - c12)*cos(Ry_LN)^2*cos(Rz_LN)*sin(Rx_LN)*sin(Rz_LN) + (-c11 + c12)*cos(Rz_LN)*sin(Rx_LN)*sin(Ry_LN)^2*sin(Rz_LN) + c14*cos(Rx_LN)*(cos(Rz_LN)*sin(Rx_LN)*sin(2*Ry_LN) - cos(2*Ry_LN)*sin(Rz_LN)) + cos(Ry_LN)*sin(Ry_LN)*(cos(Rz_LN)^2*(-c11 + c12*sin(Rx_LN)^2) + (-c12 + c11*sin(Rx_LN)^2)*sin(Rz_LN)^2)) + cos(Rx_LN)*(-(cos(Rz_LN)^2*sin(Ry_LN)) + sin(Ry_LN)*sin(Rz_LN)^2 + cos(Ry_LN)*sin(Rx_LN)*sin(2*Rz_LN))*(c14*cos(Rx_LN)*(cos(Ry_LN)^2*cos(Rz_LN) - cos(Rz_LN)*sin(Ry_LN)^2 + sin(Rx_LN)*sin(2*Ry_LN)*sin(Rz_LN)) + ((c11 - c12)*(4*cos(Ry_LN)^2*cos(2*Rz_LN)*sin(Rx_LN) - 4*cos(2*Rz_LN)*sin(Rx_LN)*sin(Ry_LN)^2 - (-3 + cos(2*Rx_LN))*sin(2*Ry_LN)*sin(2*Rz_LN)))/8.) + (cos(Rz_LN)*sin(Rx_LN)*sin(Ry_LN) + cos(2*Rx_LN)*cos(Ry_LN)*sin(Rz_LN))*(c44*cos(Rx_LN)*(cos(Ry_LN)^2*cos(Rz_LN) - cos(Rz_LN)*sin(Ry_LN)^2 + sin(Rx_LN)*sin(2*Ry_LN)*sin(Rz_LN)) + c14*(cos(Ry_LN)^2*cos(2*Rz_LN)*sin(Rx_LN) - cos(2*Rz_LN)*sin(Rx_LN)*sin(Ry_LN)^2 - ((-3 + cos(2*Rx_LN))*sin(2*Ry_LN)*sin(2*Rz_LN))/4.)) + (cos(Rx_LN)^2*cos(Ry_LN)*cos(Rz_LN) - sin(Rx_LN)*(cos(Ry_LN)*cos(Rz_LN)*sin(Rx_LN) + sin(Ry_LN)*sin(Rz_LN)))*(cos(Ry_LN)^2*(-(c44*cos(Rx_LN)) + 2*c14*cos(Rz_LN)*sin(Rx_LN))*sin(Rz_LN) + (c44*cos(Rx_LN) - 2*c14*cos(Rz_LN)*sin(Rx_LN))*sin(Ry_LN)^2*sin(Rz_LN) + (sin(2*Ry_LN)*(c14*cos(2*(Rx_LN - Rz_LN)) - 6*c14*cos(2*Rz_LN) + c14*cos(2*(Rx_LN + Rz_LN)) + 2*c44*sin(2*Rx_LN - Rz_LN) + 2*c44*sin(2*Rx_LN + Rz_LN)))/8.)
      DESCR_PREFIX:C54 = rotated c54 elastic stiffnesses component
      C55 = (38*c11 - 32*c12 - 12*c13 + 6*c33 + 40*c44 - 8*(3*c11 - 4*c12 + 2*c13 - c33 - 4*c44)*cos(2*Rx_LN) + 2*(c11 - 2*c13 + c33 - 4*c44)*cos(4*Rx_LN) - 4*c11*cos(2*(Rx_LN - 2*Ry_LN)) + 8*c13*cos(2*(Rx_LN - 2*Ry_LN)) - 4*c33*cos(2*(Rx_LN - 2*Ry_LN)) + 16*c44*cos(2*(Rx_LN - 2*Ry_LN)) - c11*cos(4*(Rx_LN - Ry_LN)) + 2*c13*cos(4*(Rx_LN - Ry_LN)) - c33*cos(4*(Rx_LN - Ry_LN)) + 4*c44*cos(4*(Rx_LN - Ry_LN)) - 6*c11*cos(4*Ry_LN) + 12*c13*cos(4*Ry_LN) - 6*c33*cos(4*Ry_LN) + 24*c44*cos(4*Ry_LN) - c11*cos(4*(Rx_LN + Ry_LN)) + 2*c13*cos(4*(Rx_LN + Ry_LN)) - c33*cos(4*(Rx_LN + Ry_LN)) + 4*c44*cos(4*(Rx_LN + Ry_LN)) - 4*c11*cos(2*(Rx_LN + 2*Ry_LN)) + 8*c13*cos(2*(Rx_LN + 2*Ry_LN)) - 4*c33*cos(2*(Rx_LN + 2*Ry_LN)) + 16*c44*cos(2*(Rx_LN + 2*Ry_LN)) - 28*c14*cos(Rx_LN - 4*Ry_LN - 3*Rz_LN) + 12*c14*cos(3*Rx_LN - 4*Ry_LN - 3*Rz_LN) + 28*c14*cos(Rx_LN + 4*Ry_LN - 3*Rz_LN) - 12*c14*cos(3*Rx_LN + 4*Ry_LN - 3*Rz_LN) + 28*c14*cos(Rx_LN - 4*Ry_LN + 3*Rz_LN) - 12*c14*cos(3*Rx_LN - 4*Ry_LN + 3*Rz_LN) - 28*c14*cos(Rx_LN + 4*Ry_LN + 3*Rz_LN) + 12*c14*cos(3*Rx_LN + 4*Ry_LN + 3*Rz_LN) + 8*c14*sin(2*Rx_LN - 3*Rz_LN) + 4*c14*sin(4*Rx_LN - 3*Rz_LN) + 28*c14*sin(2*Rx_LN - 4*Ry_LN - 3*Rz_LN) - 2*c14*sin(4*Rx_LN - 4*Ry_LN - 3*Rz_LN) + 28*c14*sin(2*Rx_LN + 4*Ry_LN - 3*Rz_LN) - 2*c14*sin(4*Rx_LN + 4*Ry_LN - 3*Rz_LN) + 8*c14*sin(2*Rx_LN + 3*Rz_LN) + 4*c14*sin(4*Rx_LN + 3*Rz_LN) + 28*c14*sin(2*Rx_LN - 4*Ry_LN + 3*Rz_LN) - 2*c14*sin(4*Rx_LN - 4*Ry_LN + 3*Rz_LN) + 28*c14*sin(2*Rx_LN + 4*Ry_LN + 3*Rz_LN) - 2*c14*sin(4*Rx_LN + 4*Ry_LN + 3*Rz_LN))/128.
      DESCR_PREFIX:C55 = rotated c55 elastic stiffnesses component
      C56 = (c13 - c33)*cos(Rx_LN)^3*cos(Ry_LN)*sin(Rx_LN)*sin(Ry_LN)^2 + cos(Rx_LN)*cos(Rz_LN)*(cos(Rz_LN)*sin(Rx_LN)*sin(Ry_LN) - cos(Ry_LN)*sin(Rz_LN))*(c13*cos(Rx_LN)^2*cos(Ry_LN)*sin(Ry_LN) + c11*(cos(Rz_LN)*sin(Rx_LN)*sin(Ry_LN) - cos(Ry_LN)*sin(Rz_LN))*(cos(Ry_LN)*cos(Rz_LN)*sin(Rx_LN) + sin(Ry_LN)*sin(Rz_LN)) + c12*(-(cos(Rz_LN)*sin(Ry_LN)) + cos(Ry_LN)*sin(Rx_LN)*sin(Rz_LN))*(cos(Ry_LN)*cos(Rz_LN) + sin(Rx_LN)*sin(Ry_LN)*sin(Rz_LN)) + c14*cos(Rx_LN)*(-2*cos(Ry_LN)*cos(Rz_LN)*sin(Rx_LN)*sin(Ry_LN) + cos(Ry_LN)^2*sin(Rz_LN) - sin(Ry_LN)^2*sin(Rz_LN))) + cos(Rx_LN)*sin(Rz_LN)*(cos(Ry_LN)*cos(Rz_LN) + sin(Rx_LN)*sin(Ry_LN)*sin(Rz_LN))*(c13*cos(Rx_LN)^2*cos(Ry_LN)*sin(Ry_LN) + (c11 - c12)*cos(Ry_LN)^2*cos(Rz_LN)*sin(Rx_LN)*sin(Rz_LN) + (-c11 + c12)*cos(Rz_LN)*sin(Rx_LN)*sin(Ry_LN)^2*sin(Rz_LN) + c14*cos(Rx_LN)*(cos(Rz_LN)*sin(Rx_LN)*sin(2*Ry_LN) - cos(2*Ry_LN)*sin(Rz_LN)) + cos(Ry_LN)*sin(Ry_LN)*(cos(Rz_LN)^2*(-c11 + c12*sin(Rx_LN)^2) + (-c12 + c11*sin(Rx_LN)^2)*sin(Rz_LN)^2)) + (cos(Rx_LN)*(cos(Ry_LN)*cos(2*Rz_LN) + sin(Rx_LN)*sin(Ry_LN)*sin(2*Rz_LN))*(2*c14*cos(Rx_LN)*cos(2*Ry_LN)*cos(Rz_LN) + (c11 - c12)*cos(Ry_LN)^2*cos(2*Rz_LN)*sin(Rx_LN) - c11*cos(Rz_LN)^2*sin(Rx_LN)*sin(Ry_LN)^2 + c12*cos(Rz_LN)^2*sin(Rx_LN)*sin(Ry_LN)^2 + c14*sin(2*Rx_LN)*sin(2*Ry_LN)*sin(Rz_LN) + c11*sin(Rx_LN)*sin(Ry_LN)^2*sin(Rz_LN)^2 - c12*sin(Rx_LN)*sin(Ry_LN)^2*sin(Rz_LN)^2 - ((c11 - c12)*(-3 + cos(2*Rx_LN))*sin(2*Ry_LN)*sin(2*Rz_LN))/4.))/2. + (-(cos(Ry_LN)*cos(Rz_LN)*sin(Rx_LN)) + cos(2*Rx_LN)*sin(Ry_LN)*sin(Rz_LN))*(c44*cos(Rx_LN)*(cos(Ry_LN)^2*cos(Rz_LN) - cos(Rz_LN)*sin(Ry_LN)^2 + sin(Rx_LN)*sin(2*Ry_LN)*sin(Rz_LN)) + c14*(cos(Ry_LN)^2*cos(2*Rz_LN)*sin(Rx_LN) - cos(2*Rz_LN)*sin(Rx_LN)*sin(Ry_LN)^2 - ((-3 + cos(2*Rx_LN))*sin(2*Ry_LN)*sin(2*Rz_LN))/4.)) + (cos(Rx_LN)^2*cos(Rz_LN)*sin(Ry_LN) + sin(Rx_LN)*(-(cos(Rz_LN)*sin(Rx_LN)*sin(Ry_LN)) + cos(Ry_LN)*sin(Rz_LN)))*(cos(Ry_LN)^2*(-(c44*cos(Rx_LN)) + 2*c14*cos(Rz_LN)*sin(Rx_LN))*sin(Rz_LN) + (c44*cos(Rx_LN) - 2*c14*cos(Rz_LN)*sin(Rx_LN))*sin(Ry_LN)^2*sin(Rz_LN) + (sin(2*Ry_LN)*(c14*cos(2*(Rx_LN - Rz_LN)) - 6*c14*cos(2*Rz_LN) + c14*cos(2*(Rx_LN + Rz_LN)) + 2*c44*sin(2*Rx_LN - Rz_LN) + 2*c44*sin(2*Rx_LN + Rz_LN)))/8.)
      DESCR_PREFIX:C56 = rotated c56 elastic stiffnesses component
      C61 = (c13 - c33)*cos(Rx_LN)^3*sin(Rx_LN)*sin(Ry_LN)^3 + (cos(Ry_LN)*cos(Rz_LN) + sin(Rx_LN)*sin(Ry_LN)*sin(Rz_LN))^2*(c14*cos(Rx_LN)^2*cos(Rz_LN)*sin(Ry_LN) + c14*sin(Rx_LN)*(-(cos(Rz_LN)*sin(Rx_LN)*sin(Ry_LN)) + cos(Ry_LN)*sin(Rz_LN)) + cos(Rx_LN)*((c11 - c12)*cos(Ry_LN)*cos(Rz_LN)*sin(Rz_LN) + sin(Rx_LN)*sin(Ry_LN)*(-c13 + c12*cos(Rz_LN)^2 + c11*sin(Rz_LN)^2))) + (cos(Rz_LN)*sin(Rx_LN)*sin(Ry_LN) - cos(Ry_LN)*sin(Rz_LN))^2*(-(c14*cos(Rx_LN)^2*cos(Rz_LN)*sin(Ry_LN)) + c14*sin(Rx_LN)*(cos(Rz_LN)*sin(Rx_LN)*sin(Ry_LN) - cos(Ry_LN)*sin(Rz_LN)) + cos(Rx_LN)*((-c11 + c12)*cos(Ry_LN)*cos(Rz_LN)*sin(Rz_LN) + sin(Rx_LN)*sin(Ry_LN)*(-c13 + c11*cos(Rz_LN)^2 + c12*sin(Rz_LN)^2))) + 2*cos(Rx_LN)*sin(Ry_LN)*(cos(Rz_LN)*sin(Rx_LN)*sin(Ry_LN) - cos(Ry_LN)*sin(Rz_LN))*(c44*cos(Rx_LN)^2*cos(Rz_LN)*sin(Ry_LN) + c44*sin(Rx_LN)*(-(cos(Rz_LN)*sin(Rx_LN)*sin(Ry_LN)) + cos(Ry_LN)*sin(Rz_LN)) + c14*cos(Rx_LN)*(-(cos(Rz_LN)^2*sin(Rx_LN)*sin(Ry_LN)) + sin(Rx_LN)*sin(Ry_LN)*sin(Rz_LN)^2 + cos(Ry_LN)*sin(2*Rz_LN))) + 2*(cos(Rz_LN)*sin(Rx_LN)*sin(Ry_LN) - cos(Ry_LN)*sin(Rz_LN))*(cos(Ry_LN)*cos(Rz_LN) + sin(Rx_LN)*sin(Ry_LN)*sin(Rz_LN))*(-(c14*cos(Ry_LN)*cos(Rz_LN)*sin(Rx_LN)) + c14*cos(2*Rx_LN)*sin(Ry_LN)*sin(Rz_LN) + ((c11 - c12)*cos(Rx_LN)*(cos(Ry_LN)*cos(2*Rz_LN) + sin(Rx_LN)*sin(Ry_LN)*sin(2*Rz_LN)))/2.) + 2*cos(Rx_LN)*sin(Ry_LN)*(cos(Ry_LN)*cos(Rz_LN) + sin(Rx_LN)*sin(Ry_LN)*sin(Rz_LN))*(c44*cos(Rx_LN)^2*sin(Ry_LN)*sin(Rz_LN) - c44*sin(Rx_LN)*(cos(Ry_LN)*cos(Rz_LN) + sin(Rx_LN)*sin(Ry_LN)*sin(Rz_LN)) + c14*cos(Rx_LN)*(cos(Ry_LN)*cos(2*Rz_LN) + sin(Rx_LN)*sin(Ry_LN)*sin(2*Rz_LN)))
      DESCR_PREFIX:C61 = rotated c61 elastic stiffnesses component
      C62 = (cos(Rx_LN)*(-4*c14*cos(Rx_LN)^3*cos(3*Rz_LN)*sin(Ry_LN) + 3*(c11 - 2*c13 + c33 - 4*c44)*cos(Rx_LN)^2*sin(Rx_LN)*sin(Ry_LN) - (c11 - 2*c13 + c33 - 4*c44)*sin(Rx_LN)^3*sin(Ry_LN) + 6*c14*cos(Ry_LN)*sin(2*Rx_LN)*sin(Rz_LN)^3 + 12*c14*cos(Rx_LN)*cos(Rz_LN)^2*sin(Rx_LN)*(cos(Rz_LN)*sin(Rx_LN)*sin(Ry_LN) - 3*cos(Ry_LN)*sin(Rz_LN)) + sin(Rx_LN)*sin(Ry_LN)*(c11 + 2*c13 - 3*c33 + 4*c44 - 9*c14*sin(2*Rx_LN)*sin(Rz_LN)*sin(2*Rz_LN))))/4.
      DESCR_PREFIX:C62 = rotated c62 elastic stiffnesses component
      C63 = (c13 - c33)*cos(Rx_LN)^3*cos(Ry_LN)^2*sin(Rx_LN)*sin(Ry_LN) + (cos(Rz_LN)*sin(Ry_LN) - cos(Ry_LN)*sin(Rx_LN)*sin(Rz_LN))^2*(c14*cos(Rx_LN)^2*cos(Rz_LN)*sin(Ry_LN) + c14*sin(Rx_LN)*(-(cos(Rz_LN)*sin(Rx_LN)*sin(Ry_LN)) + cos(Ry_LN)*sin(Rz_LN)) + cos(Rx_LN)*((c11 - c12)*cos(Ry_LN)*cos(Rz_LN)*sin(Rz_LN) + sin(Rx_LN)*sin(Ry_LN)*(-c13 + c12*cos(Rz_LN)^2 + c11*sin(Rz_LN)^2))) + (cos(Ry_LN)*cos(Rz_LN)*sin(Rx_LN) + sin(Ry_LN)*sin(Rz_LN))^2*(-(c14*cos(Rx_LN)^2*cos(Rz_LN)*sin(Ry_LN)) + c14*sin(Rx_LN)*(cos(Rz_LN)*sin(Rx_LN)*sin(Ry_LN) - cos(Ry_LN)*sin(Rz_LN)) + cos(Rx_LN)*((-c11 + c12)*cos(Ry_LN)*cos(Rz_LN)*sin(Rz_LN) + sin(Rx_LN)*sin(Ry_LN)*(-c13 + c11*cos(Rz_LN)^2 + c12*sin(Rz_LN)^2))) + 2*cos(Rx_LN)*cos(Ry_LN)*(cos(Ry_LN)*cos(Rz_LN)*sin(Rx_LN) + sin(Ry_LN)*sin(Rz_LN))*(c44*cos(Rx_LN)^2*cos(Rz_LN)*sin(Ry_LN) + c44*sin(Rx_LN)*(-(cos(Rz_LN)*sin(Rx_LN)*sin(Ry_LN)) + cos(Ry_LN)*sin(Rz_LN)) + c14*cos(Rx_LN)*(-(cos(Rz_LN)^2*sin(Rx_LN)*sin(Ry_LN)) + sin(Rx_LN)*sin(Ry_LN)*sin(Rz_LN)^2 + cos(Ry_LN)*sin(2*Rz_LN))) + 2*(-(cos(Rz_LN)*sin(Ry_LN)) + cos(Ry_LN)*sin(Rx_LN)*sin(Rz_LN))*(cos(Ry_LN)*cos(Rz_LN)*sin(Rx_LN) + sin(Ry_LN)*sin(Rz_LN))*(-(c14*cos(Ry_LN)*cos(Rz_LN)*sin(Rx_LN)) + c14*cos(2*Rx_LN)*sin(Ry_LN)*sin(Rz_LN) + ((c11 - c12)*cos(Rx_LN)*(cos(Ry_LN)*cos(2*Rz_LN) + sin(Rx_LN)*sin(Ry_LN)*sin(2*Rz_LN)))/2.) + 2*cos(Rx_LN)*cos(Ry_LN)*(-(cos(Rz_LN)*sin(Ry_LN)) + cos(Ry_LN)*sin(Rx_LN)*sin(Rz_LN))*(c44*cos(Rx_LN)^2*sin(Ry_LN)*sin(Rz_LN) - c44*sin(Rx_LN)*(cos(Ry_LN)*cos(Rz_LN) + sin(Rx_LN)*sin(Ry_LN)*sin(Rz_LN)) + c14*cos(Rx_LN)*(cos(Ry_LN)*cos(2*Rz_LN) + sin(Rx_LN)*sin(Ry_LN)*sin(2*Rz_LN)))
      DESCR_PREFIX:C63 = rotated c63 elastic stiffnesses component
      C64 = (cos(Rx_LN)*(6*c14*cos(Rx_LN - 2*Ry_LN - 3*Rz_LN) - 2*c14*cos(3*Rx_LN - 2*Ry_LN - 3*Rz_LN) - 6*c14*cos(Rx_LN + 2*Ry_LN - 3*Rz_LN) + 2*c14*cos(3*Rx_LN + 2*Ry_LN - 3*Rz_LN) + 6*c14*cos(Rx_LN - 2*Ry_LN + 3*Rz_LN) - 2*c14*cos(3*Rx_LN - 2*Ry_LN + 3*Rz_LN) - 6*c14*cos(Rx_LN + 2*Ry_LN + 3*Rz_LN) + 2*c14*cos(3*Rx_LN + 2*Ry_LN + 3*Rz_LN) + c11*sin(Rx_LN - 2*Ry_LN) - 2*c12*sin(Rx_LN - 2*Ry_LN) + 2*c13*sin(Rx_LN - 2*Ry_LN) - c33*sin(Rx_LN - 2*Ry_LN) + c11*sin(3*Rx_LN - 2*Ry_LN) - 2*c13*sin(3*Rx_LN - 2*Ry_LN) + c33*sin(3*Rx_LN - 2*Ry_LN) - 4*c44*sin(3*Rx_LN - 2*Ry_LN) - c11*sin(Rx_LN + 2*Ry_LN) + 2*c12*sin(Rx_LN + 2*Ry_LN) - 2*c13*sin(Rx_LN + 2*Ry_LN) + c33*sin(Rx_LN + 2*Ry_LN) - c11*sin(3*Rx_LN + 2*Ry_LN) + 2*c13*sin(3*Rx_LN + 2*Ry_LN) - c33*sin(3*Rx_LN + 2*Ry_LN) + 4*c44*sin(3*Rx_LN + 2*Ry_LN) - 6*c14*sin(2*Rx_LN - 2*Ry_LN - 3*Rz_LN) + 4*c14*sin(2*Ry_LN - 3*Rz_LN) - 6*c14*sin(2*Rx_LN + 2*Ry_LN - 3*Rz_LN) + 6*c14*sin(2*Rx_LN - 2*Ry_LN + 3*Rz_LN) - 4*c14*sin(2*Ry_LN + 3*Rz_LN) + 6*c14*sin(2*Rx_LN + 2*Ry_LN + 3*Rz_LN)))/16.
      DESCR_PREFIX:C64 = rotated c64 elastic stiffnesses component
      C65 = (c13 - c33)*cos(Rx_LN)^3*cos(Ry_LN)*sin(Rx_LN)*sin(Ry_LN)^2 + (-(cos(Rz_LN)*sin(Ry_LN)) + cos(Ry_LN)*sin(Rx_LN)*sin(Rz_LN))*(cos(Ry_LN)*cos(Rz_LN) + sin(Rx_LN)*sin(Ry_LN)*sin(Rz_LN))*(c14*cos(Rx_LN)^2*cos(Rz_LN)*sin(Ry_LN) + c14*sin(Rx_LN)*(-(cos(Rz_LN)*sin(Rx_LN)*sin(Ry_LN)) + cos(Ry_LN)*sin(Rz_LN)) + cos(Rx_LN)*((c11 - c12)*cos(Ry_LN)*cos(Rz_LN)*sin(Rz_LN) + sin(Rx_LN)*sin(Ry_LN)*(-c13 + c12*cos(Rz_LN)^2 + c11*sin(Rz_LN)^2))) + (cos(Rz_LN)*sin(Rx_LN)*sin(Ry_LN) - cos(Ry_LN)*sin(Rz_LN))*(cos(Ry_LN)*cos(Rz_LN)*sin(Rx_LN) + sin(Ry_LN)*sin(Rz_LN))*(-(c14*cos(Rx_LN)^2*cos(Rz_LN)*sin(Ry_LN)) + c14*sin(Rx_LN)*(cos(Rz_LN)*sin(Rx_LN)*sin(Ry_LN) - cos(Ry_LN)*sin(Rz_LN)) + cos(Rx_LN)*((-c11 + c12)*cos(Ry_LN)*cos(Rz_LN)*sin(Rz_LN) + sin(Rx_LN)*sin(Ry_LN)*(-c13 + c11*cos(Rz_LN)^2 + c12*sin(Rz_LN)^2))) - cos(Rx_LN)*(-2*cos(Ry_LN)*cos(Rz_LN)*sin(Rx_LN)*sin(Ry_LN) + cos(Ry_LN)^2*sin(Rz_LN) - sin(Ry_LN)^2*sin(Rz_LN))*(c44*cos(Rx_LN)^2*cos(Rz_LN)*sin(Ry_LN) + c44*sin(Rx_LN)*(-(cos(Rz_LN)*sin(Rx_LN)*sin(Ry_LN)) + cos(Ry_LN)*sin(Rz_LN)) + c14*cos(Rx_LN)*(-(cos(Rz_LN)^2*sin(Rx_LN)*sin(Ry_LN)) + sin(Rx_LN)*sin(Ry_LN)*sin(Rz_LN)^2 + cos(Ry_LN)*sin(2*Rz_LN))) + ((4*cos(Ry_LN)^2*cos(2*Rz_LN)*sin(Rx_LN) - 4*cos(2*Rz_LN)*sin(Rx_LN)*sin(Ry_LN)^2 - (-3 + cos(2*Rx_LN))*sin(2*Ry_LN)*sin(2*Rz_LN))*(2*c14*cos(Rx_LN)^2*sin(Ry_LN)*sin(Rz_LN) - 2*c14*sin(Rx_LN)*(cos(Ry_LN)*cos(Rz_LN) + sin(Rx_LN)*sin(Ry_LN)*sin(Rz_LN)) + (c11 - c12)*cos(Rx_LN)*(cos(Ry_LN)*cos(2*Rz_LN) + sin(Rx_LN)*sin(Ry_LN)*sin(2*Rz_LN))))/8. + cos(Rx_LN)*(cos(Ry_LN)^2*cos(Rz_LN) - cos(Rz_LN)*sin(Ry_LN)^2 + sin(Rx_LN)*sin(2*Ry_LN)*sin(Rz_LN))*(c44*cos(Rx_LN)^2*sin(Ry_LN)*sin(Rz_LN) - c44*sin(Rx_LN)*(cos(Ry_LN)*cos(Rz_LN) + sin(Rx_LN)*sin(Ry_LN)*sin(Rz_LN)) + c14*cos(Rx_LN)*(cos(Ry_LN)*cos(2*Rz_LN) + sin(Rx_LN)*sin(Ry_LN)*sin(2*Rz_LN)))
      DESCR_PREFIX:C65 = rotated c65 elastic stiffnesses component
      C66 = c44*cos(Ry_LN)^2*sin(Rx_LN)^2 + c44*cos(Rx_LN)^4*sin(Ry_LN)^2 + c44*cos(Rz_LN)^2*sin(Rx_LN)^4*sin(Ry_LN)^2 + (cos(Rx_LN)^2*(2*(c11 - c12)*cos(Ry_LN)^2 + (3*c11 - 8*c13 + 4*c33 - 8*c44 + c11*cos(4*Rz_LN))*sin(Rx_LN)^2*sin(Ry_LN)^2))/4. + c44*sin(Rx_LN)^4*sin(Ry_LN)^2*sin(Rz_LN)^2 + c14*sin(Rx_LN)*sin(2*Rx_LN)*sin(2*Ry_LN)*sin(Rz_LN)^3 - 2*c14*cos(Rx_LN)*cos(Rz_LN)*sin(Rx_LN)*(cos(Ry_LN)^2*(-1 + 2*cos(2*Rz_LN)) + (1 - 2*cos(2*Rz_LN))*sin(Rx_LN)^2*sin(Ry_LN)^2 + 6*cos(Ry_LN)*cos(Rz_LN)*sin(Rx_LN)*sin(Ry_LN)*sin(Rz_LN)) - 2*c14*cos(Rx_LN)^3*sin(Ry_LN)*(cos(Rz_LN)^3*sin(Rx_LN)*sin(Ry_LN) - 3*cos(Ry_LN)*cos(Rz_LN)^2*sin(Rz_LN) - 3*cos(Rz_LN)*sin(Rx_LN)*sin(Ry_LN)*sin(Rz_LN)^2 + cos(Ry_LN)*sin(Rz_LN)^3) + (c11*sin(2*Rx_LN)^2*sin(Ry_LN)^2*sin(2*Rz_LN)^2)/8.
      DESCR_PREFIX:C66 = rotated c66 elastic stiffnesses component
  mat4: Common "Silicon (Si) - Caique" on domains 1, 4, 7, 9, 12, 14, 17, 19, 22, 24, 27, 29, 32, 34, 37, 39, 42, 44, 47, 49, 52, 54, 57, 59, 62, 64, 67, 69, 72, 74, 77, 79
    def "Basic"
      density = 2329[kg/m^3]
      electricconductivity = 0
      relpermeability = 1
      p11 = -0.094
      DESCR_PREFIX:p11 = (measured) p11, photoelastic tensor component
      p12 = 0.017
      DESCR_PREFIX:p12 = (measured) p12, photoelastic tensor component
      p13 = p12
      DESCR_PREFIX:p13 = p13, photoelastic tensor component
      p14 = 0
      DESCR_PREFIX:p14 = p14, photoelastic tensor component
      p15 = 0
      DESCR_PREFIX:p15 = p15, photoelastic tensor component
      p16 = 0
      DESCR_PREFIX:p16 = p16, photoelastic tensor component
      p21 = p12
      DESCR_PREFIX:p21 = p21, photoelastic tensor component
      p22 = p11
      DESCR_PREFIX:p22 = p22, photoelastic tensor component
      p23 = p12
      DESCR_PREFIX:p23 = p23, photoelastic tensor component
      p24 = 0
      DESCR_PREFIX:p24 = p24, photoelastic tensor component
      p25 = 0
      DESCR_PREFIX:p25 = p25, photoelastic tensor component
      p26 = 0
      DESCR_PREFIX:p26 = p26, photoelastic tensor component
      p31 = p12
      DESCR_PREFIX:p31 = p31, photoelastic tensor component
      p32 = p12
      DESCR_PREFIX:p32 = p32, photoelastic tensor component
      p33 = p11
      DESCR_PREFIX:p33 = p33, photoelastic tensor component
      p34 = 0
      DESCR_PREFIX:p34 = p34, photoelastic tensor component
      p35 = 0
      DESCR_PREFIX:p35 = p35, photoelastic tensor component
      p36 = 0
      DESCR_PREFIX:p36 = p36, photoelastic tensor component
      p41 = 0
      DESCR_PREFIX:p41 = p41, photoelastic tensor component
      p42 = 0
      DESCR_PREFIX:p42 = p42, photoelastic tensor component
      p43 = 0
      DESCR_PREFIX:p43 = p43, photoelastic tensor component
      p44 = -0.051
      DESCR_PREFIX:p44 = (measured) p44, photoelastic tensor component
      p45 = 0
      DESCR_PREFIX:p45 = p45, photoelastic tensor component
      p46 = 0
      DESCR_PREFIX:p46 = p46, photoelastic tensor component
      p51 = 0
      DESCR_PREFIX:p51 = p51, photoelastic tensor component
      p52 = 0
      DESCR_PREFIX:p52 = p52, photoelastic tensor component
      p53 = 0
      DESCR_PREFIX:p53 = p53, photoelastic tensor component
      p54 = 0
      DESCR_PREFIX:p54 = p54, photoelastic tensor component
      p55 = p44
      DESCR_PREFIX:p55 = p55, photoelastic tensor component
      p56 = 0
      DESCR_PREFIX:p56 = p56, photoelastic tensor component
      p61 = 0
      DESCR_PREFIX:p61 = p61, photoelastic tensor component
      p62 = 0
      DESCR_PREFIX:p62 = p62, photoelastic tensor component
      p63 = 0
      DESCR_PREFIX:p63 = p63, photoelastic tensor component
      p64 = 0
      DESCR_PREFIX:p64 = p64, photoelastic tensor component
      p65 = 0
      DESCR_PREFIX:p65 = p65, photoelastic tensor component
      p66 = p44
      DESCR_PREFIX:p66 = p66, photoelastic tensor component
      P11 = cos(Rx_Si)^2*sin(Ry_Si)^2*(p12*cos(Ry_Si)^2 + ((p11 + p12 + (p11 - p12)*cos(2*Rx_Si))*sin(Ry_Si)^2)/2.) + 4*p44*cos(Rx_Si)^2*sin(Ry_Si)^2*(cos(Rz_Si)*sin(Rx_Si)*sin(Ry_Si) - cos(Ry_Si)*sin(Rz_Si))^2 + 4*p44*cos(Rx_Si)^2*sin(Ry_Si)^2*(cos(Ry_Si)*cos(Rz_Si) + sin(Rx_Si)*sin(Ry_Si)*sin(Rz_Si))^2 + 4*p44*(cos(Rz_Si)*sin(Rx_Si)*sin(Ry_Si) - cos(Ry_Si)*sin(Rz_Si))^2*(cos(Ry_Si)*cos(Rz_Si) + sin(Rx_Si)*sin(Ry_Si)*sin(Rz_Si))^2 + (cos(Ry_Si)*cos(Rz_Si) + sin(Rx_Si)*sin(Ry_Si)*sin(Rz_Si))^2*(p12*cos(Rx_Si)^2*sin(Ry_Si)^2 + p12*(cos(Rz_Si)*sin(Rx_Si)*sin(Ry_Si) - cos(Ry_Si)*sin(Rz_Si))^2 + p11*(cos(Ry_Si)*cos(Rz_Si) + sin(Rx_Si)*sin(Ry_Si)*sin(Rz_Si))^2) + (cos(Rz_Si)*sin(Rx_Si)*sin(Ry_Si) - cos(Ry_Si)*sin(Rz_Si))^2*(p12*cos(Rx_Si)^2*sin(Ry_Si)^2 + p11*(cos(Rz_Si)*sin(Rx_Si)*sin(Ry_Si) - cos(Ry_Si)*sin(Rz_Si))^2 + p12*(cos(Ry_Si)*cos(Rz_Si) + sin(Rx_Si)*sin(Ry_Si)*sin(Rz_Si))^2)
      DESCR_PREFIX:P11 = rotated p11 photoelastic tensor component
      P12 = p12*cos(Rx_Si)^4*sin(Ry_Si)^2 + (sin(Rx_Si)^2*(2*p12*cos(Ry_Si)^2 + (p11 + p12 + (p11 - p12)*cos(2*Rx_Si))*sin(Ry_Si)^2))/2. + cos(Rx_Si)^2*(-0.25*(cos(Ry_Si)^2*(-p11 - 3*p12 + 2*p44 + (p11 - p12 - 2*p44)*cos(4*Rz_Si))) + sin(Rx_Si)*(p11*cos(Rz_Si)^4*sin(Rx_Si)*sin(Ry_Si)^2 - cos(Rz_Si)^2*(-p12 + 4*p44 + p12*cos(2*Rz_Si))*sin(Rx_Si)*sin(Ry_Si)^2 + p12*cos(Rz_Si)^3*sin(2*Ry_Si)*sin(Rz_Si) + p11*cos(Rz_Si)*sin(2*Ry_Si)*sin(Rz_Si)^3 + (p11 - 4*p44)*sin(Rx_Si)*sin(Ry_Si)^2*sin(Rz_Si)^4) - ((p11 + p12 + (p11 - p12 - 4*p44)*cos(2*Rz_Si))*sin(Rx_Si)*sin(2*Ry_Si)*sin(2*Rz_Si))/4.)
      DESCR_PREFIX:P12 = rotated p12 photoelastic tensor component
      P13 = cos(Rx_Si)^2*cos(Ry_Si)^2*(p12*cos(Ry_Si)^2 + ((p11 + p12 + (p11 - p12)*cos(2*Rx_Si))*sin(Ry_Si)^2)/2.) + 4*p44*cos(Rx_Si)^2*cos(Ry_Si)*sin(Ry_Si)*(cos(Rz_Si)*sin(Rx_Si)*sin(Ry_Si) - cos(Ry_Si)*sin(Rz_Si))*(cos(Ry_Si)*cos(Rz_Si)*sin(Rx_Si) + sin(Ry_Si)*sin(Rz_Si)) + 4*p44*cos(Rx_Si)^2*cos(Ry_Si)*sin(Ry_Si)*(-(cos(Rz_Si)*sin(Ry_Si)) + cos(Ry_Si)*sin(Rx_Si)*sin(Rz_Si))*(cos(Ry_Si)*cos(Rz_Si) + sin(Rx_Si)*sin(Ry_Si)*sin(Rz_Si)) + 4*p44*(cos(Rz_Si)*sin(Rx_Si)*sin(Ry_Si) - cos(Ry_Si)*sin(Rz_Si))*(-(cos(Rz_Si)*sin(Ry_Si)) + cos(Ry_Si)*sin(Rx_Si)*sin(Rz_Si))*(cos(Ry_Si)*cos(Rz_Si)*sin(Rx_Si) + sin(Ry_Si)*sin(Rz_Si))*(cos(Ry_Si)*cos(Rz_Si) + sin(Rx_Si)*sin(Ry_Si)*sin(Rz_Si)) + (cos(Rz_Si)*sin(Ry_Si) - cos(Ry_Si)*sin(Rx_Si)*sin(Rz_Si))^2*(p12*cos(Rx_Si)^2*sin(Ry_Si)^2 + p12*(cos(Rz_Si)*sin(Rx_Si)*sin(Ry_Si) - cos(Ry_Si)*sin(Rz_Si))^2 + p11*(cos(Ry_Si)*cos(Rz_Si) + sin(Rx_Si)*sin(Ry_Si)*sin(Rz_Si))^2) + (cos(Ry_Si)*cos(Rz_Si)*sin(Rx_Si) + sin(Ry_Si)*sin(Rz_Si))^2*(p12*cos(Rx_Si)^2*sin(Ry_Si)^2 + p11*(cos(Rz_Si)*sin(Rx_Si)*sin(Ry_Si) - cos(Ry_Si)*sin(Rz_Si))^2 + p12*(cos(Ry_Si)*cos(Rz_Si) + sin(Rx_Si)*sin(Ry_Si)*sin(Rz_Si))^2)
      DESCR_PREFIX:P13 = rotated p13 photoelastic tensor component
      P14 = cos(Rx_Si)*(-(cos(Ry_Si)*sin(Rx_Si)*(p12*cos(Ry_Si)^2 + ((p11 + p12 + (p11 - p12)*cos(2*Rx_Si))*sin(Ry_Si)^2)/2.)) + 2*p44*sin(Ry_Si)*(cos(Rz_Si)*sin(Rx_Si)*sin(Ry_Si) + cos(2*Rx_Si)*cos(Ry_Si)*sin(Rz_Si))*(cos(Ry_Si)*cos(Rz_Si) + sin(Rx_Si)*sin(Ry_Si)*sin(Rz_Si)) - 2*p44*(cos(Rz_Si)*sin(Rx_Si)*sin(Ry_Si) - cos(Ry_Si)*sin(Rz_Si))*(cos(Ry_Si)*cos(Rz_Si) + sin(Rx_Si)*sin(Ry_Si)*sin(Rz_Si))*(cos(Rz_Si)^2*sin(Ry_Si) - 2*cos(Ry_Si)*cos(Rz_Si)*sin(Rx_Si)*sin(Rz_Si) - sin(Ry_Si)*sin(Rz_Si)^2) + 2*p44*sin(Ry_Si)*(cos(Rz_Si)*sin(Rx_Si)*sin(Ry_Si) - cos(Ry_Si)*sin(Rz_Si))*(cos(Rx_Si)^2*cos(Ry_Si)*cos(Rz_Si) - sin(Rx_Si)*(cos(Ry_Si)*cos(Rz_Si)*sin(Rx_Si) + sin(Ry_Si)*sin(Rz_Si))) + sin(Rz_Si)*(-(cos(Rz_Si)*sin(Ry_Si)) + cos(Ry_Si)*sin(Rx_Si)*sin(Rz_Si))*(p12*cos(Rx_Si)^2*sin(Ry_Si)^2 + p12*(cos(Rz_Si)*sin(Rx_Si)*sin(Ry_Si) - cos(Ry_Si)*sin(Rz_Si))^2 + p11*(cos(Ry_Si)*cos(Rz_Si) + sin(Rx_Si)*sin(Ry_Si)*sin(Rz_Si))^2) + cos(Rz_Si)*(cos(Ry_Si)*cos(Rz_Si)*sin(Rx_Si) + sin(Ry_Si)*sin(Rz_Si))*(p12*cos(Rx_Si)^2*sin(Ry_Si)^2 + p11*(cos(Rz_Si)*sin(Rx_Si)*sin(Ry_Si) - cos(Ry_Si)*sin(Rz_Si))^2 + p12*(cos(Ry_Si)*cos(Rz_Si) + sin(Rx_Si)*sin(Ry_Si)*sin(Rz_Si))^2))
      DESCR_PREFIX:P14 = rotated p14 photoelastic tensor component
      P15 = cos(Rx_Si)^2*cos(Ry_Si)*sin(Ry_Si)*(p12*cos(Ry_Si)^2 + ((p11 + p12 + (p11 - p12)*cos(2*Rx_Si))*sin(Ry_Si)^2)/2.) + 2*p44*cos(Rx_Si)^2*sin(Ry_Si)*(cos(Rz_Si)*sin(Rx_Si)*sin(Ry_Si) - cos(Ry_Si)*sin(Rz_Si))*(cos(Rz_Si)*sin(Rx_Si)*sin(2*Ry_Si) - cos(2*Ry_Si)*sin(Rz_Si)) - 2*p44*cos(Rx_Si)^2*sin(Ry_Si)*(cos(Ry_Si)*cos(Rz_Si) + sin(Rx_Si)*sin(Ry_Si)*sin(Rz_Si))*(-(cos(Ry_Si)^2*cos(Rz_Si)) + cos(Rz_Si)*sin(Ry_Si)^2 - 2*cos(Ry_Si)*sin(Rx_Si)*sin(Ry_Si)*sin(Rz_Si)) + (-(cos(Rz_Si)*sin(Ry_Si)) + cos(Ry_Si)*sin(Rx_Si)*sin(Rz_Si))*(cos(Ry_Si)*cos(Rz_Si) + sin(Rx_Si)*sin(Ry_Si)*sin(Rz_Si))*(p12*cos(Rx_Si)^2*sin(Ry_Si)^2 + p12*(cos(Rz_Si)*sin(Rx_Si)*sin(Ry_Si) - cos(Ry_Si)*sin(Rz_Si))^2 + p11*(cos(Ry_Si)*cos(Rz_Si) + sin(Rx_Si)*sin(Ry_Si)*sin(Rz_Si))^2) + (cos(Rz_Si)*sin(Rx_Si)*sin(Ry_Si) - cos(Ry_Si)*sin(Rz_Si))*(cos(Ry_Si)*cos(Rz_Si)*sin(Rx_Si) + sin(Ry_Si)*sin(Rz_Si))*(p12*cos(Rx_Si)^2*sin(Ry_Si)^2 + p11*(cos(Rz_Si)*sin(Rx_Si)*sin(Ry_Si) - cos(Ry_Si)*sin(Rz_Si))^2 + p12*(cos(Ry_Si)*cos(Rz_Si) + sin(Rx_Si)*sin(Ry_Si)*sin(Rz_Si))^2) + 2*p44*(cos(Rz_Si)*sin(Rx_Si)*sin(Ry_Si) - cos(Ry_Si)*sin(Rz_Si))*(cos(Ry_Si)*cos(Rz_Si) + sin(Rx_Si)*sin(Ry_Si)*sin(Rz_Si))*(cos(Ry_Si)^2*cos(2*Rz_Si)*sin(Rx_Si) - cos(2*Rz_Si)*sin(Rx_Si)*sin(Ry_Si)^2 - ((-3 + cos(2*Rx_Si))*sin(2*Ry_Si)*sin(2*Rz_Si))/4.)
      DESCR_PREFIX:P15 = rotated p15 photoelastic tensor component
      P16 = cos(Rx_Si)*(-(sin(Rx_Si)*sin(Ry_Si)*(p12*cos(Ry_Si)^2 + ((p11 + p12 + (p11 - p12)*cos(2*Rx_Si))*sin(Ry_Si)^2)/2.)) + 2*p44*sin(Ry_Si)*(-(cos(Ry_Si)*cos(Rz_Si)*sin(Rx_Si)) + cos(2*Rx_Si)*sin(Ry_Si)*sin(Rz_Si))*(cos(Ry_Si)*cos(Rz_Si) + sin(Rx_Si)*sin(Ry_Si)*sin(Rz_Si)) + 2*p44*sin(Ry_Si)*(cos(Rz_Si)*sin(Rx_Si)*sin(Ry_Si) - cos(Ry_Si)*sin(Rz_Si))*(cos(Rx_Si)^2*cos(Rz_Si)*sin(Ry_Si) + sin(Rx_Si)*(-(cos(Rz_Si)*sin(Rx_Si)*sin(Ry_Si)) + cos(Ry_Si)*sin(Rz_Si))) + sin(Rz_Si)*(cos(Ry_Si)*cos(Rz_Si) + sin(Rx_Si)*sin(Ry_Si)*sin(Rz_Si))*(p12*cos(Rx_Si)^2*sin(Ry_Si)^2 + p12*(cos(Rz_Si)*sin(Rx_Si)*sin(Ry_Si) - cos(Ry_Si)*sin(Rz_Si))^2 + p11*(cos(Ry_Si)*cos(Rz_Si) + sin(Rx_Si)*sin(Ry_Si)*sin(Rz_Si))^2) + cos(Rz_Si)*(cos(Rz_Si)*sin(Rx_Si)*sin(Ry_Si) - cos(Ry_Si)*sin(Rz_Si))*(p12*cos(Rx_Si)^2*sin(Ry_Si)^2 + p11*(cos(Rz_Si)*sin(Rx_Si)*sin(Ry_Si) - cos(Ry_Si)*sin(Rz_Si))^2 + p12*(cos(Ry_Si)*cos(Rz_Si) + sin(Rx_Si)*sin(Ry_Si)*sin(Rz_Si))^2) + 2*p44*(cos(Rz_Si)*sin(Rx_Si)*sin(Ry_Si) - cos(Ry_Si)*sin(Rz_Si))*(cos(Ry_Si)*cos(Rz_Si) + sin(Rx_Si)*sin(Ry_Si)*sin(Rz_Si))*(cos(Ry_Si)*cos(2*Rz_Si) + sin(Rx_Si)*sin(Ry_Si)*sin(2*Rz_Si)))
      DESCR_PREFIX:P16 = rotated p16 photoelastic tensor component
      P21 = (cos(Rx_Si)^2*(p11 + p12 + (-p11 + p12)*cos(2*Rx_Si))*sin(Ry_Si)^2)/2. - 4*p44*cos(Rx_Si)^2*cos(Rz_Si)*sin(Rx_Si)*sin(Ry_Si)*(cos(Rz_Si)*sin(Rx_Si)*sin(Ry_Si) - cos(Ry_Si)*sin(Rz_Si)) - 4*p44*cos(Rx_Si)^2*sin(Rx_Si)*sin(Ry_Si)*sin(Rz_Si)*(cos(Ry_Si)*cos(Rz_Si) + sin(Rx_Si)*sin(Ry_Si)*sin(Rz_Si)) + 4*p44*cos(Rx_Si)^2*cos(Rz_Si)*sin(Rz_Si)*(cos(Rz_Si)*sin(Rx_Si)*sin(Ry_Si) - cos(Ry_Si)*sin(Rz_Si))*(cos(Ry_Si)*cos(Rz_Si) + sin(Rx_Si)*sin(Ry_Si)*sin(Rz_Si)) + (cos(Ry_Si)*cos(Rz_Si) + sin(Rx_Si)*sin(Ry_Si)*sin(Rz_Si))^2*(p12*sin(Rx_Si)^2 + cos(Rx_Si)^2*(p12*cos(Rz_Si)^2 + p11*sin(Rz_Si)^2)) + (cos(Rz_Si)*sin(Rx_Si)*sin(Ry_Si) - cos(Ry_Si)*sin(Rz_Si))^2*(p12*sin(Rx_Si)^2 + cos(Rx_Si)^2*(p11*cos(Rz_Si)^2 + p12*sin(Rz_Si)^2))
      DESCR_PREFIX:P21 = rotated p21 photoelastic tensor component
      P22 = (cos(Rx_Si)^4*(3*p11 + p12 + 2*p44 + (p11 - p12 - 2*p44)*cos(4*Rz_Si)))/4. + 2*cos(Rx_Si)^2*(p12 + p44 + p44*cos(2*Rz_Si))*sin(Rx_Si)^2 + p11*sin(Rx_Si)^4 + p44*sin(2*Rx_Si)^2*sin(Rz_Si)^2
      DESCR_PREFIX:P22 = rotated p22 photoelastic tensor component
      P23 = (cos(Rx_Si)^2*(p11 + p12 + (-p11 + p12)*cos(2*Rx_Si))*cos(Ry_Si)^2)/2. - 4*p44*cos(Rx_Si)^2*cos(Ry_Si)*sin(Rx_Si)*sin(Rz_Si)*(-(cos(Rz_Si)*sin(Ry_Si)) + cos(Ry_Si)*sin(Rx_Si)*sin(Rz_Si)) - 4*p44*cos(Rx_Si)^2*cos(Ry_Si)*cos(Rz_Si)*sin(Rx_Si)*(cos(Ry_Si)*cos(Rz_Si)*sin(Rx_Si) + sin(Ry_Si)*sin(Rz_Si)) + 4*p44*cos(Rx_Si)^2*cos(Rz_Si)*sin(Rz_Si)*(-(cos(Rz_Si)*sin(Ry_Si)) + cos(Ry_Si)*sin(Rx_Si)*sin(Rz_Si))*(cos(Ry_Si)*cos(Rz_Si)*sin(Rx_Si) + sin(Ry_Si)*sin(Rz_Si)) + (cos(Rz_Si)*sin(Ry_Si) - cos(Ry_Si)*sin(Rx_Si)*sin(Rz_Si))^2*(p12*sin(Rx_Si)^2 + cos(Rx_Si)^2*(p12*cos(Rz_Si)^2 + p11*sin(Rz_Si)^2)) + (cos(Ry_Si)*cos(Rz_Si)*sin(Rx_Si) + sin(Ry_Si)*sin(Rz_Si))^2*(p12*sin(Rx_Si)^2 + cos(Rx_Si)^2*(p11*cos(Rz_Si)^2 + p12*sin(Rz_Si)^2))
      DESCR_PREFIX:P23 = rotated p23 photoelastic tensor component
      P24 = ((p11 - p12 - 2*p44)*cos(Rx_Si)*(-2*cos(2*Rx_Si - Ry_Si - 4*Rz_Si) + 4*cos(Ry_Si - 4*Rz_Si) + 2*cos(2*Rx_Si + Ry_Si - 4*Rz_Si) + 2*cos(2*Rx_Si - Ry_Si + 4*Rz_Si) - 4*cos(Ry_Si + 4*Rz_Si) - 2*cos(2*Rx_Si + Ry_Si + 4*Rz_Si) - 18*sin(Rx_Si - Ry_Si) + 14*sin(3*Rx_Si - Ry_Si) - 18*sin(Rx_Si + Ry_Si) + 14*sin(3*Rx_Si + Ry_Si) + sin(Rx_Si - Ry_Si - 4*Rz_Si) + sin(3*Rx_Si - Ry_Si - 4*Rz_Si) + sin(Rx_Si + Ry_Si - 4*Rz_Si) + sin(3*Rx_Si + Ry_Si - 4*Rz_Si) + sin(Rx_Si - Ry_Si + 4*Rz_Si) + sin(3*Rx_Si - Ry_Si + 4*Rz_Si) + sin(Rx_Si + Ry_Si + 4*Rz_Si) + sin(3*Rx_Si + Ry_Si + 4*Rz_Si)))/64.
      DESCR_PREFIX:P24 = rotated p24 photoelastic tensor component
      P25 = -0.015625*((p11 - p12 - 2*p44)*cos(Rx_Si)^2*(4*cos(Rx_Si - 2*Ry_Si - 4*Rz_Si) + 4*cos(Rx_Si + 2*Ry_Si - 4*Rz_Si) - 4*cos(Rx_Si - 2*Ry_Si + 4*Rz_Si) - 4*cos(Rx_Si + 2*Ry_Si + 4*Rz_Si) - 14*sin(2*(Rx_Si - Ry_Si)) - 20*sin(2*Ry_Si) + 14*sin(2*(Rx_Si + Ry_Si)) - sin(2*(Rx_Si - Ry_Si - 2*Rz_Si)) - 6*sin(2*(Ry_Si - 2*Rz_Si)) + sin(2*(Rx_Si + Ry_Si - 2*Rz_Si)) - sin(2*(Rx_Si - Ry_Si + 2*Rz_Si)) - 6*sin(2*(Ry_Si + 2*Rz_Si)) + sin(2*(Rx_Si + Ry_Si + 2*Rz_Si))))
      DESCR_PREFIX:P25 = rotated p25 photoelastic tensor component
      P26 = ((-p11 + p12 + 2*p44)*cos(Rx_Si)*(18*cos(Rx_Si - Ry_Si) - 14*cos(3*Rx_Si - Ry_Si) - 18*cos(Rx_Si + Ry_Si) + 14*cos(3*Rx_Si + Ry_Si) - cos(Rx_Si - Ry_Si - 4*Rz_Si) - cos(3*Rx_Si - Ry_Si - 4*Rz_Si) + cos(Rx_Si + Ry_Si - 4*Rz_Si) + cos(3*Rx_Si + Ry_Si - 4*Rz_Si) - cos(Rx_Si - Ry_Si + 4*Rz_Si) - cos(3*Rx_Si - Ry_Si + 4*Rz_Si) + cos(Rx_Si + Ry_Si + 4*Rz_Si) + cos(3*Rx_Si + Ry_Si + 4*Rz_Si) - 2*sin(2*Rx_Si - Ry_Si - 4*Rz_Si) - 4*sin(Ry_Si - 4*Rz_Si) - 2*sin(2*Rx_Si + Ry_Si - 4*Rz_Si) + 2*sin(2*Rx_Si - Ry_Si + 4*Rz_Si) + 4*sin(Ry_Si + 4*Rz_Si) + 2*sin(2*Rx_Si + Ry_Si + 4*Rz_Si)))/64.
      DESCR_PREFIX:P26 = rotated p26 photoelastic tensor component
      P31 = cos(Rx_Si)^2*(p11*cos(Rx_Si)^2*cos(Ry_Si)^2 - (p12*(-6 + 2*cos(2*Rx_Si) + cos(2*(Rx_Si - Ry_Si)) + 2*cos(2*Ry_Si) + cos(2*(Rx_Si + Ry_Si))))/8.)*sin(Ry_Si)^2 + 4*p44*cos(Rx_Si)^2*cos(Ry_Si)*sin(Ry_Si)*(cos(Rz_Si)*sin(Rx_Si)*sin(Ry_Si) - cos(Ry_Si)*sin(Rz_Si))*(cos(Ry_Si)*cos(Rz_Si)*sin(Rx_Si) + sin(Ry_Si)*sin(Rz_Si)) + 4*p44*cos(Rx_Si)^2*cos(Ry_Si)*sin(Ry_Si)*(-(cos(Rz_Si)*sin(Ry_Si)) + cos(Ry_Si)*sin(Rx_Si)*sin(Rz_Si))*(cos(Ry_Si)*cos(Rz_Si) + sin(Rx_Si)*sin(Ry_Si)*sin(Rz_Si)) + 4*p44*(cos(Rz_Si)*sin(Rx_Si)*sin(Ry_Si) - cos(Ry_Si)*sin(Rz_Si))*(-(cos(Rz_Si)*sin(Ry_Si)) + cos(Ry_Si)*sin(Rx_Si)*sin(Rz_Si))*(cos(Ry_Si)*cos(Rz_Si)*sin(Rx_Si) + sin(Ry_Si)*sin(Rz_Si))*(cos(Ry_Si)*cos(Rz_Si) + sin(Rx_Si)*sin(Ry_Si)*sin(Rz_Si)) + (cos(Rz_Si)*sin(Rx_Si)*sin(Ry_Si) - cos(Ry_Si)*sin(Rz_Si))^2*(p12*cos(Rx_Si)^2*cos(Ry_Si)^2 + p12*(cos(Rz_Si)*sin(Ry_Si) - cos(Ry_Si)*sin(Rx_Si)*sin(Rz_Si))^2 + p11*(cos(Ry_Si)*cos(Rz_Si)*sin(Rx_Si) + sin(Ry_Si)*sin(Rz_Si))^2) + (cos(Ry_Si)*cos(Rz_Si) + sin(Rx_Si)*sin(Ry_Si)*sin(Rz_Si))^2*(p12*cos(Rx_Si)^2*cos(Ry_Si)^2 + p11*(cos(Rz_Si)*sin(Ry_Si) - cos(Ry_Si)*sin(Rx_Si)*sin(Rz_Si))^2 + p12*(cos(Ry_Si)*cos(Rz_Si)*sin(Rx_Si) + sin(Ry_Si)*sin(Rz_Si))^2)
      DESCR_PREFIX:P31 = rotated p31 photoelastic tensor component
      P32 = p12*cos(Rx_Si)^4*cos(Ry_Si)^2 - (p12*(-6 + 2*cos(2*Rx_Si) + cos(2*(Rx_Si - Ry_Si)) + 2*cos(2*Ry_Si) + cos(2*(Rx_Si + Ry_Si)))*sin(Rx_Si)^2)/8. + (cos(Rx_Si)^2*(cos(Ry_Si)^2*(7*p11 + p12 - 14*p44 + (p11 - p12 - 2*p44)*cos(4*Rz_Si))*sin(Rx_Si)^2 + 4*p12*cos(Rz_Si)^4*sin(Ry_Si)^2 + 4*p11*cos(Rz_Si)^3*sin(Rx_Si)*sin(2*Ry_Si)*sin(Rz_Si) + 4*p12*cos(Rz_Si)*sin(Rx_Si)*sin(2*Ry_Si)*sin(Rz_Si)^3 - (p11 + p12)*sin(Rx_Si)*sin(2*Ry_Si)*sin(2*Rz_Si) + 2*sin(Ry_Si)^2*(2*p12*sin(Rz_Si)^4 + (p11 - 2*p44)*sin(2*Rz_Si)^2) + ((p11 - p12 - 4*p44)*sin(Rx_Si)*sin(2*Ry_Si)*sin(4*Rz_Si))/2.))/4.
      DESCR_PREFIX:P32 = rotated p32 photoelastic tensor component
      P33 = p11*cos(Rx_Si)^4*cos(Ry_Si)^4 - (p12*cos(Rx_Si)^2*cos(Ry_Si)^2*(-6 + 2*cos(2*Rx_Si) + cos(2*(Rx_Si - Ry_Si)) + 2*cos(2*Ry_Si) + cos(2*(Rx_Si + Ry_Si))))/8. + 4*p44*cos(Rx_Si)^2*cos(Ry_Si)^2*(cos(Rz_Si)*sin(Ry_Si) - cos(Ry_Si)*sin(Rx_Si)*sin(Rz_Si))^2 + 4*p44*cos(Rx_Si)^2*cos(Ry_Si)^2*(cos(Ry_Si)*cos(Rz_Si)*sin(Rx_Si) + sin(Ry_Si)*sin(Rz_Si))^2 + 4*p44*(cos(Rz_Si)*sin(Ry_Si) - cos(Ry_Si)*sin(Rx_Si)*sin(Rz_Si))^2*(cos(Ry_Si)*cos(Rz_Si)*sin(Rx_Si) + sin(Ry_Si)*sin(Rz_Si))^2 + (cos(Ry_Si)*cos(Rz_Si)*sin(Rx_Si) + sin(Ry_Si)*sin(Rz_Si))^2*(p12*cos(Rx_Si)^2*cos(Ry_Si)^2 + p12*(cos(Rz_Si)*sin(Ry_Si) - cos(Ry_Si)*sin(Rx_Si)*sin(Rz_Si))^2 + p11*(cos(Ry_Si)*cos(Rz_Si)*sin(Rx_Si) + sin(Ry_Si)*sin(Rz_Si))^2) + (cos(Rz_Si)*sin(Ry_Si) - cos(Ry_Si)*sin(Rx_Si)*sin(Rz_Si))^2*(p12*cos(Rx_Si)^2*cos(Ry_Si)^2 + p11*(cos(Rz_Si)*sin(Ry_Si) - cos(Ry_Si)*sin(Rx_Si)*sin(Rz_Si))^2 + p12*(cos(Ry_Si)*cos(Rz_Si)*sin(Rx_Si) + sin(Ry_Si)*sin(Rz_Si))^2)
      DESCR_PREFIX:P33 = rotated p33 photoelastic tensor component
      P34 = cos(Rx_Si)*((cos(Ry_Si)*(6*p11 - 10*p12 - 12*p44 + 4*p12*cos(2*Rx_Si) + 2*p12*cos(2*(Rx_Si - Ry_Si)) - 6*p11*cos(2*Ry_Si) + 2*p12*cos(2*Ry_Si) + 12*p44*cos(2*Ry_Si) + 2*p12*cos(2*(Rx_Si + Ry_Si)) + 3*p11*cos(2*(Ry_Si - 2*Rz_Si)) - 3*p12*cos(2*(Ry_Si - 2*Rz_Si)) - 6*p44*cos(2*(Ry_Si - 2*Rz_Si)) - 6*p11*cos(4*Rz_Si) + 6*p12*cos(4*Rz_Si) + 12*p44*cos(4*Rz_Si) + 3*p11*cos(2*(Ry_Si + 2*Rz_Si)) - 3*p12*cos(2*(Ry_Si + 2*Rz_Si)) - 6*p44*cos(2*(Ry_Si + 2*Rz_Si)))*sin(Rx_Si))/16. + cos(Ry_Si)^3*sin(Rx_Si)*(cos(Rx_Si)^2*(-p11 + p12 + p44 + p44*cos(2*Rz_Si)) + p11*cos(Rz_Si)^4*sin(Rx_Si)^2 - cos(Rz_Si)^2*(-p12 + 2*p44 + p12*cos(2*Rz_Si))*sin(Rx_Si)^2 + 2*p44*cos(2*Rx_Si)*sin(Rz_Si)^2 + p11*sin(Rx_Si)^2*sin(Rz_Si)^4 + p44*sin(Rx_Si)^2*sin(2*Rz_Si)^2) + (3*(p11 - p12 - 2*p44)*cos(Ry_Si)^2*sin(Rx_Si)^2*sin(Ry_Si)*sin(4*Rz_Si))/4. - ((p11 - p12 - 2*p44)*sin(Ry_Si)^3*sin(4*Rz_Si))/4.)
      DESCR_PREFIX:P34 = rotated p34 photoelastic tensor component
      P35 = cos(Rx_Si)^2*cos(Ry_Si)*(p11*cos(Rx_Si)^2*cos(Ry_Si)^2 - (p12*(-6 + 2*cos(2*Rx_Si) + cos(2*(Rx_Si - Ry_Si)) + 2*cos(2*Ry_Si) + cos(2*(Rx_Si + Ry_Si))))/8.)*sin(Ry_Si) - 2*p44*cos(Rx_Si)^2*cos(Ry_Si)*(cos(Ry_Si)*cos(Rz_Si)*sin(Rx_Si) + sin(Ry_Si)*sin(Rz_Si))*(-2*cos(Ry_Si)*cos(Rz_Si)*sin(Rx_Si)*sin(Ry_Si) + cos(Ry_Si)^2*sin(Rz_Si) - sin(Ry_Si)^2*sin(Rz_Si)) + 2*p44*cos(Rx_Si)^2*cos(Ry_Si)*(-(cos(Rz_Si)*sin(Ry_Si)) + cos(Ry_Si)*sin(Rx_Si)*sin(Rz_Si))*(cos(Ry_Si)^2*cos(Rz_Si) - cos(Rz_Si)*sin(Ry_Si)^2 + sin(Rx_Si)*sin(2*Ry_Si)*sin(Rz_Si)) + (cos(Rz_Si)*sin(Rx_Si)*sin(Ry_Si) - cos(Ry_Si)*sin(Rz_Si))*(cos(Ry_Si)*cos(Rz_Si)*sin(Rx_Si) + sin(Ry_Si)*sin(Rz_Si))*(p12*cos(Rx_Si)^2*cos(Ry_Si)^2 + p12*(cos(Rz_Si)*sin(Ry_Si) - cos(Ry_Si)*sin(Rx_Si)*sin(Rz_Si))^2 + p11*(cos(Ry_Si)*cos(Rz_Si)*sin(Rx_Si) + sin(Ry_Si)*sin(Rz_Si))^2) + (-(cos(Rz_Si)*sin(Ry_Si)) + cos(Ry_Si)*sin(Rx_Si)*sin(Rz_Si))*(cos(Ry_Si)*cos(Rz_Si) + sin(Rx_Si)*sin(Ry_Si)*sin(Rz_Si))*(p12*cos(Rx_Si)^2*cos(Ry_Si)^2 + p11*(cos(Rz_Si)*sin(Ry_Si) - cos(Ry_Si)*sin(Rx_Si)*sin(Rz_Si))^2 + p12*(cos(Ry_Si)*cos(Rz_Si)*sin(Rx_Si) + sin(Ry_Si)*sin(Rz_Si))^2) + 2*p44*(-(cos(Rz_Si)*sin(Ry_Si)) + cos(Ry_Si)*sin(Rx_Si)*sin(Rz_Si))*(cos(Ry_Si)*cos(Rz_Si)*sin(Rx_Si) + sin(Ry_Si)*sin(Rz_Si))*(cos(Ry_Si)^2*cos(2*Rz_Si)*sin(Rx_Si) - cos(2*Rz_Si)*sin(Rx_Si)*sin(Ry_Si)^2 - ((-3 + cos(2*Rx_Si))*sin(2*Ry_Si)*sin(2*Rz_Si))/4.)
      DESCR_PREFIX:P35 = rotated p35 photoelastic tensor component
      P36 = cos(Rx_Si)*(-((p11*cos(Rx_Si)^2*cos(Ry_Si)^2 - (p12*(-6 + 2*cos(2*Rx_Si) + cos(2*(Rx_Si - Ry_Si)) + 2*cos(2*Ry_Si) + cos(2*(Rx_Si + Ry_Si))))/8.)*sin(Rx_Si)*sin(Ry_Si)) + 2*p44*cos(Ry_Si)*(-(cos(Rz_Si)*sin(Ry_Si)) + cos(Ry_Si)*sin(Rx_Si)*sin(Rz_Si))*(-(cos(Ry_Si)*cos(Rz_Si)*sin(Rx_Si)) + cos(2*Rx_Si)*sin(Ry_Si)*sin(Rz_Si)) + 2*p44*cos(Ry_Si)*(cos(Ry_Si)*cos(Rz_Si)*sin(Rx_Si) + sin(Ry_Si)*sin(Rz_Si))*(cos(Rx_Si)^2*cos(Rz_Si)*sin(Ry_Si) + sin(Rx_Si)*(-(cos(Rz_Si)*sin(Rx_Si)*sin(Ry_Si)) + cos(Ry_Si)*sin(Rz_Si))) + cos(Rz_Si)*(cos(Rz_Si)*sin(Rx_Si)*sin(Ry_Si) - cos(Ry_Si)*sin(Rz_Si))*(p12*cos(Rx_Si)^2*cos(Ry_Si)^2 + p12*(cos(Rz_Si)*sin(Ry_Si) - cos(Ry_Si)*sin(Rx_Si)*sin(Rz_Si))^2 + p11*(cos(Ry_Si)*cos(Rz_Si)*sin(Rx_Si) + sin(Ry_Si)*sin(Rz_Si))^2) + sin(Rz_Si)*(cos(Ry_Si)*cos(Rz_Si) + sin(Rx_Si)*sin(Ry_Si)*sin(Rz_Si))*(p12*cos(Rx_Si)^2*cos(Ry_Si)^2 + p11*(cos(Rz_Si)*sin(Ry_Si) - cos(Ry_Si)*sin(Rx_Si)*sin(Rz_Si))^2 + p12*(cos(Ry_Si)*cos(Rz_Si)*sin(Rx_Si) + sin(Ry_Si)*sin(Rz_Si))^2) - 2*p44*(cos(Rz_Si)*sin(Ry_Si) - cos(Ry_Si)*sin(Rx_Si)*sin(Rz_Si))*(cos(Ry_Si)*cos(Rz_Si)*sin(Rx_Si) + sin(Ry_Si)*sin(Rz_Si))*(cos(Ry_Si)*cos(2*Rz_Si) + sin(Rx_Si)*sin(Ry_Si)*sin(2*Rz_Si)))
      DESCR_PREFIX:P36 = rotated p36 photoelastic tensor component
      P41 = cos(Rx_Si)*((-p11 + p12)*cos(Rx_Si)^2*cos(Ry_Si)*sin(Rx_Si)*sin(Ry_Si)^2 + (p11 - p12)*cos(Rz_Si)*(cos(Rz_Si)*sin(Rx_Si)*sin(Ry_Si) - cos(Ry_Si)*sin(Rz_Si))^2*(cos(Ry_Si)*cos(Rz_Si)*sin(Rx_Si) + sin(Ry_Si)*sin(Rz_Si)) + 2*p44*sin(Ry_Si)*(cos(Rz_Si)*sin(Rx_Si)*sin(Ry_Si) + cos(2*Rx_Si)*cos(Ry_Si)*sin(Rz_Si))*(cos(Ry_Si)*cos(Rz_Si) + sin(Rx_Si)*sin(Ry_Si)*sin(Rz_Si)) + (p11 - p12)*sin(Rz_Si)*(-(cos(Rz_Si)*sin(Ry_Si)) + cos(Ry_Si)*sin(Rx_Si)*sin(Rz_Si))*(cos(Ry_Si)*cos(Rz_Si) + sin(Rx_Si)*sin(Ry_Si)*sin(Rz_Si))^2 - 2*p44*(cos(Rz_Si)*sin(Rx_Si)*sin(Ry_Si) - cos(Ry_Si)*sin(Rz_Si))*(cos(Ry_Si)*cos(Rz_Si) + sin(Rx_Si)*sin(Ry_Si)*sin(Rz_Si))*(cos(Rz_Si)^2*sin(Ry_Si) - 2*cos(Ry_Si)*cos(Rz_Si)*sin(Rx_Si)*sin(Rz_Si) - sin(Ry_Si)*sin(Rz_Si)^2) + 2*p44*sin(Ry_Si)*(cos(Rz_Si)*sin(Rx_Si)*sin(Ry_Si) - cos(Ry_Si)*sin(Rz_Si))*(cos(Rx_Si)^2*cos(Ry_Si)*cos(Rz_Si) - sin(Rx_Si)*(cos(Ry_Si)*cos(Rz_Si)*sin(Rx_Si) + sin(Ry_Si)*sin(Rz_Si))))
      DESCR_PREFIX:P41 = rotated p41 photoelastic tensor component
      P42 = ((p11 - p12 - 2*p44)*cos(Rx_Si)*(-2*cos(2*Rx_Si - Ry_Si - 4*Rz_Si) + 4*cos(Ry_Si - 4*Rz_Si) + 2*cos(2*Rx_Si + Ry_Si - 4*Rz_Si) + 2*cos(2*Rx_Si - Ry_Si + 4*Rz_Si) - 4*cos(Ry_Si + 4*Rz_Si) - 2*cos(2*Rx_Si + Ry_Si + 4*Rz_Si) - 18*sin(Rx_Si - Ry_Si) + 14*sin(3*Rx_Si - Ry_Si) - 18*sin(Rx_Si + Ry_Si) + 14*sin(3*Rx_Si + Ry_Si) + sin(Rx_Si - Ry_Si - 4*Rz_Si) + sin(3*Rx_Si - Ry_Si - 4*Rz_Si) + sin(Rx_Si + Ry_Si - 4*Rz_Si) + sin(3*Rx_Si + Ry_Si - 4*Rz_Si) + sin(Rx_Si - Ry_Si + 4*Rz_Si) + sin(3*Rx_Si - Ry_Si + 4*Rz_Si) + sin(Rx_Si + Ry_Si + 4*Rz_Si) + sin(3*Rx_Si + Ry_Si + 4*Rz_Si)))/64.
      DESCR_PREFIX:P42 = rotated p42 photoelastic tensor component
      P43 = cos(Rx_Si)*((-p11 + p12)*cos(Rx_Si)^2*cos(Ry_Si)^3*sin(Rx_Si) + 2*p44*cos(Ry_Si)*(cos(Rz_Si)*sin(Rx_Si)*sin(Ry_Si) + cos(2*Rx_Si)*cos(Ry_Si)*sin(Rz_Si))*(-(cos(Rz_Si)*sin(Ry_Si)) + cos(Ry_Si)*sin(Rx_Si)*sin(Rz_Si)) + (p11 - p12)*sin(Rz_Si)*(-(cos(Rz_Si)*sin(Ry_Si)) + cos(Ry_Si)*sin(Rx_Si)*sin(Rz_Si))^3 + (p11 - p12)*cos(Rz_Si)*(cos(Ry_Si)*cos(Rz_Si)*sin(Rx_Si) + sin(Ry_Si)*sin(Rz_Si))^3 + 2*p44*(cos(Rz_Si)*sin(Ry_Si) - cos(Ry_Si)*sin(Rx_Si)*sin(Rz_Si))*(cos(Ry_Si)*cos(Rz_Si)*sin(Rx_Si) + sin(Ry_Si)*sin(Rz_Si))*(cos(Rz_Si)^2*sin(Ry_Si) - 2*cos(Ry_Si)*cos(Rz_Si)*sin(Rx_Si)*sin(Rz_Si) - sin(Ry_Si)*sin(Rz_Si)^2) + 2*p44*cos(Ry_Si)*(cos(Ry_Si)*cos(Rz_Si)*sin(Rx_Si) + sin(Ry_Si)*sin(Rz_Si))*(cos(Rx_Si)^2*cos(Ry_Si)*cos(Rz_Si) - sin(Rx_Si)*(cos(Ry_Si)*cos(Rz_Si)*sin(Rx_Si) + sin(Ry_Si)*sin(Rz_Si))))
      DESCR_PREFIX:P43 = rotated p43 photoelastic tensor component
      P44 = (p11 - p12)*cos(Rx_Si)^2*cos(Ry_Si)^2*sin(Rx_Si)^2 + p44*(cos(Rz_Si)*sin(Rx_Si)*sin(Ry_Si) + cos(2*Rx_Si)*cos(Ry_Si)*sin(Rz_Si))^2 + (p11 - p12)*cos(Rx_Si)^2*sin(Rz_Si)^2*(cos(Rz_Si)*sin(Ry_Si) - cos(Ry_Si)*sin(Rx_Si)*sin(Rz_Si))^2 + (p11 - p12)*cos(Rx_Si)^2*cos(Rz_Si)^2*(cos(Ry_Si)*cos(Rz_Si)*sin(Rx_Si) + sin(Ry_Si)*sin(Rz_Si))^2 + p44*(cos(Rx_Si)^2*cos(Ry_Si)*cos(Rz_Si) - sin(Rx_Si)*(cos(Ry_Si)*cos(Rz_Si)*sin(Rx_Si) + sin(Ry_Si)*sin(Rz_Si)))^2 + p44*cos(Rx_Si)^2*(-(cos(Rz_Si)^2*sin(Ry_Si)) + sin(Ry_Si)*sin(Rz_Si)^2 + cos(Ry_Si)*sin(Rx_Si)*sin(2*Rz_Si))^2
      DESCR_PREFIX:P44 = rotated p44 photoelastic tensor component
      P45 = ((p11 - p12 - 2*p44)*cos(Rx_Si)*(-14*cos(Rx_Si - 3*Ry_Si) + 18*cos(Rx_Si - Ry_Si) - 14*cos(3*(Rx_Si - Ry_Si)) - 14*cos(3*Rx_Si - Ry_Si) - 18*cos(Rx_Si + Ry_Si) + 14*cos(3*(Rx_Si + Ry_Si)) + 14*cos(3*Rx_Si + Ry_Si) + 14*cos(Rx_Si + 3*Ry_Si) + 15*cos(Rx_Si - 3*Ry_Si - 4*Rz_Si) - cos(3*Rx_Si - 3*Ry_Si - 4*Rz_Si) - cos(Rx_Si - Ry_Si - 4*Rz_Si) - cos(3*Rx_Si - Ry_Si - 4*Rz_Si) + cos(Rx_Si + Ry_Si - 4*Rz_Si) + cos(3*Rx_Si + Ry_Si - 4*Rz_Si) - 15*cos(Rx_Si + 3*Ry_Si - 4*Rz_Si) + cos(3*Rx_Si + 3*Ry_Si - 4*Rz_Si) + 15*cos(Rx_Si - 3*Ry_Si + 4*Rz_Si) - cos(3*Rx_Si - 3*Ry_Si + 4*Rz_Si) - cos(Rx_Si - Ry_Si + 4*Rz_Si) - cos(3*Rx_Si - Ry_Si + 4*Rz_Si) + cos(Rx_Si + Ry_Si + 4*Rz_Si) + cos(3*Rx_Si + Ry_Si + 4*Rz_Si) - 15*cos(Rx_Si + 3*Ry_Si + 4*Rz_Si) + cos(3*Rx_Si + 3*Ry_Si + 4*Rz_Si) - 6*sin(2*Rx_Si - 3*Ry_Si - 4*Rz_Si) - 2*sin(2*Rx_Si - Ry_Si - 4*Rz_Si) - 4*sin(Ry_Si - 4*Rz_Si) - 2*sin(2*Rx_Si + Ry_Si - 4*Rz_Si) + 20*sin(3*Ry_Si - 4*Rz_Si) - 6*sin(2*Rx_Si + 3*Ry_Si - 4*Rz_Si) + 6*sin(2*Rx_Si - 3*Ry_Si + 4*Rz_Si) + 2*sin(2*Rx_Si - Ry_Si + 4*Rz_Si) + 4*sin(Ry_Si + 4*Rz_Si) + 2*sin(2*Rx_Si + Ry_Si + 4*Rz_Si) - 20*sin(3*Ry_Si + 4*Rz_Si) + 6*sin(2*Rx_Si + 3*Ry_Si + 4*Rz_Si)))/256.
      DESCR_PREFIX:P45 = rotated p45 photoelastic tensor component
      P46 = -0.015625*((p11 - p12 - 2*p44)*cos(Rx_Si)^2*(4*cos(Rx_Si - 2*Ry_Si - 4*Rz_Si) + 4*cos(Rx_Si + 2*Ry_Si - 4*Rz_Si) - 4*cos(Rx_Si - 2*Ry_Si + 4*Rz_Si) - 4*cos(Rx_Si + 2*Ry_Si + 4*Rz_Si) - 14*sin(2*(Rx_Si - Ry_Si)) - 20*sin(2*Ry_Si) + 14*sin(2*(Rx_Si + Ry_Si)) - sin(2*(Rx_Si - Ry_Si - 2*Rz_Si)) - 6*sin(2*(Ry_Si - 2*Rz_Si)) + sin(2*(Rx_Si + Ry_Si - 2*Rz_Si)) - sin(2*(Rx_Si - Ry_Si + 2*Rz_Si)) - 6*sin(2*(Ry_Si + 2*Rz_Si)) + sin(2*(Rx_Si + Ry_Si + 2*Rz_Si))))
      DESCR_PREFIX:P46 = rotated p46 photoelastic tensor component
      P51 = (p11 - p12)*cos(Rx_Si)^4*cos(Ry_Si)*sin(Ry_Si)^3 + 2*p44*cos(Rx_Si)^2*sin(Ry_Si)*(cos(Rz_Si)*sin(Rx_Si)*sin(Ry_Si) - cos(Ry_Si)*sin(Rz_Si))*(cos(Rz_Si)*sin(Rx_Si)*sin(2*Ry_Si) - cos(2*Ry_Si)*sin(Rz_Si)) - 2*p44*cos(Rx_Si)^2*sin(Ry_Si)*(cos(Ry_Si)*cos(Rz_Si) + sin(Rx_Si)*sin(Ry_Si)*sin(Rz_Si))*(-(cos(Ry_Si)^2*cos(Rz_Si)) + cos(Rz_Si)*sin(Ry_Si)^2 - 2*cos(Ry_Si)*sin(Rx_Si)*sin(Ry_Si)*sin(Rz_Si)) + (cos(Ry_Si)*cos(Rz_Si) + sin(Rx_Si)*sin(Ry_Si)*sin(Rz_Si))^2*(p12*cos(Rx_Si)^2*cos(Ry_Si)*sin(Ry_Si) + p12*(cos(Rz_Si)*sin(Rx_Si)*sin(Ry_Si) - cos(Ry_Si)*sin(Rz_Si))*(cos(Ry_Si)*cos(Rz_Si)*sin(Rx_Si) + sin(Ry_Si)*sin(Rz_Si)) + p11*(-(cos(Rz_Si)*sin(Ry_Si)) + cos(Ry_Si)*sin(Rx_Si)*sin(Rz_Si))*(cos(Ry_Si)*cos(Rz_Si) + sin(Rx_Si)*sin(Ry_Si)*sin(Rz_Si))) + (cos(Rz_Si)*sin(Rx_Si)*sin(Ry_Si) - cos(Ry_Si)*sin(Rz_Si))^2*(p12*cos(Rx_Si)^2*cos(Ry_Si)*sin(Ry_Si) + p11*(cos(Rz_Si)*sin(Rx_Si)*sin(Ry_Si) - cos(Ry_Si)*sin(Rz_Si))*(cos(Ry_Si)*cos(Rz_Si)*sin(Rx_Si) + sin(Ry_Si)*sin(Rz_Si)) + p12*(-(cos(Rz_Si)*sin(Ry_Si)) + cos(Ry_Si)*sin(Rx_Si)*sin(Rz_Si))*(cos(Ry_Si)*cos(Rz_Si) + sin(Rx_Si)*sin(Ry_Si)*sin(Rz_Si))) + 2*p44*(cos(Rz_Si)*sin(Rx_Si)*sin(Ry_Si) - cos(Ry_Si)*sin(Rz_Si))*(cos(Ry_Si)*cos(Rz_Si) + sin(Rx_Si)*sin(Ry_Si)*sin(Rz_Si))*(cos(Ry_Si)^2*cos(2*Rz_Si)*sin(Rx_Si) - cos(2*Rz_Si)*sin(Rx_Si)*sin(Ry_Si)^2 - ((-3 + cos(2*Rx_Si))*sin(2*Ry_Si)*sin(2*Rz_Si))/4.)
      DESCR_PREFIX:P51 = rotated p51 photoelastic tensor component
      P52 = -0.015625*((p11 - p12 - 2*p44)*cos(Rx_Si)^2*(4*cos(Rx_Si - 2*Ry_Si - 4*Rz_Si) + 4*cos(Rx_Si + 2*Ry_Si - 4*Rz_Si) - 4*cos(Rx_Si - 2*Ry_Si + 4*Rz_Si) - 4*cos(Rx_Si + 2*Ry_Si + 4*Rz_Si) - 14*sin(2*(Rx_Si - Ry_Si)) - 20*sin(2*Ry_Si) + 14*sin(2*(Rx_Si + Ry_Si)) - sin(2*(Rx_Si - Ry_Si - 2*Rz_Si)) - 6*sin(2*(Ry_Si - 2*Rz_Si)) + sin(2*(Rx_Si + Ry_Si - 2*Rz_Si)) - sin(2*(Rx_Si - Ry_Si + 2*Rz_Si)) - 6*sin(2*(Ry_Si + 2*Rz_Si)) + sin(2*(Rx_Si + Ry_Si + 2*Rz_Si))))
      DESCR_PREFIX:P52 = rotated p52 photoelastic tensor component
      P53 = (p11 - p12)*cos(Rx_Si)^4*cos(Ry_Si)^3*sin(Ry_Si) - 2*p44*cos(Rx_Si)^2*cos(Ry_Si)*(cos(Ry_Si)*cos(Rz_Si)*sin(Rx_Si) + sin(Ry_Si)*sin(Rz_Si))*(-2*cos(Ry_Si)*cos(Rz_Si)*sin(Rx_Si)*sin(Ry_Si) + cos(Ry_Si)^2*sin(Rz_Si) - sin(Ry_Si)^2*sin(Rz_Si)) + 2*p44*cos(Rx_Si)^2*cos(Ry_Si)*(-(cos(Rz_Si)*sin(Ry_Si)) + cos(Ry_Si)*sin(Rx_Si)*sin(Rz_Si))*(cos(Ry_Si)^2*cos(Rz_Si) - cos(Rz_Si)*sin(Ry_Si)^2 + sin(Rx_Si)*sin(2*Ry_Si)*sin(Rz_Si)) + (cos(Rz_Si)*sin(Ry_Si) - cos(Ry_Si)*sin(Rx_Si)*sin(Rz_Si))^2*(p12*cos(Rx_Si)^2*cos(Ry_Si)*sin(Ry_Si) + p12*(cos(Rz_Si)*sin(Rx_Si)*sin(Ry_Si) - cos(Ry_Si)*sin(Rz_Si))*(cos(Ry_Si)*cos(Rz_Si)*sin(Rx_Si) + sin(Ry_Si)*sin(Rz_Si)) + p11*(-(cos(Rz_Si)*sin(Ry_Si)) + cos(Ry_Si)*sin(Rx_Si)*sin(Rz_Si))*(cos(Ry_Si)*cos(Rz_Si) + sin(Rx_Si)*sin(Ry_Si)*sin(Rz_Si))) + (cos(Ry_Si)*cos(Rz_Si)*sin(Rx_Si) + sin(Ry_Si)*sin(Rz_Si))^2*(p12*cos(Rx_Si)^2*cos(Ry_Si)*sin(Ry_Si) + p11*(cos(Rz_Si)*sin(Rx_Si)*sin(Ry_Si) - cos(Ry_Si)*sin(Rz_Si))*(cos(Ry_Si)*cos(Rz_Si)*sin(Rx_Si) + sin(Ry_Si)*sin(Rz_Si)) + p12*(-(cos(Rz_Si)*sin(Ry_Si)) + cos(Ry_Si)*sin(Rx_Si)*sin(Rz_Si))*(cos(Ry_Si)*cos(Rz_Si) + sin(Rx_Si)*sin(Ry_Si)*sin(Rz_Si))) + 2*p44*(-(cos(Rz_Si)*sin(Ry_Si)) + cos(Ry_Si)*sin(Rx_Si)*sin(Rz_Si))*(cos(Ry_Si)*cos(Rz_Si)*sin(Rx_Si) + sin(Ry_Si)*sin(Rz_Si))*(cos(Ry_Si)^2*cos(2*Rz_Si)*sin(Rx_Si) - cos(2*Rz_Si)*sin(Rx_Si)*sin(Ry_Si)^2 - ((-3 + cos(2*Rx_Si))*sin(2*Ry_Si)*sin(2*Rz_Si))/4.)
      DESCR_PREFIX:P53 = rotated p53 photoelastic tensor component
      P54 = ((p11 - p12 - 2*p44)*cos(Rx_Si)*(-14*cos(Rx_Si - 3*Ry_Si) + 18*cos(Rx_Si - Ry_Si) - 14*cos(3*(Rx_Si - Ry_Si)) - 14*cos(3*Rx_Si - Ry_Si) - 18*cos(Rx_Si + Ry_Si) + 14*cos(3*(Rx_Si + Ry_Si)) + 14*cos(3*Rx_Si + Ry_Si) + 14*cos(Rx_Si + 3*Ry_Si) + 15*cos(Rx_Si - 3*Ry_Si - 4*Rz_Si) - cos(3*Rx_Si - 3*Ry_Si - 4*Rz_Si) - cos(Rx_Si - Ry_Si - 4*Rz_Si) - cos(3*Rx_Si - Ry_Si - 4*Rz_Si) + cos(Rx_Si + Ry_Si - 4*Rz_Si) + cos(3*Rx_Si + Ry_Si - 4*Rz_Si) - 15*cos(Rx_Si + 3*Ry_Si - 4*Rz_Si) + cos(3*Rx_Si + 3*Ry_Si - 4*Rz_Si) + 15*cos(Rx_Si - 3*Ry_Si + 4*Rz_Si) - cos(3*Rx_Si - 3*Ry_Si + 4*Rz_Si) - cos(Rx_Si - Ry_Si + 4*Rz_Si) - cos(3*Rx_Si - Ry_Si + 4*Rz_Si) + cos(Rx_Si + Ry_Si + 4*Rz_Si) + cos(3*Rx_Si + Ry_Si + 4*Rz_Si) - 15*cos(Rx_Si + 3*Ry_Si + 4*Rz_Si) + cos(3*Rx_Si + 3*Ry_Si + 4*Rz_Si) - 6*sin(2*Rx_Si - 3*Ry_Si - 4*Rz_Si) - 2*sin(2*Rx_Si - Ry_Si - 4*Rz_Si) - 4*sin(Ry_Si - 4*Rz_Si) - 2*sin(2*Rx_Si + Ry_Si - 4*Rz_Si) + 20*sin(3*Ry_Si - 4*Rz_Si) - 6*sin(2*Rx_Si + 3*Ry_Si - 4*Rz_Si) + 6*sin(2*Rx_Si - 3*Ry_Si + 4*Rz_Si) + 2*sin(2*Rx_Si - Ry_Si + 4*Rz_Si) + 4*sin(Ry_Si + 4*Rz_Si) + 2*sin(2*Rx_Si + Ry_Si + 4*Rz_Si) - 20*sin(3*Ry_Si + 4*Rz_Si) + 6*sin(2*Rx_Si + 3*Ry_Si + 4*Rz_Si)))/256.
      DESCR_PREFIX:P54 = rotated p54 photoelastic tensor component
      P55 = (p11 - p12)*cos(Rx_Si)^4*cos(Ry_Si)^2*sin(Ry_Si)^2 + p44*cos(Rx_Si)^2*(cos(Rz_Si)*sin(Rx_Si)*sin(2*Ry_Si) - cos(2*Ry_Si)*sin(Rz_Si))^2 + p44*cos(Rx_Si)^2*(cos(Ry_Si)^2*cos(Rz_Si) - cos(Rz_Si)*sin(Ry_Si)^2 + sin(Rx_Si)*sin(2*Ry_Si)*sin(Rz_Si))^2 + (-(cos(Rz_Si)*sin(Ry_Si)) + cos(Ry_Si)*sin(Rx_Si)*sin(Rz_Si))*(cos(Ry_Si)*cos(Rz_Si) + sin(Rx_Si)*sin(Ry_Si)*sin(Rz_Si))*(p12*cos(Rx_Si)^2*cos(Ry_Si)*sin(Ry_Si) + p12*(cos(Rz_Si)*sin(Rx_Si)*sin(Ry_Si) - cos(Ry_Si)*sin(Rz_Si))*(cos(Ry_Si)*cos(Rz_Si)*sin(Rx_Si) + sin(Ry_Si)*sin(Rz_Si)) + p11*(-(cos(Rz_Si)*sin(Ry_Si)) + cos(Ry_Si)*sin(Rx_Si)*sin(Rz_Si))*(cos(Ry_Si)*cos(Rz_Si) + sin(Rx_Si)*sin(Ry_Si)*sin(Rz_Si))) + (cos(Rz_Si)*sin(Rx_Si)*sin(Ry_Si) - cos(Ry_Si)*sin(Rz_Si))*(cos(Ry_Si)*cos(Rz_Si)*sin(Rx_Si) + sin(Ry_Si)*sin(Rz_Si))*(p12*cos(Rx_Si)^2*cos(Ry_Si)*sin(Ry_Si) + p11*(cos(Rz_Si)*sin(Rx_Si)*sin(Ry_Si) - cos(Ry_Si)*sin(Rz_Si))*(cos(Ry_Si)*cos(Rz_Si)*sin(Rx_Si) + sin(Ry_Si)*sin(Rz_Si)) + p12*(-(cos(Rz_Si)*sin(Ry_Si)) + cos(Ry_Si)*sin(Rx_Si)*sin(Rz_Si))*(cos(Ry_Si)*cos(Rz_Si) + sin(Rx_Si)*sin(Ry_Si)*sin(Rz_Si))) + p44*(-(cos(Ry_Si)^2*cos(2*Rz_Si)*sin(Rx_Si)) + cos(2*Rz_Si)*sin(Rx_Si)*sin(Ry_Si)^2 + ((-3 + cos(2*Rx_Si))*sin(2*Ry_Si)*sin(2*Rz_Si))/4.)^2
      DESCR_PREFIX:P55 = rotated p55 photoelastic tensor component
      P56 = -0.00390625*((p11 - p12 - 2*p44)*cos(Rx_Si)*(6*cos(2*Rx_Si - 3*Ry_Si - 4*Rz_Si) - 2*cos(2*Rx_Si - Ry_Si - 4*Rz_Si) + 4*cos(Ry_Si - 4*Rz_Si) + 2*cos(2*Rx_Si + Ry_Si - 4*Rz_Si) + 20*cos(3*Ry_Si - 4*Rz_Si) - 6*cos(2*Rx_Si + 3*Ry_Si - 4*Rz_Si) - 6*cos(2*Rx_Si - 3*Ry_Si + 4*Rz_Si) + 2*cos(2*Rx_Si - Ry_Si + 4*Rz_Si) - 4*cos(Ry_Si + 4*Rz_Si) - 2*cos(2*Rx_Si + Ry_Si + 4*Rz_Si) - 20*cos(3*Ry_Si + 4*Rz_Si) + 6*cos(2*Rx_Si + 3*Ry_Si + 4*Rz_Si) - 14*sin(Rx_Si - 3*Ry_Si) - 18*sin(Rx_Si - Ry_Si) - 14*sin(3*(Rx_Si - Ry_Si)) + 14*sin(3*Rx_Si - Ry_Si) - 18*sin(Rx_Si + Ry_Si) - 14*sin(3*(Rx_Si + Ry_Si)) + 14*sin(3*Rx_Si + Ry_Si) - 14*sin(Rx_Si + 3*Ry_Si) + 15*sin(Rx_Si - 3*Ry_Si - 4*Rz_Si) - sin(3*Rx_Si - 3*Ry_Si - 4*Rz_Si) + sin(Rx_Si - Ry_Si - 4*Rz_Si) + sin(3*Rx_Si - Ry_Si - 4*Rz_Si) + sin(Rx_Si + Ry_Si - 4*Rz_Si) + sin(3*Rx_Si + Ry_Si - 4*Rz_Si) + 15*sin(Rx_Si + 3*Ry_Si - 4*Rz_Si) - sin(3*Rx_Si + 3*Ry_Si - 4*Rz_Si) + 15*sin(Rx_Si - 3*Ry_Si + 4*Rz_Si) - sin(3*Rx_Si - 3*Ry_Si + 4*Rz_Si) + sin(Rx_Si - Ry_Si + 4*Rz_Si) + sin(3*Rx_Si - Ry_Si + 4*Rz_Si) + sin(Rx_Si + Ry_Si + 4*Rz_Si) + sin(3*Rx_Si + Ry_Si + 4*Rz_Si) + 15*sin(Rx_Si + 3*Ry_Si + 4*Rz_Si) - sin(3*Rx_Si + 3*Ry_Si + 4*Rz_Si)))
      DESCR_PREFIX:P56 = rotated p56 photoelastic tensor component
      P61 = cos(Rx_Si)*((-p11 + p12)*cos(Rx_Si)^2*sin(Rx_Si)*sin(Ry_Si)^3 + (p11 - p12)*cos(Rz_Si)*(cos(Rz_Si)*sin(Rx_Si)*sin(Ry_Si) - cos(Ry_Si)*sin(Rz_Si))^3 + 2*p44*sin(Ry_Si)*(-(cos(Ry_Si)*cos(Rz_Si)*sin(Rx_Si)) + cos(2*Rx_Si)*sin(Ry_Si)*sin(Rz_Si))*(cos(Ry_Si)*cos(Rz_Si) + sin(Rx_Si)*sin(Ry_Si)*sin(Rz_Si)) + (p11 - p12)*sin(Rz_Si)*(cos(Ry_Si)*cos(Rz_Si) + sin(Rx_Si)*sin(Ry_Si)*sin(Rz_Si))^3 + 2*p44*sin(Ry_Si)*(cos(Rz_Si)*sin(Rx_Si)*sin(Ry_Si) - cos(Ry_Si)*sin(Rz_Si))*(cos(Rx_Si)^2*cos(Rz_Si)*sin(Ry_Si) + sin(Rx_Si)*(-(cos(Rz_Si)*sin(Rx_Si)*sin(Ry_Si)) + cos(Ry_Si)*sin(Rz_Si))) + 2*p44*(cos(Rz_Si)*sin(Rx_Si)*sin(Ry_Si) - cos(Ry_Si)*sin(Rz_Si))*(cos(Ry_Si)*cos(Rz_Si) + sin(Rx_Si)*sin(Ry_Si)*sin(Rz_Si))*(cos(Ry_Si)*cos(2*Rz_Si) + sin(Rx_Si)*sin(Ry_Si)*sin(2*Rz_Si)))
      DESCR_PREFIX:P61 = rotated p61 photoelastic tensor component
      P62 = ((-p11 + p12 + 2*p44)*cos(Rx_Si)*(18*cos(Rx_Si - Ry_Si) - 14*cos(3*Rx_Si - Ry_Si) - 18*cos(Rx_Si + Ry_Si) + 14*cos(3*Rx_Si + Ry_Si) - cos(Rx_Si - Ry_Si - 4*Rz_Si) - cos(3*Rx_Si - Ry_Si - 4*Rz_Si) + cos(Rx_Si + Ry_Si - 4*Rz_Si) + cos(3*Rx_Si + Ry_Si - 4*Rz_Si) - cos(Rx_Si - Ry_Si + 4*Rz_Si) - cos(3*Rx_Si - Ry_Si + 4*Rz_Si) + cos(Rx_Si + Ry_Si + 4*Rz_Si) + cos(3*Rx_Si + Ry_Si + 4*Rz_Si) - 2*sin(2*Rx_Si - Ry_Si - 4*Rz_Si) - 4*sin(Ry_Si - 4*Rz_Si) - 2*sin(2*Rx_Si + Ry_Si - 4*Rz_Si) + 2*sin(2*Rx_Si - Ry_Si + 4*Rz_Si) + 4*sin(Ry_Si + 4*Rz_Si) + 2*sin(2*Rx_Si + Ry_Si + 4*Rz_Si)))/64.
      DESCR_PREFIX:P62 = rotated p62 photoelastic tensor component
      P63 = cos(Rx_Si)*((-p11 + p12)*cos(Rx_Si)^2*cos(Ry_Si)^2*sin(Rx_Si)*sin(Ry_Si) + (p11 - p12)*cos(Rz_Si)*(cos(Rz_Si)*sin(Rx_Si)*sin(Ry_Si) - cos(Ry_Si)*sin(Rz_Si))*(cos(Ry_Si)*cos(Rz_Si)*sin(Rx_Si) + sin(Ry_Si)*sin(Rz_Si))^2 + 2*p44*cos(Ry_Si)*(-(cos(Rz_Si)*sin(Ry_Si)) + cos(Ry_Si)*sin(Rx_Si)*sin(Rz_Si))*(-(cos(Ry_Si)*cos(Rz_Si)*sin(Rx_Si)) + cos(2*Rx_Si)*sin(Ry_Si)*sin(Rz_Si)) + (p11 - p12)*sin(Rz_Si)*(cos(Rz_Si)*sin(Ry_Si) - cos(Ry_Si)*sin(Rx_Si)*sin(Rz_Si))^2*(cos(Ry_Si)*cos(Rz_Si) + sin(Rx_Si)*sin(Ry_Si)*sin(Rz_Si)) + 2*p44*cos(Ry_Si)*(cos(Ry_Si)*cos(Rz_Si)*sin(Rx_Si) + sin(Ry_Si)*sin(Rz_Si))*(cos(Rx_Si)^2*cos(Rz_Si)*sin(Ry_Si) + sin(Rx_Si)*(-(cos(Rz_Si)*sin(Rx_Si)*sin(Ry_Si)) + cos(Ry_Si)*sin(Rz_Si))) - 2*p44*(cos(Rz_Si)*sin(Ry_Si) - cos(Ry_Si)*sin(Rx_Si)*sin(Rz_Si))*(cos(Ry_Si)*cos(Rz_Si)*sin(Rx_Si) + sin(Ry_Si)*sin(Rz_Si))*(cos(Ry_Si)*cos(2*Rz_Si) + sin(Rx_Si)*sin(Ry_Si)*sin(2*Rz_Si)))
      DESCR_PREFIX:P63 = rotated p63 photoelastic tensor component
      P64 = -0.015625*((p11 - p12 - 2*p44)*cos(Rx_Si)^2*(4*cos(Rx_Si - 2*Ry_Si - 4*Rz_Si) + 4*cos(Rx_Si + 2*Ry_Si - 4*Rz_Si) - 4*cos(Rx_Si - 2*Ry_Si + 4*Rz_Si) - 4*cos(Rx_Si + 2*Ry_Si + 4*Rz_Si) - 14*sin(2*(Rx_Si - Ry_Si)) - 20*sin(2*Ry_Si) + 14*sin(2*(Rx_Si + Ry_Si)) - sin(2*(Rx_Si - Ry_Si - 2*Rz_Si)) - 6*sin(2*(Ry_Si - 2*Rz_Si)) + sin(2*(Rx_Si + Ry_Si - 2*Rz_Si)) - sin(2*(Rx_Si - Ry_Si + 2*Rz_Si)) - 6*sin(2*(Ry_Si + 2*Rz_Si)) + sin(2*(Rx_Si + Ry_Si + 2*Rz_Si))))
      DESCR_PREFIX:P64 = rotated p64 photoelastic tensor component
      P65 = cos(Rx_Si)*((-p11 + p12)*cos(Rx_Si)^2*cos(Ry_Si)*sin(Rx_Si)*sin(Ry_Si)^2 + (p11 - p12)*cos(Rz_Si)*(cos(Rz_Si)*sin(Rx_Si)*sin(Ry_Si) - cos(Ry_Si)*sin(Rz_Si))^2*(cos(Ry_Si)*cos(Rz_Si)*sin(Rx_Si) + sin(Ry_Si)*sin(Rz_Si)) + (p11 - p12)*sin(Rz_Si)*(-(cos(Rz_Si)*sin(Ry_Si)) + cos(Ry_Si)*sin(Rx_Si)*sin(Rz_Si))*(cos(Ry_Si)*cos(Rz_Si) + sin(Rx_Si)*sin(Ry_Si)*sin(Rz_Si))^2 + p44*(-(cos(Ry_Si)*cos(Rz_Si)*sin(Rx_Si)) + cos(2*Rx_Si)*sin(Ry_Si)*sin(Rz_Si))*(cos(Ry_Si)^2*cos(Rz_Si) - cos(Rz_Si)*sin(Ry_Si)^2 + sin(Rx_Si)*sin(2*Ry_Si)*sin(Rz_Si)) + p44*(cos(Rz_Si)*sin(Rx_Si)*sin(2*Ry_Si) - cos(2*Ry_Si)*sin(Rz_Si))*(cos(Rx_Si)^2*cos(Rz_Si)*sin(Ry_Si) + sin(Rx_Si)*(-(cos(Rz_Si)*sin(Rx_Si)*sin(Ry_Si)) + cos(Ry_Si)*sin(Rz_Si))) + p44*(cos(Ry_Si)*cos(2*Rz_Si) + sin(Rx_Si)*sin(Ry_Si)*sin(2*Rz_Si))*(cos(Ry_Si)^2*cos(2*Rz_Si)*sin(Rx_Si) - cos(2*Rz_Si)*sin(Rx_Si)*sin(Ry_Si)^2 - ((-3 + cos(2*Rx_Si))*sin(2*Ry_Si)*sin(2*Rz_Si))/4.))
      DESCR_PREFIX:P65 = rotated p65 photoelastic tensor component
      P66 = (p11 - p12)*cos(Rx_Si)^2*sin(Rx_Si)^2*sin(Ry_Si)^2 + (p11 - p12)*cos(Rx_Si)^2*cos(Rz_Si)^2*(cos(Rz_Si)*sin(Rx_Si)*sin(Ry_Si) - cos(Ry_Si)*sin(Rz_Si))^2 + p44*(cos(Ry_Si)*cos(Rz_Si)*sin(Rx_Si) - cos(2*Rx_Si)*sin(Ry_Si)*sin(Rz_Si))^2 + (p11 - p12)*cos(Rx_Si)^2*sin(Rz_Si)^2*(cos(Ry_Si)*cos(Rz_Si) + sin(Rx_Si)*sin(Ry_Si)*sin(Rz_Si))^2 + p44*(cos(Rx_Si)^2*cos(Rz_Si)*sin(Ry_Si) + sin(Rx_Si)*(-(cos(Rz_Si)*sin(Rx_Si)*sin(Ry_Si)) + cos(Ry_Si)*sin(Rz_Si)))^2 + p44*cos(Rx_Si)^2*(cos(Ry_Si)*cos(2*Rz_Si) + sin(Rx_Si)*sin(Ry_Si)*sin(2*Rz_Si))^2
      DESCR_PREFIX:P66 = rotated p66 photoelastic tensor component
      E11 = 0[C/m^2]
      DESCR_PREFIX:E11 = rotated e11 piezoelectric stress-charge tensor component
      E12 = 0[C/m^2]
      DESCR_PREFIX:E12 = rotated e12 piezoelectric stress-charge tensor component
      E13 = 0[C/m^2]
      DESCR_PREFIX:E13 = rotated e13 piezoelectric stress-charge tensor component
      E14 = 0[C/m^2]
      DESCR_PREFIX:E14 = rotated e14 piezoelectric stress-charge tensor component
      E15 = 0[C/m^2]
      DESCR_PREFIX:E15 = rotated e15 piezoelectric stress-charge tensor component
      E16 = 0[C/m^2]
      DESCR_PREFIX:E16 = rotated e16 piezoelectric stress-charge tensor component
      E21 = 0[C/m^2]
      DESCR_PREFIX:E21 = rotated e21 piezoelectric stress-charge tensor component
      E22 = 0[C/m^2]
      DESCR_PREFIX:E22 = rotated e22 piezoelectric stress-charge tensor component
      E23 = 0[C/m^2]
      DESCR_PREFIX:E23 = rotated e23 piezoelectric stress-charge tensor component
      E24 = 0[C/m^2]
      DESCR_PREFIX:E24 = rotated e24 piezoelectric stress-charge tensor component
      E25 = 0[C/m^2]
      DESCR_PREFIX:E25 = rotated e25 piezoelectric stress-charge tensor component
      E26 = 0[C/m^2]
      DESCR_PREFIX:E26 = rotated e26 piezoelectric stress-charge tensor component
      E31 = 0[C/m^2]
      DESCR_PREFIX:E31 = rotated e31 piezoelectric stress-charge tensor component
      E32 = 0[C/m^2]
      DESCR_PREFIX:E32 = rotated e32 piezoelectric stress-charge tensor component
      E33 = 0[C/m^2]
      DESCR_PREFIX:E33 = rotated e33 piezoelectric stress-charge tensor component
      E34 = 0[C/m^2]
      DESCR_PREFIX:E34 = rotated e34 piezoelectric stress-charge tensor component
      E35 = 0[C/m^2]
      DESCR_PREFIX:E35 = rotated e35 piezoelectric stress-charge tensor component
      E36 = 0[C/m^2]
      DESCR_PREFIX:E36 = rotated e36 piezoelectric stress-charge tensor component
    Anisotropic
      D = {C11, C12, C13, C16, C14, C15, C12, C22, C23, C26, C24, C25, C13, C23, C33, C36, C34, C35, C16, C26, C36, C66, C64, C65, C14, C24, C34, C64, C44, C45, C15, C25, C35, C65, C45, C55}
      eta_D = {0, 0, 0, 0, 0, 0, 0, 0, 0, 0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}
      c11 = 166e9[Pa]
      DESCR_PREFIX:c11 = (measured) c11, elastic stiffnesses component
      c12 = 64e9[Pa]
      DESCR_PREFIX:c12 = (measured) c12, elastic stiffnesses component
      c13 = c12
      DESCR_PREFIX:c13 = c13, elastic stiffnesses component
      c14 = 0[Pa]
      DESCR_PREFIX:c14 = c14, elastic stiffnesses component
      c15 = 0[Pa]
      DESCR_PREFIX:c15 = c15, elastic stiffnesses component
      c16 = 0[Pa]
      DESCR_PREFIX:c16 = c16, elastic stiffnesses component
      c21 = c12
      DESCR_PREFIX:c21 = c21, elastic stiffnesses component
      c22 = c11
      DESCR_PREFIX:c22 = c22, elastic stiffnesses component
      c23 = c12
      DESCR_PREFIX:c23 = c23, elastic stiffnesses component
      c24 = 0[Pa]
      DESCR_PREFIX:c24 = c24, elastic stiffnesses component
      c25 = 0[Pa]
      DESCR_PREFIX:c25 = c25, elastic stiffnesses component
      c26 = 0[Pa]
      DESCR_PREFIX:c26 = c26, elastic stiffnesses component
      c31 = c12
      DESCR_PREFIX:c31 = c31, elastic stiffnesses component
      c32 = c12
      DESCR_PREFIX:c32 = c32, elastic stiffnesses component
      c33 = c11
      DESCR_PREFIX:c33 = c33, elastic stiffnesses component
      c34 = 0[Pa]
      DESCR_PREFIX:c34 = c34, elastic stiffnesses component
      c35 = 0[Pa]
      DESCR_PREFIX:c35 = c35, elastic stiffnesses component
      c36 = 0[Pa]
      DESCR_PREFIX:c36 = c36, elastic stiffnesses component
      c41 = 0[Pa]
      DESCR_PREFIX:c41 = c41, elastic stiffnesses component
      c42 = 0[Pa]
      DESCR_PREFIX:c42 = c42, elastic stiffnesses component
      c43 = 0[Pa]
      DESCR_PREFIX:c43 = c43, elastic stiffnesses component
      c44 = 79e9[Pa]
      DESCR_PREFIX:c44 = (measured) c44, elastic stiffnesses component
      c45 = 0[Pa]
      DESCR_PREFIX:c45 = c45, elastic stiffnesses component
      c46 = 0[Pa]
      DESCR_PREFIX:c46 = c46, elastic stiffnesses component
      c51 = 0[Pa]
      DESCR_PREFIX:c51 = c51, elastic stiffnesses component
      c52 = 0[Pa]
      DESCR_PREFIX:c52 = c52, elastic stiffnesses component
      c53 = 0[Pa]
      DESCR_PREFIX:c53 = c53, elastic stiffnesses component
      c54 = 0[Pa]
      DESCR_PREFIX:c54 = c54, elastic stiffnesses component
      c55 = c44
      DESCR_PREFIX:c55 = c55, elastic stiffnesses component
      c56 = 0[Pa]
      DESCR_PREFIX:c56 = c56, elastic stiffnesses component
      c61 = 0[Pa]
      DESCR_PREFIX:c61 = c61, elastic stiffnesses component
      c62 = 0[Pa]
      DESCR_PREFIX:c62 = c62, elastic stiffnesses component
      c63 = 0[Pa]
      DESCR_PREFIX:c63 = c63, elastic stiffnesses component
      c64 = 0[Pa]
      DESCR_PREFIX:c64 = c64, elastic stiffnesses component
      c65 = 0[Pa]
      DESCR_PREFIX:c65 = c65, elastic stiffnesses component
      c66 = c44
      DESCR_PREFIX:c66 = c66, elastic stiffnesses component
      C11 = cos(Rx_Si)^2*sin(Ry_Si)^2*(c12*cos(Ry_Si)^2 + ((c11 + c12 + (c11 - c12)*cos(2*Rx_Si))*sin(Ry_Si)^2)/2.) + 4*c44*cos(Rx_Si)^2*sin(Ry_Si)^2*(cos(Rz_Si)*sin(Rx_Si)*sin(Ry_Si) - cos(Ry_Si)*sin(Rz_Si))^2 + 4*c44*cos(Rx_Si)^2*sin(Ry_Si)^2*(cos(Ry_Si)*cos(Rz_Si) + sin(Rx_Si)*sin(Ry_Si)*sin(Rz_Si))^2 + 4*c44*(cos(Rz_Si)*sin(Rx_Si)*sin(Ry_Si) - cos(Ry_Si)*sin(Rz_Si))^2*(cos(Ry_Si)*cos(Rz_Si) + sin(Rx_Si)*sin(Ry_Si)*sin(Rz_Si))^2 + (cos(Ry_Si)*cos(Rz_Si) + sin(Rx_Si)*sin(Ry_Si)*sin(Rz_Si))^2*(c12*cos(Rx_Si)^2*sin(Ry_Si)^2 + c12*(cos(Rz_Si)*sin(Rx_Si)*sin(Ry_Si) - cos(Ry_Si)*sin(Rz_Si))^2 + c11*(cos(Ry_Si)*cos(Rz_Si) + sin(Rx_Si)*sin(Ry_Si)*sin(Rz_Si))^2) + (cos(Rz_Si)*sin(Rx_Si)*sin(Ry_Si) - cos(Ry_Si)*sin(Rz_Si))^2*(c12*cos(Rx_Si)^2*sin(Ry_Si)^2 + c11*(cos(Rz_Si)*sin(Rx_Si)*sin(Ry_Si) - cos(Ry_Si)*sin(Rz_Si))^2 + c12*(cos(Ry_Si)*cos(Rz_Si) + sin(Rx_Si)*sin(Ry_Si)*sin(Rz_Si))^2)
      DESCR_PREFIX:C11 = rotated c11 elastic stiffnesses component
      C12 = c12*cos(Rx_Si)^4*sin(Ry_Si)^2 + (sin(Rx_Si)^2*(2*c12*cos(Ry_Si)^2 + (c11 + c12 + (c11 - c12)*cos(2*Rx_Si))*sin(Ry_Si)^2))/2. + cos(Rx_Si)^2*(-0.25*(cos(Ry_Si)^2*(-c11 - 3*c12 + 2*c44 + (c11 - c12 - 2*c44)*cos(4*Rz_Si))) + sin(Rx_Si)*(c11*cos(Rz_Si)^4*sin(Rx_Si)*sin(Ry_Si)^2 - cos(Rz_Si)^2*(-c12 + 4*c44 + c12*cos(2*Rz_Si))*sin(Rx_Si)*sin(Ry_Si)^2 + c12*cos(Rz_Si)^3*sin(2*Ry_Si)*sin(Rz_Si) + c11*cos(Rz_Si)*sin(2*Ry_Si)*sin(Rz_Si)^3 + (c11 - 4*c44)*sin(Rx_Si)*sin(Ry_Si)^2*sin(Rz_Si)^4) - ((c11 + c12 + (c11 - c12 - 4*c44)*cos(2*Rz_Si))*sin(Rx_Si)*sin(2*Ry_Si)*sin(2*Rz_Si))/4.)
      DESCR_PREFIX:C12 = rotated c12 elastic stiffnesses component
      C13 = cos(Rx_Si)^2*cos(Ry_Si)^2*(c12*cos(Ry_Si)^2 + ((c11 + c12 + (c11 - c12)*cos(2*Rx_Si))*sin(Ry_Si)^2)/2.) + 4*c44*cos(Rx_Si)^2*cos(Ry_Si)*sin(Ry_Si)*(cos(Rz_Si)*sin(Rx_Si)*sin(Ry_Si) - cos(Ry_Si)*sin(Rz_Si))*(cos(Ry_Si)*cos(Rz_Si)*sin(Rx_Si) + sin(Ry_Si)*sin(Rz_Si)) + 4*c44*cos(Rx_Si)^2*cos(Ry_Si)*sin(Ry_Si)*(-(cos(Rz_Si)*sin(Ry_Si)) + cos(Ry_Si)*sin(Rx_Si)*sin(Rz_Si))*(cos(Ry_Si)*cos(Rz_Si) + sin(Rx_Si)*sin(Ry_Si)*sin(Rz_Si)) + 4*c44*(cos(Rz_Si)*sin(Rx_Si)*sin(Ry_Si) - cos(Ry_Si)*sin(Rz_Si))*(-(cos(Rz_Si)*sin(Ry_Si)) + cos(Ry_Si)*sin(Rx_Si)*sin(Rz_Si))*(cos(Ry_Si)*cos(Rz_Si)*sin(Rx_Si) + sin(Ry_Si)*sin(Rz_Si))*(cos(Ry_Si)*cos(Rz_Si) + sin(Rx_Si)*sin(Ry_Si)*sin(Rz_Si)) + (cos(Rz_Si)*sin(Ry_Si) - cos(Ry_Si)*sin(Rx_Si)*sin(Rz_Si))^2*(c12*cos(Rx_Si)^2*sin(Ry_Si)^2 + c12*(cos(Rz_Si)*sin(Rx_Si)*sin(Ry_Si) - cos(Ry_Si)*sin(Rz_Si))^2 + c11*(cos(Ry_Si)*cos(Rz_Si) + sin(Rx_Si)*sin(Ry_Si)*sin(Rz_Si))^2) + (cos(Ry_Si)*cos(Rz_Si)*sin(Rx_Si) + sin(Ry_Si)*sin(Rz_Si))^2*(c12*cos(Rx_Si)^2*sin(Ry_Si)^2 + c11*(cos(Rz_Si)*sin(Rx_Si)*sin(Ry_Si) - cos(Ry_Si)*sin(Rz_Si))^2 + c12*(cos(Ry_Si)*cos(Rz_Si) + sin(Rx_Si)*sin(Ry_Si)*sin(Rz_Si))^2)
      DESCR_PREFIX:C13 = rotated c13 elastic stiffnesses component
      C14 = cos(Rx_Si)*(-(cos(Ry_Si)*sin(Rx_Si)*(c12*cos(Ry_Si)^2 + ((c11 + c12 + (c11 - c12)*cos(2*Rx_Si))*sin(Ry_Si)^2)/2.)) + 2*c44*sin(Ry_Si)*(cos(Rz_Si)*sin(Rx_Si)*sin(Ry_Si) + cos(2*Rx_Si)*cos(Ry_Si)*sin(Rz_Si))*(cos(Ry_Si)*cos(Rz_Si) + sin(Rx_Si)*sin(Ry_Si)*sin(Rz_Si)) - 2*c44*(cos(Rz_Si)*sin(Rx_Si)*sin(Ry_Si) - cos(Ry_Si)*sin(Rz_Si))*(cos(Ry_Si)*cos(Rz_Si) + sin(Rx_Si)*sin(Ry_Si)*sin(Rz_Si))*(cos(Rz_Si)^2*sin(Ry_Si) - 2*cos(Ry_Si)*cos(Rz_Si)*sin(Rx_Si)*sin(Rz_Si) - sin(Ry_Si)*sin(Rz_Si)^2) + 2*c44*sin(Ry_Si)*(cos(Rz_Si)*sin(Rx_Si)*sin(Ry_Si) - cos(Ry_Si)*sin(Rz_Si))*(cos(Rx_Si)^2*cos(Ry_Si)*cos(Rz_Si) - sin(Rx_Si)*(cos(Ry_Si)*cos(Rz_Si)*sin(Rx_Si) + sin(Ry_Si)*sin(Rz_Si))) + sin(Rz_Si)*(-(cos(Rz_Si)*sin(Ry_Si)) + cos(Ry_Si)*sin(Rx_Si)*sin(Rz_Si))*(c12*cos(Rx_Si)^2*sin(Ry_Si)^2 + c12*(cos(Rz_Si)*sin(Rx_Si)*sin(Ry_Si) - cos(Ry_Si)*sin(Rz_Si))^2 + c11*(cos(Ry_Si)*cos(Rz_Si) + sin(Rx_Si)*sin(Ry_Si)*sin(Rz_Si))^2) + cos(Rz_Si)*(cos(Ry_Si)*cos(Rz_Si)*sin(Rx_Si) + sin(Ry_Si)*sin(Rz_Si))*(c12*cos(Rx_Si)^2*sin(Ry_Si)^2 + c11*(cos(Rz_Si)*sin(Rx_Si)*sin(Ry_Si) - cos(Ry_Si)*sin(Rz_Si))^2 + c12*(cos(Ry_Si)*cos(Rz_Si) + sin(Rx_Si)*sin(Ry_Si)*sin(Rz_Si))^2))
      DESCR_PREFIX:C14 = rotated c14 elastic stiffnesses component
      C15 = cos(Rx_Si)^2*cos(Ry_Si)*sin(Ry_Si)*(c12*cos(Ry_Si)^2 + ((c11 + c12 + (c11 - c12)*cos(2*Rx_Si))*sin(Ry_Si)^2)/2.) + 2*c44*cos(Rx_Si)^2*sin(Ry_Si)*(cos(Rz_Si)*sin(Rx_Si)*sin(Ry_Si) - cos(Ry_Si)*sin(Rz_Si))*(cos(Rz_Si)*sin(Rx_Si)*sin(2*Ry_Si) - cos(2*Ry_Si)*sin(Rz_Si)) - 2*c44*cos(Rx_Si)^2*sin(Ry_Si)*(cos(Ry_Si)*cos(Rz_Si) + sin(Rx_Si)*sin(Ry_Si)*sin(Rz_Si))*(-(cos(Ry_Si)^2*cos(Rz_Si)) + cos(Rz_Si)*sin(Ry_Si)^2 - 2*cos(Ry_Si)*sin(Rx_Si)*sin(Ry_Si)*sin(Rz_Si)) + (-(cos(Rz_Si)*sin(Ry_Si)) + cos(Ry_Si)*sin(Rx_Si)*sin(Rz_Si))*(cos(Ry_Si)*cos(Rz_Si) + sin(Rx_Si)*sin(Ry_Si)*sin(Rz_Si))*(c12*cos(Rx_Si)^2*sin(Ry_Si)^2 + c12*(cos(Rz_Si)*sin(Rx_Si)*sin(Ry_Si) - cos(Ry_Si)*sin(Rz_Si))^2 + c11*(cos(Ry_Si)*cos(Rz_Si) + sin(Rx_Si)*sin(Ry_Si)*sin(Rz_Si))^2) + (cos(Rz_Si)*sin(Rx_Si)*sin(Ry_Si) - cos(Ry_Si)*sin(Rz_Si))*(cos(Ry_Si)*cos(Rz_Si)*sin(Rx_Si) + sin(Ry_Si)*sin(Rz_Si))*(c12*cos(Rx_Si)^2*sin(Ry_Si)^2 + c11*(cos(Rz_Si)*sin(Rx_Si)*sin(Ry_Si) - cos(Ry_Si)*sin(Rz_Si))^2 + c12*(cos(Ry_Si)*cos(Rz_Si) + sin(Rx_Si)*sin(Ry_Si)*sin(Rz_Si))^2) + 2*c44*(cos(Rz_Si)*sin(Rx_Si)*sin(Ry_Si) - cos(Ry_Si)*sin(Rz_Si))*(cos(Ry_Si)*cos(Rz_Si) + sin(Rx_Si)*sin(Ry_Si)*sin(Rz_Si))*(cos(Ry_Si)^2*cos(2*Rz_Si)*sin(Rx_Si) - cos(2*Rz_Si)*sin(Rx_Si)*sin(Ry_Si)^2 - ((-3 + cos(2*Rx_Si))*sin(2*Ry_Si)*sin(2*Rz_Si))/4.)
      DESCR_PREFIX:C15 = rotated c15 elastic stiffnesses component
      C16 = cos(Rx_Si)*(-(sin(Rx_Si)*sin(Ry_Si)*(c12*cos(Ry_Si)^2 + ((c11 + c12 + (c11 - c12)*cos(2*Rx_Si))*sin(Ry_Si)^2)/2.)) + 2*c44*sin(Ry_Si)*(-(cos(Ry_Si)*cos(Rz_Si)*sin(Rx_Si)) + cos(2*Rx_Si)*sin(Ry_Si)*sin(Rz_Si))*(cos(Ry_Si)*cos(Rz_Si) + sin(Rx_Si)*sin(Ry_Si)*sin(Rz_Si)) + 2*c44*sin(Ry_Si)*(cos(Rz_Si)*sin(Rx_Si)*sin(Ry_Si) - cos(Ry_Si)*sin(Rz_Si))*(cos(Rx_Si)^2*cos(Rz_Si)*sin(Ry_Si) + sin(Rx_Si)*(-(cos(Rz_Si)*sin(Rx_Si)*sin(Ry_Si)) + cos(Ry_Si)*sin(Rz_Si))) + sin(Rz_Si)*(cos(Ry_Si)*cos(Rz_Si) + sin(Rx_Si)*sin(Ry_Si)*sin(Rz_Si))*(c12*cos(Rx_Si)^2*sin(Ry_Si)^2 + c12*(cos(Rz_Si)*sin(Rx_Si)*sin(Ry_Si) - cos(Ry_Si)*sin(Rz_Si))^2 + c11*(cos(Ry_Si)*cos(Rz_Si) + sin(Rx_Si)*sin(Ry_Si)*sin(Rz_Si))^2) + cos(Rz_Si)*(cos(Rz_Si)*sin(Rx_Si)*sin(Ry_Si) - cos(Ry_Si)*sin(Rz_Si))*(c12*cos(Rx_Si)^2*sin(Ry_Si)^2 + c11*(cos(Rz_Si)*sin(Rx_Si)*sin(Ry_Si) - cos(Ry_Si)*sin(Rz_Si))^2 + c12*(cos(Ry_Si)*cos(Rz_Si) + sin(Rx_Si)*sin(Ry_Si)*sin(Rz_Si))^2) + 2*c44*(cos(Rz_Si)*sin(Rx_Si)*sin(Ry_Si) - cos(Ry_Si)*sin(Rz_Si))*(cos(Ry_Si)*cos(Rz_Si) + sin(Rx_Si)*sin(Ry_Si)*sin(Rz_Si))*(cos(Ry_Si)*cos(2*Rz_Si) + sin(Rx_Si)*sin(Ry_Si)*sin(2*Rz_Si)))
      DESCR_PREFIX:C16 = rotated c16 elastic stiffnesses component
      C21 = (cos(Rx_Si)^2*(c11 + c12 + (-c11 + c12)*cos(2*Rx_Si))*sin(Ry_Si)^2)/2. - 4*c44*cos(Rx_Si)^2*cos(Rz_Si)*sin(Rx_Si)*sin(Ry_Si)*(cos(Rz_Si)*sin(Rx_Si)*sin(Ry_Si) - cos(Ry_Si)*sin(Rz_Si)) - 4*c44*cos(Rx_Si)^2*sin(Rx_Si)*sin(Ry_Si)*sin(Rz_Si)*(cos(Ry_Si)*cos(Rz_Si) + sin(Rx_Si)*sin(Ry_Si)*sin(Rz_Si)) + 4*c44*cos(Rx_Si)^2*cos(Rz_Si)*sin(Rz_Si)*(cos(Rz_Si)*sin(Rx_Si)*sin(Ry_Si) - cos(Ry_Si)*sin(Rz_Si))*(cos(Ry_Si)*cos(Rz_Si) + sin(Rx_Si)*sin(Ry_Si)*sin(Rz_Si)) + (cos(Ry_Si)*cos(Rz_Si) + sin(Rx_Si)*sin(Ry_Si)*sin(Rz_Si))^2*(c12*sin(Rx_Si)^2 + cos(Rx_Si)^2*(c12*cos(Rz_Si)^2 + c11*sin(Rz_Si)^2)) + (cos(Rz_Si)*sin(Rx_Si)*sin(Ry_Si) - cos(Ry_Si)*sin(Rz_Si))^2*(c12*sin(Rx_Si)^2 + cos(Rx_Si)^2*(c11*cos(Rz_Si)^2 + c12*sin(Rz_Si)^2))
      DESCR_PREFIX:C21 = rotated c21 elastic stiffnesses component
      C22 = (cos(Rx_Si)^4*(3*c11 + c12 + 2*c44 + (c11 - c12 - 2*c44)*cos(4*Rz_Si)))/4. + 2*cos(Rx_Si)^2*(c12 + c44 + c44*cos(2*Rz_Si))*sin(Rx_Si)^2 + c11*sin(Rx_Si)^4 + c44*sin(2*Rx_Si)^2*sin(Rz_Si)^2
      DESCR_PREFIX:C22 = rotated c22 elastic stiffnesses component
      C23 = (cos(Rx_Si)^2*(c11 + c12 + (-c11 + c12)*cos(2*Rx_Si))*cos(Ry_Si)^2)/2. - 4*c44*cos(Rx_Si)^2*cos(Ry_Si)*sin(Rx_Si)*sin(Rz_Si)*(-(cos(Rz_Si)*sin(Ry_Si)) + cos(Ry_Si)*sin(Rx_Si)*sin(Rz_Si)) - 4*c44*cos(Rx_Si)^2*cos(Ry_Si)*cos(Rz_Si)*sin(Rx_Si)*(cos(Ry_Si)*cos(Rz_Si)*sin(Rx_Si) + sin(Ry_Si)*sin(Rz_Si)) + 4*c44*cos(Rx_Si)^2*cos(Rz_Si)*sin(Rz_Si)*(-(cos(Rz_Si)*sin(Ry_Si)) + cos(Ry_Si)*sin(Rx_Si)*sin(Rz_Si))*(cos(Ry_Si)*cos(Rz_Si)*sin(Rx_Si) + sin(Ry_Si)*sin(Rz_Si)) + (cos(Rz_Si)*sin(Ry_Si) - cos(Ry_Si)*sin(Rx_Si)*sin(Rz_Si))^2*(c12*sin(Rx_Si)^2 + cos(Rx_Si)^2*(c12*cos(Rz_Si)^2 + c11*sin(Rz_Si)^2)) + (cos(Ry_Si)*cos(Rz_Si)*sin(Rx_Si) + sin(Ry_Si)*sin(Rz_Si))^2*(c12*sin(Rx_Si)^2 + cos(Rx_Si)^2*(c11*cos(Rz_Si)^2 + c12*sin(Rz_Si)^2))
      DESCR_PREFIX:C23 = rotated c23 elastic stiffnesses component
      C24 = ((c11 - c12 - 2*c44)*cos(Rx_Si)*(-2*cos(2*Rx_Si - Ry_Si - 4*Rz_Si) + 4*cos(Ry_Si - 4*Rz_Si) + 2*cos(2*Rx_Si + Ry_Si - 4*Rz_Si) + 2*cos(2*Rx_Si - Ry_Si + 4*Rz_Si) - 4*cos(Ry_Si + 4*Rz_Si) - 2*cos(2*Rx_Si + Ry_Si + 4*Rz_Si) - 18*sin(Rx_Si - Ry_Si) + 14*sin(3*Rx_Si - Ry_Si) - 18*sin(Rx_Si + Ry_Si) + 14*sin(3*Rx_Si + Ry_Si) + sin(Rx_Si - Ry_Si - 4*Rz_Si) + sin(3*Rx_Si - Ry_Si - 4*Rz_Si) + sin(Rx_Si + Ry_Si - 4*Rz_Si) + sin(3*Rx_Si + Ry_Si - 4*Rz_Si) + sin(Rx_Si - Ry_Si + 4*Rz_Si) + sin(3*Rx_Si - Ry_Si + 4*Rz_Si) + sin(Rx_Si + Ry_Si + 4*Rz_Si) + sin(3*Rx_Si + Ry_Si + 4*Rz_Si)))/64.
      DESCR_PREFIX:C24 = rotated c24 elastic stiffnesses component
      C25 = -0.015625*((c11 - c12 - 2*c44)*cos(Rx_Si)^2*(4*cos(Rx_Si - 2*Ry_Si - 4*Rz_Si) + 4*cos(Rx_Si + 2*Ry_Si - 4*Rz_Si) - 4*cos(Rx_Si - 2*Ry_Si + 4*Rz_Si) - 4*cos(Rx_Si + 2*Ry_Si + 4*Rz_Si) - 14*sin(2*(Rx_Si - Ry_Si)) - 20*sin(2*Ry_Si) + 14*sin(2*(Rx_Si + Ry_Si)) - sin(2*(Rx_Si - Ry_Si - 2*Rz_Si)) - 6*sin(2*(Ry_Si - 2*Rz_Si)) + sin(2*(Rx_Si + Ry_Si - 2*Rz_Si)) - sin(2*(Rx_Si - Ry_Si + 2*Rz_Si)) - 6*sin(2*(Ry_Si + 2*Rz_Si)) + sin(2*(Rx_Si + Ry_Si + 2*Rz_Si))))
      DESCR_PREFIX:C25 = rotated c25 elastic stiffnesses component
      C26 = ((-c11 + c12 + 2*c44)*cos(Rx_Si)*(18*cos(Rx_Si - Ry_Si) - 14*cos(3*Rx_Si - Ry_Si) - 18*cos(Rx_Si + Ry_Si) + 14*cos(3*Rx_Si + Ry_Si) - cos(Rx_Si - Ry_Si - 4*Rz_Si) - cos(3*Rx_Si - Ry_Si - 4*Rz_Si) + cos(Rx_Si + Ry_Si - 4*Rz_Si) + cos(3*Rx_Si + Ry_Si - 4*Rz_Si) - cos(Rx_Si - Ry_Si + 4*Rz_Si) - cos(3*Rx_Si - Ry_Si + 4*Rz_Si) + cos(Rx_Si + Ry_Si + 4*Rz_Si) + cos(3*Rx_Si + Ry_Si + 4*Rz_Si) - 2*sin(2*Rx_Si - Ry_Si - 4*Rz_Si) - 4*sin(Ry_Si - 4*Rz_Si) - 2*sin(2*Rx_Si + Ry_Si - 4*Rz_Si) + 2*sin(2*Rx_Si - Ry_Si + 4*Rz_Si) + 4*sin(Ry_Si + 4*Rz_Si) + 2*sin(2*Rx_Si + Ry_Si + 4*Rz_Si)))/64.
      DESCR_PREFIX:C26 = rotated c26 elastic stiffnesses component
      C31 = cos(Rx_Si)^2*(c11*cos(Rx_Si)^2*cos(Ry_Si)^2 - (c12*(-6 + 2*cos(2*Rx_Si) + cos(2*(Rx_Si - Ry_Si)) + 2*cos(2*Ry_Si) + cos(2*(Rx_Si + Ry_Si))))/8.)*sin(Ry_Si)^2 + 4*c44*cos(Rx_Si)^2*cos(Ry_Si)*sin(Ry_Si)*(cos(Rz_Si)*sin(Rx_Si)*sin(Ry_Si) - cos(Ry_Si)*sin(Rz_Si))*(cos(Ry_Si)*cos(Rz_Si)*sin(Rx_Si) + sin(Ry_Si)*sin(Rz_Si)) + 4*c44*cos(Rx_Si)^2*cos(Ry_Si)*sin(Ry_Si)*(-(cos(Rz_Si)*sin(Ry_Si)) + cos(Ry_Si)*sin(Rx_Si)*sin(Rz_Si))*(cos(Ry_Si)*cos(Rz_Si) + sin(Rx_Si)*sin(Ry_Si)*sin(Rz_Si)) + 4*c44*(cos(Rz_Si)*sin(Rx_Si)*sin(Ry_Si) - cos(Ry_Si)*sin(Rz_Si))*(-(cos(Rz_Si)*sin(Ry_Si)) + cos(Ry_Si)*sin(Rx_Si)*sin(Rz_Si))*(cos(Ry_Si)*cos(Rz_Si)*sin(Rx_Si) + sin(Ry_Si)*sin(Rz_Si))*(cos(Ry_Si)*cos(Rz_Si) + sin(Rx_Si)*sin(Ry_Si)*sin(Rz_Si)) + (cos(Rz_Si)*sin(Rx_Si)*sin(Ry_Si) - cos(Ry_Si)*sin(Rz_Si))^2*(c12*cos(Rx_Si)^2*cos(Ry_Si)^2 + c12*(cos(Rz_Si)*sin(Ry_Si) - cos(Ry_Si)*sin(Rx_Si)*sin(Rz_Si))^2 + c11*(cos(Ry_Si)*cos(Rz_Si)*sin(Rx_Si) + sin(Ry_Si)*sin(Rz_Si))^2) + (cos(Ry_Si)*cos(Rz_Si) + sin(Rx_Si)*sin(Ry_Si)*sin(Rz_Si))^2*(c12*cos(Rx_Si)^2*cos(Ry_Si)^2 + c11*(cos(Rz_Si)*sin(Ry_Si) - cos(Ry_Si)*sin(Rx_Si)*sin(Rz_Si))^2 + c12*(cos(Ry_Si)*cos(Rz_Si)*sin(Rx_Si) + sin(Ry_Si)*sin(Rz_Si))^2)
      DESCR_PREFIX:C31 = rotated c31 elastic stiffnesses component
      C32 = c12*cos(Rx_Si)^4*cos(Ry_Si)^2 - (c12*(-6 + 2*cos(2*Rx_Si) + cos(2*(Rx_Si - Ry_Si)) + 2*cos(2*Ry_Si) + cos(2*(Rx_Si + Ry_Si)))*sin(Rx_Si)^2)/8. + (cos(Rx_Si)^2*(cos(Ry_Si)^2*(7*c11 + c12 - 14*c44 + (c11 - c12 - 2*c44)*cos(4*Rz_Si))*sin(Rx_Si)^2 + 4*c12*cos(Rz_Si)^4*sin(Ry_Si)^2 + 4*c11*cos(Rz_Si)^3*sin(Rx_Si)*sin(2*Ry_Si)*sin(Rz_Si) + 4*c12*cos(Rz_Si)*sin(Rx_Si)*sin(2*Ry_Si)*sin(Rz_Si)^3 - (c11 + c12)*sin(Rx_Si)*sin(2*Ry_Si)*sin(2*Rz_Si) + 2*sin(Ry_Si)^2*(2*c12*sin(Rz_Si)^4 + (c11 - 2*c44)*sin(2*Rz_Si)^2) + ((c11 - c12 - 4*c44)*sin(Rx_Si)*sin(2*Ry_Si)*sin(4*Rz_Si))/2.))/4.
      DESCR_PREFIX:C32 = rotated c32 elastic stiffnesses component
      C33 = c11*cos(Rx_Si)^4*cos(Ry_Si)^4 - (c12*cos(Rx_Si)^2*cos(Ry_Si)^2*(-6 + 2*cos(2*Rx_Si) + cos(2*(Rx_Si - Ry_Si)) + 2*cos(2*Ry_Si) + cos(2*(Rx_Si + Ry_Si))))/8. + 4*c44*cos(Rx_Si)^2*cos(Ry_Si)^2*(cos(Rz_Si)*sin(Ry_Si) - cos(Ry_Si)*sin(Rx_Si)*sin(Rz_Si))^2 + 4*c44*cos(Rx_Si)^2*cos(Ry_Si)^2*(cos(Ry_Si)*cos(Rz_Si)*sin(Rx_Si) + sin(Ry_Si)*sin(Rz_Si))^2 + 4*c44*(cos(Rz_Si)*sin(Ry_Si) - cos(Ry_Si)*sin(Rx_Si)*sin(Rz_Si))^2*(cos(Ry_Si)*cos(Rz_Si)*sin(Rx_Si) + sin(Ry_Si)*sin(Rz_Si))^2 + (cos(Ry_Si)*cos(Rz_Si)*sin(Rx_Si) + sin(Ry_Si)*sin(Rz_Si))^2*(c12*cos(Rx_Si)^2*cos(Ry_Si)^2 + c12*(cos(Rz_Si)*sin(Ry_Si) - cos(Ry_Si)*sin(Rx_Si)*sin(Rz_Si))^2 + c11*(cos(Ry_Si)*cos(Rz_Si)*sin(Rx_Si) + sin(Ry_Si)*sin(Rz_Si))^2) + (cos(Rz_Si)*sin(Ry_Si) - cos(Ry_Si)*sin(Rx_Si)*sin(Rz_Si))^2*(c12*cos(Rx_Si)^2*cos(Ry_Si)^2 + c11*(cos(Rz_Si)*sin(Ry_Si) - cos(Ry_Si)*sin(Rx_Si)*sin(Rz_Si))^2 + c12*(cos(Ry_Si)*cos(Rz_Si)*sin(Rx_Si) + sin(Ry_Si)*sin(Rz_Si))^2)
      DESCR_PREFIX:C33 = rotated c33 elastic stiffnesses component
      C34 = cos(Rx_Si)*((cos(Ry_Si)*(6*c11 - 10*c12 - 12*c44 + 4*c12*cos(2*Rx_Si) + 2*c12*cos(2*(Rx_Si - Ry_Si)) - 6*c11*cos(2*Ry_Si) + 2*c12*cos(2*Ry_Si) + 12*c44*cos(2*Ry_Si) + 2*c12*cos(2*(Rx_Si + Ry_Si)) + 3*c11*cos(2*(Ry_Si - 2*Rz_Si)) - 3*c12*cos(2*(Ry_Si - 2*Rz_Si)) - 6*c44*cos(2*(Ry_Si - 2*Rz_Si)) - 6*c11*cos(4*Rz_Si) + 6*c12*cos(4*Rz_Si) + 12*c44*cos(4*Rz_Si) + 3*c11*cos(2*(Ry_Si + 2*Rz_Si)) - 3*c12*cos(2*(Ry_Si + 2*Rz_Si)) - 6*c44*cos(2*(Ry_Si + 2*Rz_Si)))*sin(Rx_Si))/16. + cos(Ry_Si)^3*sin(Rx_Si)*(cos(Rx_Si)^2*(-c11 + c12 + c44 + c44*cos(2*Rz_Si)) + c11*cos(Rz_Si)^4*sin(Rx_Si)^2 - cos(Rz_Si)^2*(-c12 + 2*c44 + c12*cos(2*Rz_Si))*sin(Rx_Si)^2 + 2*c44*cos(2*Rx_Si)*sin(Rz_Si)^2 + c11*sin(Rx_Si)^2*sin(Rz_Si)^4 + c44*sin(Rx_Si)^2*sin(2*Rz_Si)^2) + (3*(c11 - c12 - 2*c44)*cos(Ry_Si)^2*sin(Rx_Si)^2*sin(Ry_Si)*sin(4*Rz_Si))/4. - ((c11 - c12 - 2*c44)*sin(Ry_Si)^3*sin(4*Rz_Si))/4.)
      DESCR_PREFIX:C34 = rotated c34 elastic stiffnesses component
      C35 = cos(Rx_Si)^2*cos(Ry_Si)*(c11*cos(Rx_Si)^2*cos(Ry_Si)^2 - (c12*(-6 + 2*cos(2*Rx_Si) + cos(2*(Rx_Si - Ry_Si)) + 2*cos(2*Ry_Si) + cos(2*(Rx_Si + Ry_Si))))/8.)*sin(Ry_Si) - 2*c44*cos(Rx_Si)^2*cos(Ry_Si)*(cos(Ry_Si)*cos(Rz_Si)*sin(Rx_Si) + sin(Ry_Si)*sin(Rz_Si))*(-2*cos(Ry_Si)*cos(Rz_Si)*sin(Rx_Si)*sin(Ry_Si) + cos(Ry_Si)^2*sin(Rz_Si) - sin(Ry_Si)^2*sin(Rz_Si)) + 2*c44*cos(Rx_Si)^2*cos(Ry_Si)*(-(cos(Rz_Si)*sin(Ry_Si)) + cos(Ry_Si)*sin(Rx_Si)*sin(Rz_Si))*(cos(Ry_Si)^2*cos(Rz_Si) - cos(Rz_Si)*sin(Ry_Si)^2 + sin(Rx_Si)*sin(2*Ry_Si)*sin(Rz_Si)) + (cos(Rz_Si)*sin(Rx_Si)*sin(Ry_Si) - cos(Ry_Si)*sin(Rz_Si))*(cos(Ry_Si)*cos(Rz_Si)*sin(Rx_Si) + sin(Ry_Si)*sin(Rz_Si))*(c12*cos(Rx_Si)^2*cos(Ry_Si)^2 + c12*(cos(Rz_Si)*sin(Ry_Si) - cos(Ry_Si)*sin(Rx_Si)*sin(Rz_Si))^2 + c11*(cos(Ry_Si)*cos(Rz_Si)*sin(Rx_Si) + sin(Ry_Si)*sin(Rz_Si))^2) + (-(cos(Rz_Si)*sin(Ry_Si)) + cos(Ry_Si)*sin(Rx_Si)*sin(Rz_Si))*(cos(Ry_Si)*cos(Rz_Si) + sin(Rx_Si)*sin(Ry_Si)*sin(Rz_Si))*(c12*cos(Rx_Si)^2*cos(Ry_Si)^2 + c11*(cos(Rz_Si)*sin(Ry_Si) - cos(Ry_Si)*sin(Rx_Si)*sin(Rz_Si))^2 + c12*(cos(Ry_Si)*cos(Rz_Si)*sin(Rx_Si) + sin(Ry_Si)*sin(Rz_Si))^2) + 2*c44*(-(cos(Rz_Si)*sin(Ry_Si)) + cos(Ry_Si)*sin(Rx_Si)*sin(Rz_Si))*(cos(Ry_Si)*cos(Rz_Si)*sin(Rx_Si) + sin(Ry_Si)*sin(Rz_Si))*(cos(Ry_Si)^2*cos(2*Rz_Si)*sin(Rx_Si) - cos(2*Rz_Si)*sin(Rx_Si)*sin(Ry_Si)^2 - ((-3 + cos(2*Rx_Si))*sin(2*Ry_Si)*sin(2*Rz_Si))/4.)
      DESCR_PREFIX:C35 = rotated c35 elastic stiffnesses component
      C36 = cos(Rx_Si)*(-((c11*cos(Rx_Si)^2*cos(Ry_Si)^2 - (c12*(-6 + 2*cos(2*Rx_Si) + cos(2*(Rx_Si - Ry_Si)) + 2*cos(2*Ry_Si) + cos(2*(Rx_Si + Ry_Si))))/8.)*sin(Rx_Si)*sin(Ry_Si)) + 2*c44*cos(Ry_Si)*(-(cos(Rz_Si)*sin(Ry_Si)) + cos(Ry_Si)*sin(Rx_Si)*sin(Rz_Si))*(-(cos(Ry_Si)*cos(Rz_Si)*sin(Rx_Si)) + cos(2*Rx_Si)*sin(Ry_Si)*sin(Rz_Si)) + 2*c44*cos(Ry_Si)*(cos(Ry_Si)*cos(Rz_Si)*sin(Rx_Si) + sin(Ry_Si)*sin(Rz_Si))*(cos(Rx_Si)^2*cos(Rz_Si)*sin(Ry_Si) + sin(Rx_Si)*(-(cos(Rz_Si)*sin(Rx_Si)*sin(Ry_Si)) + cos(Ry_Si)*sin(Rz_Si))) + cos(Rz_Si)*(cos(Rz_Si)*sin(Rx_Si)*sin(Ry_Si) - cos(Ry_Si)*sin(Rz_Si))*(c12*cos(Rx_Si)^2*cos(Ry_Si)^2 + c12*(cos(Rz_Si)*sin(Ry_Si) - cos(Ry_Si)*sin(Rx_Si)*sin(Rz_Si))^2 + c11*(cos(Ry_Si)*cos(Rz_Si)*sin(Rx_Si) + sin(Ry_Si)*sin(Rz_Si))^2) + sin(Rz_Si)*(cos(Ry_Si)*cos(Rz_Si) + sin(Rx_Si)*sin(Ry_Si)*sin(Rz_Si))*(c12*cos(Rx_Si)^2*cos(Ry_Si)^2 + c11*(cos(Rz_Si)*sin(Ry_Si) - cos(Ry_Si)*sin(Rx_Si)*sin(Rz_Si))^2 + c12*(cos(Ry_Si)*cos(Rz_Si)*sin(Rx_Si) + sin(Ry_Si)*sin(Rz_Si))^2) - 2*c44*(cos(Rz_Si)*sin(Ry_Si) - cos(Ry_Si)*sin(Rx_Si)*sin(Rz_Si))*(cos(Ry_Si)*cos(Rz_Si)*sin(Rx_Si) + sin(Ry_Si)*sin(Rz_Si))*(cos(Ry_Si)*cos(2*Rz_Si) + sin(Rx_Si)*sin(Ry_Si)*sin(2*Rz_Si)))
      DESCR_PREFIX:C36 = rotated c36 elastic stiffnesses component
      C41 = cos(Rx_Si)*((-c11 + c12)*cos(Rx_Si)^2*cos(Ry_Si)*sin(Rx_Si)*sin(Ry_Si)^2 + (c11 - c12)*cos(Rz_Si)*(cos(Rz_Si)*sin(Rx_Si)*sin(Ry_Si) - cos(Ry_Si)*sin(Rz_Si))^2*(cos(Ry_Si)*cos(Rz_Si)*sin(Rx_Si) + sin(Ry_Si)*sin(Rz_Si)) + 2*c44*sin(Ry_Si)*(cos(Rz_Si)*sin(Rx_Si)*sin(Ry_Si) + cos(2*Rx_Si)*cos(Ry_Si)*sin(Rz_Si))*(cos(Ry_Si)*cos(Rz_Si) + sin(Rx_Si)*sin(Ry_Si)*sin(Rz_Si)) + (c11 - c12)*sin(Rz_Si)*(-(cos(Rz_Si)*sin(Ry_Si)) + cos(Ry_Si)*sin(Rx_Si)*sin(Rz_Si))*(cos(Ry_Si)*cos(Rz_Si) + sin(Rx_Si)*sin(Ry_Si)*sin(Rz_Si))^2 - 2*c44*(cos(Rz_Si)*sin(Rx_Si)*sin(Ry_Si) - cos(Ry_Si)*sin(Rz_Si))*(cos(Ry_Si)*cos(Rz_Si) + sin(Rx_Si)*sin(Ry_Si)*sin(Rz_Si))*(cos(Rz_Si)^2*sin(Ry_Si) - 2*cos(Ry_Si)*cos(Rz_Si)*sin(Rx_Si)*sin(Rz_Si) - sin(Ry_Si)*sin(Rz_Si)^2) + 2*c44*sin(Ry_Si)*(cos(Rz_Si)*sin(Rx_Si)*sin(Ry_Si) - cos(Ry_Si)*sin(Rz_Si))*(cos(Rx_Si)^2*cos(Ry_Si)*cos(Rz_Si) - sin(Rx_Si)*(cos(Ry_Si)*cos(Rz_Si)*sin(Rx_Si) + sin(Ry_Si)*sin(Rz_Si))))
      DESCR_PREFIX:C41 = rotated c41 elastic stiffnesses component
      C42 = ((c11 - c12 - 2*c44)*cos(Rx_Si)*(-2*cos(2*Rx_Si - Ry_Si - 4*Rz_Si) + 4*cos(Ry_Si - 4*Rz_Si) + 2*cos(2*Rx_Si + Ry_Si - 4*Rz_Si) + 2*cos(2*Rx_Si - Ry_Si + 4*Rz_Si) - 4*cos(Ry_Si + 4*Rz_Si) - 2*cos(2*Rx_Si + Ry_Si + 4*Rz_Si) - 18*sin(Rx_Si - Ry_Si) + 14*sin(3*Rx_Si - Ry_Si) - 18*sin(Rx_Si + Ry_Si) + 14*sin(3*Rx_Si + Ry_Si) + sin(Rx_Si - Ry_Si - 4*Rz_Si) + sin(3*Rx_Si - Ry_Si - 4*Rz_Si) + sin(Rx_Si + Ry_Si - 4*Rz_Si) + sin(3*Rx_Si + Ry_Si - 4*Rz_Si) + sin(Rx_Si - Ry_Si + 4*Rz_Si) + sin(3*Rx_Si - Ry_Si + 4*Rz_Si) + sin(Rx_Si + Ry_Si + 4*Rz_Si) + sin(3*Rx_Si + Ry_Si + 4*Rz_Si)))/64.
      DESCR_PREFIX:C42 = rotated c42 elastic stiffnesses component
      C43 = cos(Rx_Si)*((-c11 + c12)*cos(Rx_Si)^2*cos(Ry_Si)^3*sin(Rx_Si) + 2*c44*cos(Ry_Si)*(cos(Rz_Si)*sin(Rx_Si)*sin(Ry_Si) + cos(2*Rx_Si)*cos(Ry_Si)*sin(Rz_Si))*(-(cos(Rz_Si)*sin(Ry_Si)) + cos(Ry_Si)*sin(Rx_Si)*sin(Rz_Si)) + (c11 - c12)*sin(Rz_Si)*(-(cos(Rz_Si)*sin(Ry_Si)) + cos(Ry_Si)*sin(Rx_Si)*sin(Rz_Si))^3 + (c11 - c12)*cos(Rz_Si)*(cos(Ry_Si)*cos(Rz_Si)*sin(Rx_Si) + sin(Ry_Si)*sin(Rz_Si))^3 + 2*c44*(cos(Rz_Si)*sin(Ry_Si) - cos(Ry_Si)*sin(Rx_Si)*sin(Rz_Si))*(cos(Ry_Si)*cos(Rz_Si)*sin(Rx_Si) + sin(Ry_Si)*sin(Rz_Si))*(cos(Rz_Si)^2*sin(Ry_Si) - 2*cos(Ry_Si)*cos(Rz_Si)*sin(Rx_Si)*sin(Rz_Si) - sin(Ry_Si)*sin(Rz_Si)^2) + 2*c44*cos(Ry_Si)*(cos(Ry_Si)*cos(Rz_Si)*sin(Rx_Si) + sin(Ry_Si)*sin(Rz_Si))*(cos(Rx_Si)^2*cos(Ry_Si)*cos(Rz_Si) - sin(Rx_Si)*(cos(Ry_Si)*cos(Rz_Si)*sin(Rx_Si) + sin(Ry_Si)*sin(Rz_Si))))
      DESCR_PREFIX:C43 = rotated c43 elastic stiffnesses component
      C44 = (c11 - c12)*cos(Rx_Si)^2*cos(Ry_Si)^2*sin(Rx_Si)^2 + c44*(cos(Rz_Si)*sin(Rx_Si)*sin(Ry_Si) + cos(2*Rx_Si)*cos(Ry_Si)*sin(Rz_Si))^2 + (c11 - c12)*cos(Rx_Si)^2*sin(Rz_Si)^2*(cos(Rz_Si)*sin(Ry_Si) - cos(Ry_Si)*sin(Rx_Si)*sin(Rz_Si))^2 + (c11 - c12)*cos(Rx_Si)^2*cos(Rz_Si)^2*(cos(Ry_Si)*cos(Rz_Si)*sin(Rx_Si) + sin(Ry_Si)*sin(Rz_Si))^2 + c44*(cos(Rx_Si)^2*cos(Ry_Si)*cos(Rz_Si) - sin(Rx_Si)*(cos(Ry_Si)*cos(Rz_Si)*sin(Rx_Si) + sin(Ry_Si)*sin(Rz_Si)))^2 + c44*cos(Rx_Si)^2*(-(cos(Rz_Si)^2*sin(Ry_Si)) + sin(Ry_Si)*sin(Rz_Si)^2 + cos(Ry_Si)*sin(Rx_Si)*sin(2*Rz_Si))^2
      DESCR_PREFIX:C44 = rotated c44 elastic stiffnesses component
      C45 = ((c11 - c12 - 2*c44)*cos(Rx_Si)*(-14*cos(Rx_Si - 3*Ry_Si) + 18*cos(Rx_Si - Ry_Si) - 14*cos(3*(Rx_Si - Ry_Si)) - 14*cos(3*Rx_Si - Ry_Si) - 18*cos(Rx_Si + Ry_Si) + 14*cos(3*(Rx_Si + Ry_Si)) + 14*cos(3*Rx_Si + Ry_Si) + 14*cos(Rx_Si + 3*Ry_Si) + 15*cos(Rx_Si - 3*Ry_Si - 4*Rz_Si) - cos(3*Rx_Si - 3*Ry_Si - 4*Rz_Si) - cos(Rx_Si - Ry_Si - 4*Rz_Si) - cos(3*Rx_Si - Ry_Si - 4*Rz_Si) + cos(Rx_Si + Ry_Si - 4*Rz_Si) + cos(3*Rx_Si + Ry_Si - 4*Rz_Si) - 15*cos(Rx_Si + 3*Ry_Si - 4*Rz_Si) + cos(3*Rx_Si + 3*Ry_Si - 4*Rz_Si) + 15*cos(Rx_Si - 3*Ry_Si + 4*Rz_Si) - cos(3*Rx_Si - 3*Ry_Si + 4*Rz_Si) - cos(Rx_Si - Ry_Si + 4*Rz_Si) - cos(3*Rx_Si - Ry_Si + 4*Rz_Si) + cos(Rx_Si + Ry_Si + 4*Rz_Si) + cos(3*Rx_Si + Ry_Si + 4*Rz_Si) - 15*cos(Rx_Si + 3*Ry_Si + 4*Rz_Si) + cos(3*Rx_Si + 3*Ry_Si + 4*Rz_Si) - 6*sin(2*Rx_Si - 3*Ry_Si - 4*Rz_Si) - 2*sin(2*Rx_Si - Ry_Si - 4*Rz_Si) - 4*sin(Ry_Si - 4*Rz_Si) - 2*sin(2*Rx_Si + Ry_Si - 4*Rz_Si) + 20*sin(3*Ry_Si - 4*Rz_Si) - 6*sin(2*Rx_Si + 3*Ry_Si - 4*Rz_Si) + 6*sin(2*Rx_Si - 3*Ry_Si + 4*Rz_Si) + 2*sin(2*Rx_Si - Ry_Si + 4*Rz_Si) + 4*sin(Ry_Si + 4*Rz_Si) + 2*sin(2*Rx_Si + Ry_Si + 4*Rz_Si) - 20*sin(3*Ry_Si + 4*Rz_Si) + 6*sin(2*Rx_Si + 3*Ry_Si + 4*Rz_Si)))/256.
      DESCR_PREFIX:C45 = rotated c45 elastic stiffnesses component
      C46 = -0.015625*((c11 - c12 - 2*c44)*cos(Rx_Si)^2*(4*cos(Rx_Si - 2*Ry_Si - 4*Rz_Si) + 4*cos(Rx_Si + 2*Ry_Si - 4*Rz_Si) - 4*cos(Rx_Si - 2*Ry_Si + 4*Rz_Si) - 4*cos(Rx_Si + 2*Ry_Si + 4*Rz_Si) - 14*sin(2*(Rx_Si - Ry_Si)) - 20*sin(2*Ry_Si) + 14*sin(2*(Rx_Si + Ry_Si)) - sin(2*(Rx_Si - Ry_Si - 2*Rz_Si)) - 6*sin(2*(Ry_Si - 2*Rz_Si)) + sin(2*(Rx_Si + Ry_Si - 2*Rz_Si)) - sin(2*(Rx_Si - Ry_Si + 2*Rz_Si)) - 6*sin(2*(Ry_Si + 2*Rz_Si)) + sin(2*(Rx_Si + Ry_Si + 2*Rz_Si))))
      DESCR_PREFIX:C46 = rotated c46 elastic stiffnesses component
      C51 = (c11 - c12)*cos(Rx_Si)^4*cos(Ry_Si)*sin(Ry_Si)^3 + 2*c44*cos(Rx_Si)^2*sin(Ry_Si)*(cos(Rz_Si)*sin(Rx_Si)*sin(Ry_Si) - cos(Ry_Si)*sin(Rz_Si))*(cos(Rz_Si)*sin(Rx_Si)*sin(2*Ry_Si) - cos(2*Ry_Si)*sin(Rz_Si)) - 2*c44*cos(Rx_Si)^2*sin(Ry_Si)*(cos(Ry_Si)*cos(Rz_Si) + sin(Rx_Si)*sin(Ry_Si)*sin(Rz_Si))*(-(cos(Ry_Si)^2*cos(Rz_Si)) + cos(Rz_Si)*sin(Ry_Si)^2 - 2*cos(Ry_Si)*sin(Rx_Si)*sin(Ry_Si)*sin(Rz_Si)) + (cos(Ry_Si)*cos(Rz_Si) + sin(Rx_Si)*sin(Ry_Si)*sin(Rz_Si))^2*(c12*cos(Rx_Si)^2*cos(Ry_Si)*sin(Ry_Si) + c12*(cos(Rz_Si)*sin(Rx_Si)*sin(Ry_Si) - cos(Ry_Si)*sin(Rz_Si))*(cos(Ry_Si)*cos(Rz_Si)*sin(Rx_Si) + sin(Ry_Si)*sin(Rz_Si)) + c11*(-(cos(Rz_Si)*sin(Ry_Si)) + cos(Ry_Si)*sin(Rx_Si)*sin(Rz_Si))*(cos(Ry_Si)*cos(Rz_Si) + sin(Rx_Si)*sin(Ry_Si)*sin(Rz_Si))) + (cos(Rz_Si)*sin(Rx_Si)*sin(Ry_Si) - cos(Ry_Si)*sin(Rz_Si))^2*(c12*cos(Rx_Si)^2*cos(Ry_Si)*sin(Ry_Si) + c11*(cos(Rz_Si)*sin(Rx_Si)*sin(Ry_Si) - cos(Ry_Si)*sin(Rz_Si))*(cos(Ry_Si)*cos(Rz_Si)*sin(Rx_Si) + sin(Ry_Si)*sin(Rz_Si)) + c12*(-(cos(Rz_Si)*sin(Ry_Si)) + cos(Ry_Si)*sin(Rx_Si)*sin(Rz_Si))*(cos(Ry_Si)*cos(Rz_Si) + sin(Rx_Si)*sin(Ry_Si)*sin(Rz_Si))) + 2*c44*(cos(Rz_Si)*sin(Rx_Si)*sin(Ry_Si) - cos(Ry_Si)*sin(Rz_Si))*(cos(Ry_Si)*cos(Rz_Si) + sin(Rx_Si)*sin(Ry_Si)*sin(Rz_Si))*(cos(Ry_Si)^2*cos(2*Rz_Si)*sin(Rx_Si) - cos(2*Rz_Si)*sin(Rx_Si)*sin(Ry_Si)^2 - ((-3 + cos(2*Rx_Si))*sin(2*Ry_Si)*sin(2*Rz_Si))/4.)
      DESCR_PREFIX:C51 = rotated c51 elastic stiffnesses component
      C52 = -0.015625*((c11 - c12 - 2*c44)*cos(Rx_Si)^2*(4*cos(Rx_Si - 2*Ry_Si - 4*Rz_Si) + 4*cos(Rx_Si + 2*Ry_Si - 4*Rz_Si) - 4*cos(Rx_Si - 2*Ry_Si + 4*Rz_Si) - 4*cos(Rx_Si + 2*Ry_Si + 4*Rz_Si) - 14*sin(2*(Rx_Si - Ry_Si)) - 20*sin(2*Ry_Si) + 14*sin(2*(Rx_Si + Ry_Si)) - sin(2*(Rx_Si - Ry_Si - 2*Rz_Si)) - 6*sin(2*(Ry_Si - 2*Rz_Si)) + sin(2*(Rx_Si + Ry_Si - 2*Rz_Si)) - sin(2*(Rx_Si - Ry_Si + 2*Rz_Si)) - 6*sin(2*(Ry_Si + 2*Rz_Si)) + sin(2*(Rx_Si + Ry_Si + 2*Rz_Si))))
      DESCR_PREFIX:C52 = rotated c52 elastic stiffnesses component
      C53 = (c11 - c12)*cos(Rx_Si)^4*cos(Ry_Si)^3*sin(Ry_Si) - 2*c44*cos(Rx_Si)^2*cos(Ry_Si)*(cos(Ry_Si)*cos(Rz_Si)*sin(Rx_Si) + sin(Ry_Si)*sin(Rz_Si))*(-2*cos(Ry_Si)*cos(Rz_Si)*sin(Rx_Si)*sin(Ry_Si) + cos(Ry_Si)^2*sin(Rz_Si) - sin(Ry_Si)^2*sin(Rz_Si)) + 2*c44*cos(Rx_Si)^2*cos(Ry_Si)*(-(cos(Rz_Si)*sin(Ry_Si)) + cos(Ry_Si)*sin(Rx_Si)*sin(Rz_Si))*(cos(Ry_Si)^2*cos(Rz_Si) - cos(Rz_Si)*sin(Ry_Si)^2 + sin(Rx_Si)*sin(2*Ry_Si)*sin(Rz_Si)) + (cos(Rz_Si)*sin(Ry_Si) - cos(Ry_Si)*sin(Rx_Si)*sin(Rz_Si))^2*(c12*cos(Rx_Si)^2*cos(Ry_Si)*sin(Ry_Si) + c12*(cos(Rz_Si)*sin(Rx_Si)*sin(Ry_Si) - cos(Ry_Si)*sin(Rz_Si))*(cos(Ry_Si)*cos(Rz_Si)*sin(Rx_Si) + sin(Ry_Si)*sin(Rz_Si)) + c11*(-(cos(Rz_Si)*sin(Ry_Si)) + cos(Ry_Si)*sin(Rx_Si)*sin(Rz_Si))*(cos(Ry_Si)*cos(Rz_Si) + sin(Rx_Si)*sin(Ry_Si)*sin(Rz_Si))) + (cos(Ry_Si)*cos(Rz_Si)*sin(Rx_Si) + sin(Ry_Si)*sin(Rz_Si))^2*(c12*cos(Rx_Si)^2*cos(Ry_Si)*sin(Ry_Si) + c11*(cos(Rz_Si)*sin(Rx_Si)*sin(Ry_Si) - cos(Ry_Si)*sin(Rz_Si))*(cos(Ry_Si)*cos(Rz_Si)*sin(Rx_Si) + sin(Ry_Si)*sin(Rz_Si)) + c12*(-(cos(Rz_Si)*sin(Ry_Si)) + cos(Ry_Si)*sin(Rx_Si)*sin(Rz_Si))*(cos(Ry_Si)*cos(Rz_Si) + sin(Rx_Si)*sin(Ry_Si)*sin(Rz_Si))) + 2*c44*(-(cos(Rz_Si)*sin(Ry_Si)) + cos(Ry_Si)*sin(Rx_Si)*sin(Rz_Si))*(cos(Ry_Si)*cos(Rz_Si)*sin(Rx_Si) + sin(Ry_Si)*sin(Rz_Si))*(cos(Ry_Si)^2*cos(2*Rz_Si)*sin(Rx_Si) - cos(2*Rz_Si)*sin(Rx_Si)*sin(Ry_Si)^2 - ((-3 + cos(2*Rx_Si))*sin(2*Ry_Si)*sin(2*Rz_Si))/4.)
      DESCR_PREFIX:C53 = rotated c53 elastic stiffnesses component
      C54 = ((c11 - c12 - 2*c44)*cos(Rx_Si)*(-14*cos(Rx_Si - 3*Ry_Si) + 18*cos(Rx_Si - Ry_Si) - 14*cos(3*(Rx_Si - Ry_Si)) - 14*cos(3*Rx_Si - Ry_Si) - 18*cos(Rx_Si + Ry_Si) + 14*cos(3*(Rx_Si + Ry_Si)) + 14*cos(3*Rx_Si + Ry_Si) + 14*cos(Rx_Si + 3*Ry_Si) + 15*cos(Rx_Si - 3*Ry_Si - 4*Rz_Si) - cos(3*Rx_Si - 3*Ry_Si - 4*Rz_Si) - cos(Rx_Si - Ry_Si - 4*Rz_Si) - cos(3*Rx_Si - Ry_Si - 4*Rz_Si) + cos(Rx_Si + Ry_Si - 4*Rz_Si) + cos(3*Rx_Si + Ry_Si - 4*Rz_Si) - 15*cos(Rx_Si + 3*Ry_Si - 4*Rz_Si) + cos(3*Rx_Si + 3*Ry_Si - 4*Rz_Si) + 15*cos(Rx_Si - 3*Ry_Si + 4*Rz_Si) - cos(3*Rx_Si - 3*Ry_Si + 4*Rz_Si) - cos(Rx_Si - Ry_Si + 4*Rz_Si) - cos(3*Rx_Si - Ry_Si + 4*Rz_Si) + cos(Rx_Si + Ry_Si + 4*Rz_Si) + cos(3*Rx_Si + Ry_Si + 4*Rz_Si) - 15*cos(Rx_Si + 3*Ry_Si + 4*Rz_Si) + cos(3*Rx_Si + 3*Ry_Si + 4*Rz_Si) - 6*sin(2*Rx_Si - 3*Ry_Si - 4*Rz_Si) - 2*sin(2*Rx_Si - Ry_Si - 4*Rz_Si) - 4*sin(Ry_Si - 4*Rz_Si) - 2*sin(2*Rx_Si + Ry_Si - 4*Rz_Si) + 20*sin(3*Ry_Si - 4*Rz_Si) - 6*sin(2*Rx_Si + 3*Ry_Si - 4*Rz_Si) + 6*sin(2*Rx_Si - 3*Ry_Si + 4*Rz_Si) + 2*sin(2*Rx_Si - Ry_Si + 4*Rz_Si) + 4*sin(Ry_Si + 4*Rz_Si) + 2*sin(2*Rx_Si + Ry_Si + 4*Rz_Si) - 20*sin(3*Ry_Si + 4*Rz_Si) + 6*sin(2*Rx_Si + 3*Ry_Si + 4*Rz_Si)))/256.
      DESCR_PREFIX:C54 = rotated c54 elastic stiffnesses component
      C55 = (c11 - c12)*cos(Rx_Si)^4*cos(Ry_Si)^2*sin(Ry_Si)^2 + c44*cos(Rx_Si)^2*(cos(Rz_Si)*sin(Rx_Si)*sin(2*Ry_Si) - cos(2*Ry_Si)*sin(Rz_Si))^2 + c44*cos(Rx_Si)^2*(cos(Ry_Si)^2*cos(Rz_Si) - cos(Rz_Si)*sin(Ry_Si)^2 + sin(Rx_Si)*sin(2*Ry_Si)*sin(Rz_Si))^2 + (-(cos(Rz_Si)*sin(Ry_Si)) + cos(Ry_Si)*sin(Rx_Si)*sin(Rz_Si))*(cos(Ry_Si)*cos(Rz_Si) + sin(Rx_Si)*sin(Ry_Si)*sin(Rz_Si))*(c12*cos(Rx_Si)^2*cos(Ry_Si)*sin(Ry_Si) + c12*(cos(Rz_Si)*sin(Rx_Si)*sin(Ry_Si) - cos(Ry_Si)*sin(Rz_Si))*(cos(Ry_Si)*cos(Rz_Si)*sin(Rx_Si) + sin(Ry_Si)*sin(Rz_Si)) + c11*(-(cos(Rz_Si)*sin(Ry_Si)) + cos(Ry_Si)*sin(Rx_Si)*sin(Rz_Si))*(cos(Ry_Si)*cos(Rz_Si) + sin(Rx_Si)*sin(Ry_Si)*sin(Rz_Si))) + (cos(Rz_Si)*sin(Rx_Si)*sin(Ry_Si) - cos(Ry_Si)*sin(Rz_Si))*(cos(Ry_Si)*cos(Rz_Si)*sin(Rx_Si) + sin(Ry_Si)*sin(Rz_Si))*(c12*cos(Rx_Si)^2*cos(Ry_Si)*sin(Ry_Si) + c11*(cos(Rz_Si)*sin(Rx_Si)*sin(Ry_Si) - cos(Ry_Si)*sin(Rz_Si))*(cos(Ry_Si)*cos(Rz_Si)*sin(Rx_Si) + sin(Ry_Si)*sin(Rz_Si)) + c12*(-(cos(Rz_Si)*sin(Ry_Si)) + cos(Ry_Si)*sin(Rx_Si)*sin(Rz_Si))*(cos(Ry_Si)*cos(Rz_Si) + sin(Rx_Si)*sin(Ry_Si)*sin(Rz_Si))) + c44*(-(cos(Ry_Si)^2*cos(2*Rz_Si)*sin(Rx_Si)) + cos(2*Rz_Si)*sin(Rx_Si)*sin(Ry_Si)^2 + ((-3 + cos(2*Rx_Si))*sin(2*Ry_Si)*sin(2*Rz_Si))/4.)^2
      DESCR_PREFIX:C55 = rotated c55 elastic stiffnesses component

      C56 = -0.00390625*((c11 - c12 - 2*c44)*cos(Rx_Si)*(6*cos(2*Rx_Si - 3*Ry_Si - 4*Rz_Si) - 2*cos(2*Rx_Si - Ry_Si - 4*Rz_Si) + 4*cos(Ry_Si - 4*Rz_Si) + 2*cos(2*Rx_Si + Ry_Si - 4*Rz_Si) + 20*cos(3*Ry_Si - 4*Rz_Si) - 6*cos(2*Rx_Si + 3*Ry_Si - 4*Rz_Si) - 6*cos(2*Rx_Si - 3*Ry_Si + 4*Rz_Si) + 2*cos(2*Rx_Si - Ry_Si + 4*Rz_Si) - 4*cos(Ry_Si + 4*Rz_Si) - 2*cos(2*Rx_Si + Ry_Si + 4*Rz_Si) - 20*cos(3*Ry_Si + 4*Rz_Si) + 6*cos(2*Rx_Si + 3*Ry_Si + 4*Rz_Si) - 14*sin(Rx_Si - 3*Ry_Si) - 18*sin(Rx_Si - Ry_Si) - 14*sin(3*(Rx_Si - Ry_Si)) + 14*sin(3*Rx_Si - Ry_Si) - 18*sin(Rx_Si + Ry_Si) - 14*sin(3*(Rx_Si + Ry_Si)) + 14*sin(3*Rx_Si + Ry_Si) - 14*sin(Rx_Si + 3*Ry_Si) + 15*sin(Rx_Si - 3*Ry_Si - 4*Rz_Si) - sin(3*Rx_Si - 3*Ry_Si - 4*Rz_Si) + sin(Rx_Si - Ry_Si - 4*Rz_Si) + sin(3*Rx_Si - Ry_Si - 4*Rz_Si) + sin(Rx_Si + Ry_Si - 4*Rz_Si) + sin(3*Rx_Si + Ry_Si - 4*Rz_Si) + 15*sin(Rx_Si + 3*Ry_Si - 4*Rz_Si) - sin(3*Rx_Si + 3*Ry_Si - 4*Rz_Si) + 15*sin(Rx_Si - 3*Ry_Si + 4*Rz_Si) - sin(3*Rx_Si - 3*Ry_Si + 4*Rz_Si) + sin(Rx_Si - Ry_Si + 4*Rz_Si) + sin(3*Rx_Si - Ry_Si + 4*Rz_Si) + sin(Rx_Si + Ry_Si + 4*Rz_Si) + sin(3*Rx_Si + Ry_Si + 4*Rz_Si) + 15*sin(Rx_Si + 3*Ry_Si + 4*Rz_Si) - sin(3*Rx_Si + 3*Ry_Si + 4*Rz_Si)))
      DESCR_PREFIX:C56 = rotated c56 elastic stiffnesses component
      C61 = cos(Rx_Si)*((-c11 + c12)*cos(Rx_Si)^2*sin(Rx_Si)*sin(Ry_Si)^3 + (c11 - c12)*cos(Rz_Si)*(cos(Rz_Si)*sin(Rx_Si)*sin(Ry_Si) - cos(Ry_Si)*sin(Rz_Si))^3 + 2*c44*sin(Ry_Si)*(-(cos(Ry_Si)*cos(Rz_Si)*sin(Rx_Si)) + cos(2*Rx_Si)*sin(Ry_Si)*sin(Rz_Si))*(cos(Ry_Si)*cos(Rz_Si) + sin(Rx_Si)*sin(Ry_Si)*sin(Rz_Si)) + (c11 - c12)*sin(Rz_Si)*(cos(Ry_Si)*cos(Rz_Si) + sin(Rx_Si)*sin(Ry_Si)*sin(Rz_Si))^3 + 2*c44*sin(Ry_Si)*(cos(Rz_Si)*sin(Rx_Si)*sin(Ry_Si) - cos(Ry_Si)*sin(Rz_Si))*(cos(Rx_Si)^2*cos(Rz_Si)*sin(Ry_Si) + sin(Rx_Si)*(-(cos(Rz_Si)*sin(Rx_Si)*sin(Ry_Si)) + cos(Ry_Si)*sin(Rz_Si))) + 2*c44*(cos(Rz_Si)*sin(Rx_Si)*sin(Ry_Si) - cos(Ry_Si)*sin(Rz_Si))*(cos(Ry_Si)*cos(Rz_Si) + sin(Rx_Si)*sin(Ry_Si)*sin(Rz_Si))*(cos(Ry_Si)*cos(2*Rz_Si) + sin(Rx_Si)*sin(Ry_Si)*sin(2*Rz_Si)))
      DESCR_PREFIX:C61 = rotated c61 elastic stiffnesses component
      C62 = ((-c11 + c12 + 2*c44)*cos(Rx_Si)*(18*cos(Rx_Si - Ry_Si) - 14*cos(3*Rx_Si - Ry_Si) - 18*cos(Rx_Si + Ry_Si) + 14*cos(3*Rx_Si + Ry_Si) - cos(Rx_Si - Ry_Si - 4*Rz_Si) - cos(3*Rx_Si - Ry_Si - 4*Rz_Si) + cos(Rx_Si + Ry_Si - 4*Rz_Si) + cos(3*Rx_Si + Ry_Si - 4*Rz_Si) - cos(Rx_Si - Ry_Si + 4*Rz_Si) - cos(3*Rx_Si - Ry_Si + 4*Rz_Si) + cos(Rx_Si + Ry_Si + 4*Rz_Si) + cos(3*Rx_Si + Ry_Si + 4*Rz_Si) - 2*sin(2*Rx_Si - Ry_Si - 4*Rz_Si) - 4*sin(Ry_Si - 4*Rz_Si) - 2*sin(2*Rx_Si + Ry_Si - 4*Rz_Si) + 2*sin(2*Rx_Si - Ry_Si + 4*Rz_Si) + 4*sin(Ry_Si + 4*Rz_Si) + 2*sin(2*Rx_Si + Ry_Si + 4*Rz_Si)))/64.
      DESCR_PREFIX:C62 = rotated c62 elastic stiffnesses component
      C63 = cos(Rx_Si)*((-c11 + c12)*cos(Rx_Si)^2*cos(Ry_Si)^2*sin(Rx_Si)*sin(Ry_Si) + (c11 - c12)*cos(Rz_Si)*(cos(Rz_Si)*sin(Rx_Si)*sin(Ry_Si) - cos(Ry_Si)*sin(Rz_Si))*(cos(Ry_Si)*cos(Rz_Si)*sin(Rx_Si) + sin(Ry_Si)*sin(Rz_Si))^2 + 2*c44*cos(Ry_Si)*(-(cos(Rz_Si)*sin(Ry_Si)) + cos(Ry_Si)*sin(Rx_Si)*sin(Rz_Si))*(-(cos(Ry_Si)*cos(Rz_Si)*sin(Rx_Si)) + cos(2*Rx_Si)*sin(Ry_Si)*sin(Rz_Si)) + (c11 - c12)*sin(Rz_Si)*(cos(Rz_Si)*sin(Ry_Si) - cos(Ry_Si)*sin(Rx_Si)*sin(Rz_Si))^2*(cos(Ry_Si)*cos(Rz_Si) + sin(Rx_Si)*sin(Ry_Si)*sin(Rz_Si)) + 2*c44*cos(Ry_Si)*(cos(Ry_Si)*cos(Rz_Si)*sin(Rx_Si) + sin(Ry_Si)*sin(Rz_Si))*(cos(Rx_Si)^2*cos(Rz_Si)*sin(Ry_Si) + sin(Rx_Si)*(-(cos(Rz_Si)*sin(Rx_Si)*sin(Ry_Si)) + cos(Ry_Si)*sin(Rz_Si))) - 2*c44*(cos(Rz_Si)*sin(Ry_Si) - cos(Ry_Si)*sin(Rx_Si)*sin(Rz_Si))*(cos(Ry_Si)*cos(Rz_Si)*sin(Rx_Si) + sin(Ry_Si)*sin(Rz_Si))*(cos(Ry_Si)*cos(2*Rz_Si) + sin(Rx_Si)*sin(Ry_Si)*sin(2*Rz_Si)))
      DESCR_PREFIX:C63 = rotated c63 elastic stiffnesses component
      C64 = -0.015625*((c11 - c12 - 2*c44)*cos(Rx_Si)^2*(4*cos(Rx_Si - 2*Ry_Si - 4*Rz_Si) + 4*cos(Rx_Si + 2*Ry_Si - 4*Rz_Si) - 4*cos(Rx_Si - 2*Ry_Si + 4*Rz_Si) - 4*cos(Rx_Si + 2*Ry_Si + 4*Rz_Si) - 14*sin(2*(Rx_Si - Ry_Si)) - 20*sin(2*Ry_Si) + 14*sin(2*(Rx_Si + Ry_Si)) - sin(2*(Rx_Si - Ry_Si - 2*Rz_Si)) - 6*sin(2*(Ry_Si - 2*Rz_Si)) + sin(2*(Rx_Si + Ry_Si - 2*Rz_Si)) - sin(2*(Rx_Si - Ry_Si + 2*Rz_Si)) - 6*sin(2*(Ry_Si + 2*Rz_Si)) + sin(2*(Rx_Si + Ry_Si + 2*Rz_Si))))
      DESCR_PREFIX:C64 = rotated c64 elastic stiffnesses component
      C65 = cos(Rx_Si)*((-c11 + c12)*cos(Rx_Si)^2*cos(Ry_Si)*sin(Rx_Si)*sin(Ry_Si)^2 + (c11 - c12)*cos(Rz_Si)*(cos(Rz_Si)*sin(Rx_Si)*sin(Ry_Si) - cos(Ry_Si)*sin(Rz_Si))^2*(cos(Ry_Si)*cos(Rz_Si)*sin(Rx_Si) + sin(Ry_Si)*sin(Rz_Si)) + (c11 - c12)*sin(Rz_Si)*(-(cos(Rz_Si)*sin(Ry_Si)) + cos(Ry_Si)*sin(Rx_Si)*sin(Rz_Si))*(cos(Ry_Si)*cos(Rz_Si) + sin(Rx_Si)*sin(Ry_Si)*sin(Rz_Si))^2 + c44*(-(cos(Ry_Si)*cos(Rz_Si)*sin(Rx_Si)) + cos(2*Rx_Si)*sin(Ry_Si)*sin(Rz_Si))*(cos(Ry_Si)^2*cos(Rz_Si) - cos(Rz_Si)*sin(Ry_Si)^2 + sin(Rx_Si)*sin(2*Ry_Si)*sin(Rz_Si)) + c44*(cos(Rz_Si)*sin(Rx_Si)*sin(2*Ry_Si) - cos(2*Ry_Si)*sin(Rz_Si))*(cos(Rx_Si)^2*cos(Rz_Si)*sin(Ry_Si) + sin(Rx_Si)*(-(cos(Rz_Si)*sin(Rx_Si)*sin(Ry_Si)) + cos(Ry_Si)*sin(Rz_Si))) + c44*(cos(Ry_Si)*cos(2*Rz_Si) + sin(Rx_Si)*sin(Ry_Si)*sin(2*Rz_Si))*(cos(Ry_Si)^2*cos(2*Rz_Si)*sin(Rx_Si) - cos(2*Rz_Si)*sin(Rx_Si)*sin(Ry_Si)^2 - ((-3 + cos(2*Rx_Si))*sin(2*Ry_Si)*sin(2*Rz_Si))/4.))
      DESCR_PREFIX:C65 = rotated c65 elastic stiffnesses component
      C66 = (c11 - c12)*cos(Rx_Si)^2*sin(Rx_Si)^2*sin(Ry_Si)^2 + (c11 - c12)*cos(Rx_Si)^2*cos(Rz_Si)^2*(cos(Rz_Si)*sin(Rx_Si)*sin(Ry_Si) - cos(Ry_Si)*sin(Rz_Si))^2 + c44*(cos(Ry_Si)*cos(Rz_Si)*sin(Rx_Si) - cos(2*Rx_Si)*sin(Ry_Si)*sin(Rz_Si))^2 + (c11 - c12)*cos(Rx_Si)^2*sin(Rz_Si)^2*(cos(Ry_Si)*cos(Rz_Si) + sin(Rx_Si)*sin(Ry_Si)*sin(Rz_Si))^2 + c44*(cos(Rx_Si)^2*cos(Rz_Si)*sin(Ry_Si) + sin(Rx_Si)*(-(cos(Rz_Si)*sin(Rx_Si)*sin(Ry_Si)) + cos(Ry_Si)*sin(Rz_Si)))^2 + c44*cos(Rx_Si)^2*(cos(Ry_Si)*cos(2*Rz_Si) + sin(Rx_Si)*sin(Ry_Si)*sin(2*Rz_Si))^2
      DESCR_PREFIX:C66 = rotated c66 elastic stiffnesses component
    RefractiveIndex
      n = nref_ext(lambda0)
      ki = kref_ext(lambda0)
      int1: Interpolation "External Data - refractive index"
        funcname = nref_ext
        table = 
          {400e-9, 5.57}
          {402.5e-9, 5.493}
          {405.2e-9, 5.42}
          {407.8e-9, 5.349}
          {410.5e-9, 5.284}
          {413.3e-9, 5.222}
          {416.1e-9, 5.164}
          {418.9e-9, 5.109}
          {421.7e-9, 5.058}
          {424.6e-9, 5.009}
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      int2: Interpolation "External Data - k"
        funcname = kref_ext
        table = 
          {400e-9, 0.387}
          {402.5e-9, 0.355}
          {405.2e-9, 0.329}
          {407.8e-9, 0.313}
          {410.5e-9, 0.291}
          {413.3e-9, 0.269}
          {416.1e-9, 0.255}
          {418.9e-9, 0.244}
          {421.7e-9, 0.228}
          {424.6e-9, 0.211}
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
Physics
  ewfd: ElectromagneticWavesFrequencyDomain on all domains
    dependent variable E = {Ex, Ey, Ez}
    wee1: WaveEquationElectric (default) | DisplacementFieldModel = RelativePermittivity
    pec1: PerfectElectricConductor (default)
    init1: init "Initial Values 1" (default)
    sctr1: Scattering "Scattering Boundary Condition 1" on boundaries 14
      IncidentField = GaussianBeam
      E0i = {0, 0, 1}
      WaveType = PlaneWave
      kdir = {-ewfd.nx, -ewfd.ny, 0}
      w0 = beam_waist
      p0 = beam_focal
      Eg0 = {beam_Ex0, beam_Ey0, beam_Ez0}
      inputQuantity = ElectricFieldAmplitude
      inputPower = beam_power_density
      Eg0NN = {beam_Ex, beam_Ey, beam_Ez}
    sctr2: Scattering "Scattering Boundary Condition 2" on boundaries 1-3, 5, 7, 9, 18, 23, 31, 36, 44, 49, 57, 62, 70, 75, 83, 88, 96, 101, 109, 114, 122, 127, 135, 140, 148, 153, 161, 166, 174, 179, 187, 192, 200, 205, 211-215

Mesh
  mesh1 "Mesh 1"
    size: MeshSizeDefault | hauto = 1
    map1: Map "LN" on domains 6, 11, 16, 21, 26, 31, 36, 41, 46, 51, 56, 61, 66, 71, 76, 81 | adjustedgdistr = on
      size1: Size on entire geometry | hmax = 40[nm]; custom = on
    map2: Map "Silica" on domains 2, 5, 8, 10, 13, 15, 18, 20, 23, 25, 28, 30, 33, 35, 38, 40, 43, 45, 48, 50, 53, 55, 58, 60, 63, 65, 68, 70, 73, 75, 78, 80
      smoothmaxiter = 4
      smoothmaxdepth = 4
      adjustedgdistr = on
      size1: Size on entire geometry | hmax = 75[nm]; hauto = 1; custom = on
      dis1: Distribution on boundaries 3, 213 | numelem = 80
    map3: Map "Silicon" on domains 1, 4, 7, 9, 12, 14, 17, 19, 22, 24, 27, 29, 32, 34, 37, 39, 42, 44, 47, 49, 52, 54, 57, 59, 62, 64, 67, 69, 72, 74, 77, 79
      size1: Size on entire geometry | hmax = 200[nm]; custom = on
    ftri1: FreeTri "Air" on domains 3
      size1: Size on entire geometry | hmax = 200[nm]; hgrad = 2; custom = on
    conv1: Convert on domains 1, 2, 4-81

Studies
  std4 "Study 1"
    param: Parametric "Parametric Sweep"
      sweeptype = filled
      pname = x0GC
      plistarr = range(0[nm],10[nm],200[nm])
      punit = m
      keepsol = last
      useaccumtable = on
      accumtable = new
    wave: Wavelength "Wavelength Domain" | punit = nm; plist = 1550